Simulations: Version=197
  Folder Replacements
    Plant IntermediateWheatgrass: PlantType=IntermediateWheatgrass
      Memo GeneralDescription
        _Peter Innes, University of Southern Queensland_

        ## Introduction

        Perennial cropping potentially brings a wide range of environmental and economic benefits. Land sown to perennial pastures have been shown to have higher soil organic carbon levels than land regularly cultivated for cropping (Badgery et al. 2014). A comparison of an annual wheat variety with a wild perennial relative, Intermediate Wheat Grass, illustrated that the wheat grass is deeper rooted than annual wheat and thus can access deeper layers of nutrients and soil water, lessening the risk of nutrient leaching and water table rise (Crews, Carton & Olsson 2018; Culman et al. 2013; DeHaan & Ismail 2017; Duchene et al. 2020; Glover et al. 2010; Soto-Gómez & Pérez-Rodríguez 2022). Another of the perceived benefits of perennial crops is the ability to capture precipitation year-round, unlike annuals which have a relatively short growing season and often leave the soil bare and susceptible to water and wind erosion. Maintaining a perennial crop requires less tillage and spraying than annual cropping, resulting in less machinery operational costs and reduced soil compaction.  .

        ## Presentation

        This model has been built using the Plant Modelling Framework (PMF) of [brown_plant_2014] to simulate the growth of pereennial grains as a grain and forage crop.  The pereennial grain model simulates the above ground plant structure, including the photosynthesis process, using the SimpleLeaf procedure of PMF, which does not consider explicitly leaf age or placement in the canopy.  The model describes a perennial crop, with phenology rewinding to the vegetative stage at the end of the reproductive phase.

        ## Inclusion in APSIM simulations
        To include perennial grain in a simulation the procedure is the same as any other APSIM crop:

         - The perennial grain object can be dragged or copied from the Crop folder in the toolbox into a Field in your simulation;
         - To become active and grow, the perennial grain crop needs to be sown using a manager script with a sowing rule. e.g.:
        <pre><code class='language-cs'>
         IntermediateWheatgrass.Sow(cultivar: Colenso, population: 450, depth: 5, rowSpacing: 100);
        </code></pre>
        If a specified cultivar is not available, a fatal error will be thrown.

        ### Harvest and biomass removal
        perennial grain biomass can be removed by raising one of the valid methods: Harvest, Cut, Graze, or Prune; this is done using a manager script, similarly to other crops.  The proportion of the biomass of each organ that is removed from the system and/or added to the residue pools may be specified; otherwise defaults will be used.  Note that the sum of fractions removed and added to residue should be <= 1.0.  To specify the proportions for removal in a manager script, use a RemovalFractions class as shown below:
        <pre><code class='language-cs'>
        [EventSubscribe("Commencing")]
        private void OnSimulationCommencing(object sender, EventArgs e)
        {
          RemoveFraction = new RemovalFractions(IntermediateWheatgrass.Organs);
        }
        [EventSubscribe("DoManagement")]
        private void OnDoManagement(object sender, EventArgs e)
        {
          if (Clock.Today.Date == HarvestDate)
          {
            RemoveFraction.SetFractionToRemove("Leaf", 0.80);
            RemoveFraction.SetFractionToRemove("Stem", 0.50);
            RemoveFraction.SetFractionToResidue("leaf",0.05);
            IntermediateWheatgrass.Harvest(RemoveFraction);
          }
        }
         </code></pre>
        The RemovalFractions class can be sent with Harvest, Cut, Graze, or Prune events. All parameters are optional, defaults are used whenever any value is not specified.

        ### Crop termination
        To fully terminate a crop the EndCrop event should be raised:
        <pre><code class='language-cs'>
         IntermediateWheatgrass.EndCrop();
        </code></pre>
        Once a crop has been ended the field is open to be used by another APSIM plant model, or another perennial grain crop.  Note that ending perennial grain is not necessary before sowing another crop, competition for resources will take place between crops when there is more than one in the field.
      Phenology
        AddFunction StageToZadok
          LinearInterpolationFunction StageToZadokXY
            XYPairs: X=[1, 2, 3, 4, 4.2, 4.9, 5, 6, 7, 8]; Y=[0, 5, 5, 25, 27, 29, 35, 50, 70, 90]
            VariableReference XValue: VariableName=[Phenology].Stage
          Constant StageToZadokAdjust: FixedValue=0
        Vernalisation: StartStage=Emergence; EndStage=Induction; ResetStage=Ripening
          Memo Description
            Vernalisation is the process whereby the plant acquires the ability to go into reproductive phase after been exposed to a period of time at low temperatures . For chicory the temperature range for vernalisation is between 0 and 12oC, with optimum about 4-6oC
          SubDailyInterpolation VernalisingDays: agregationMethod=0
            XYPairs Response: X=[0, 5, 5.5, 6, 7]; Y=[1, 1, 1, 0.5, 0]
            ThreeHourAirTemperature InterpolationMethod
          SubDailyInterpolation DevernalisingDays: agregationMethod=0
            XYPairs Response: X=[0, 15, 35, 40]; Y=[0, 0, 0, 1]
            ThreeHourAirTemperature InterpolationMethod
          Constant DaysToStabilise: FixedValue=35; Units=days
        Memo Description
          The duration of each phenological phase in perennial grain is controlled either by the accumulation of thermal time or photoperiod.
        SubDailyInterpolation ThermalTime: agregationMethod=0
          Memo Description
            The thermal time is used to control many of the phenological changes in perennial grain.  It is calculated using the daily average temperature and three parameters, or cardinal temperatures: minimum, maximum, and optimum.  Plant development accelerates as temperature increases from minimum to optimum and slows down after that, ceasing completely at maximum temperature.
          XYPairs Response: X=[0, 30, 35, 40]; Y=[0, 30, 0, 0]
          ThreeHourAirTemperature InterpolationMethod
        SubDailyInterpolation ThermalStress: agregationMethod=0
          Memo Description: same as Replacements.IntermediateWheatgrass.Phenology.ThermalTime.Description
          XYPairs Response: X=[0, 28, 30, 40]; Y=[0, 0, 5, 10]
          ThreeHourAirTemperature InterpolationMethod
          Constant ThermalStressThreshold: FixedValue=70
        Constant FWThreshold: FixedValue=0.3
        Constant FWProgress: FixedValue=1
        PhotoperiodFunction Photoperiod: Twilight=-6; DayLength=0
        PhotoperiodDeltaFunction PhotoperiodVariation: Twilight=-6
        GerminatingPhase Germinating: Start=Sowing; End=Germination; IsEmerged=false
          Memo Description
            Following default PMF behaviour, perennial grain germination will occur one day after sowing, provided that the amount of soil extractable water is greater than zero.
          Constant MinSoilTemperature: FixedValue=-2
          PhotoperiodDeltaFunction PhotoperiodVariation: Twilight=-6
        EmergingPhase Emerging: Start=Germination; End=Emergence; IsEmerged=false; TTForTimeStep=0
          Memo Description
            Both temperature and depth of seed are important factors.
          VariableReference ThermalTime: VariableName=[Phenology].ThermalTime
          AddFunction Target
            Constant ShootLag: FixedValue=100
            MultiplyFunction DepthxRate
              VariableReference SowingDepth: VariableName=[Plant].SowingData.Depth
                VariableReference SowingDepth: VariableName=[Plant].SowingData.Depth
              Constant ShootRate: FixedValue=1.5
        GenericPhase Vernalising: Start=Emergence; End=Induction; IsEmerged=true
          Memo Description
            During this phase, perennial grain plants allocates new biomass to only leaf+petiole, stems, and root+taproot organs. Initially, this phase starts when plants emerge, but it is also triggered as phenology resets after the end of the reproductive phase.  The vegetative phase ends when the inductive phase starts.
            perennial grain is a long day species, with flowering starting in spring when day light is increasing
          Constant Target: FixedValue=8; Units=oCd
          VariableReference Progression: VariableName=[Phenology].Vernalisation.TodaysVernalisation
        GenericPhase Inducing: Start=Induction; End=StemElongation; IsEmerged=true
          Memo Description
            During this phase the perennial grain plants await for the environmental cue to start the reproductive growth.  Physiologic and metabolic processes remain the same as for the vegetative phase with plants allocating biomass to leaf+petiole, stems, and root+taproot organs.  As perennial grain requires long days for flowering, the trigger to end this phase is defined by the length of day, or more spcifically by the increase in daily photoperiod.  The plants need a few days under favourable conditions, photoperiod increasing and greater than a threshold, to start the reproductive phase.
          Constant Target: FixedValue=13; Units=days
          LessThanFunction Progression
            VariableReference PhotoperiodVariation: VariableName=[Phenology].PhotoperiodVariation
            Constant Zero: FixedValue=0
            Constant NoProgression: FixedValue=0
            LinearInterpolationFunction SomeProgression
              XYPairs: X=[10, 11, 12, 13, 14]; Y=[0, 0, 0, 0, 1]
              VariableReference XValue: VariableName=[Phenology].Photoperiod
        GenericPhase Reproductive: Start=StemElongation; End=Flowering; IsEmerged=true
          Memo Description
            During this phase the plant is partitioning biomass to all organs, including reproductive organs.
          Constant Target: FixedValue=700; Units=oCd
          MultiplyFunction Progression
            VariableReference ThermalTime: VariableName=[Phenology].ThermalTime
            SubDailyInterpolation FT: agregationMethod=0
              XYPairs Response: X=[0, 30, 33, 40]; Y=[1, 1, 1, 0]
              ThreeHourAirTemperature InterpolationMethod
            VariableReference FWPhen: VariableName=[Leaf].FW
            Constant ProgressionFactor: FixedValue=1
        GenericPhase GrainFilling: Start=Flowering; End=Ripening; IsEmerged=true
          Memo Description
            During this phase the plant is partitioning biomass to all organs, including reproductive organs.
          Constant Target: FixedValue=400; Units=oCd
          VariableReference Progression: VariableName=[Phenology].ThermalTime
        GenericPhase Maturing: Start=Ripening; End=Mature; IsEmerged=true
          Memo Description
            During this phase the plant is partitioning biomass to all organs, including reproductive organs.
          Constant Target: FixedValue=400; Units=oCd
          VariableReference Progression: VariableName=[Phenology].ThermalTime
        EndPhase Harvest: Start=Mature; End=Rewind; IsEmerged=true
        GotoPhase: Start=Rewind; IsEmerged=true; PhaseNameToGoto=Vernalising; RemovalType=2
          Memo Description
            At the end of reproductive phase, phenology is reset to 'Vegetative'.
      OrganArbitrator Arbitrator
        BiomassTypeArbitrator DMArbitration
          Folder PotentialPartitioningMethods
            ReallocationMethod
            AllocateFixationMethod
            RetranslocationMethod
            SendPotentialDMAllocationsMethod
          Folder AllocationMethods
            NutrientConstrainedAllocationMethod
            DryMatterAllocationsMethod
          RelativeAllocation ArbitrationMethod
            Memo Description
              Controls the allocation of biomass to each of the plant's organs. Partition is based on:
        BiomassTypeArbitrator NArbitration
          Folder PotentialPartitioningMethods
            ReallocationMethod
          Folder ActualPartitioningMethods
            AllocateFixationMethod
            RetranslocationMethod
          Folder AllocationMethods
            NitrogenAllocationsMethod
          RelativeAllocation ArbitrationMethod
            Memo Description
              Controls the allocation of N to each of the plant's organs. Partition is based on:
          AllocateUptakesMethod
        WaterUptakeMethod
        NitrogenUptakeMethod
      SimpleLeaf Leaf: Albedo=0.18; Gsmax350=0.015; R50=150; LeafInitialisationStage=Emergence; Height=0; BaseHeight=0; Width=0; FRGR=0; PotentialEP=0; WaterDemand=0; KDead=0; LAIDead=0
        Memo Description
          __Note:__ this organ represents all the leaves in the plant, it has only a basic representation of canopy structure and does not distinguish leaves for ages or placement in the canopy.
        MultiplyFunction InitialWt
          Memo Description
            It is assumed that approximately 1/3 of the seed biomass is allocated to shoot upon emergence.  The weight of perennial grain seeds varies.
          Constant InitialOrganWt: FixedValue=0.015; Units=g/plant
          VariableReference Population: VariableName=[Plant].Population
        Constant CarbonConcentration: FixedValue=0.4
          Memo Description
            This is the default value for PMF.
        Constant MinimumNConc: FixedValue=0.0275; Units=gN/gDM
          Memo Description
            This is the lowest N concentration that leaves can have and still be able to grow.  It represents the N content for structural tissues and is the concentration of dead material.
        Constant CriticalNConc: FixedValue=0.05; Units=gN/gDM
          Memo Description
            This is the N concentration that the organ must have to perform its functions without limitations; a growth penalty will occurr if N level fall below this threshold.  No values have been clearly identifyied for this parameter in perennial grain, thus typical values for non-stressed plants are used instead.
        Constant MaximumNConc: FixedValue=0.06; Units=gN/gDM
          Memo Description
            This represents the maximum limit for N concentration in leaves.  The N content above CriticalNConc is not essential for growth and can be remobilised for new growth when uptake is insuficient.
        Constant NitrogenDemandSwitch: FixedValue=1
        RUEModel Photosynthesis
          Memo Description
            It is assumed the photosynthetesis rate of perennial grain is similar to wheat
          Constant RUE: FixedValue=1.5; Units=g/MJ
          RUECO2Function FCO2: PhotosyntheticPathway=C3
          LinearInterpolationFunction FN
            XYPairs: X=[0, 1, 1.5]; Y=[0, 1, 1]
            VariableReference XValue: VariableName=[Leaf].FNmetabolic
          WeightedTemperatureFunction FT: MaximumTemperatureWeighting=0.75
            XYPairs: X=[-5, 0, 25, 35, 40]; Y=[0, 1, 1, 1, 0.5]
          LinearInterpolationFunction FW
            XYPairs: X=[0, 0.5, 1]; Y=[0, 1, 1]
            VariableReference XValue: VariableName=[Leaf].Fw
          LinearInterpolationFunction FVPD
            XYPairs: X=[0, 10, 40]; Y=[1, 1, 0]
            VariableReference XValue: VariableName=[Leaf].Photosynthesis.VPD
          VariableReference RadnInt: VariableName=[Leaf].RadiationIntercepted
        DivideFunction FRGR
          Memo Description
            This parameter represents the Fractional Growth Rate.  It is needed by the MicroClimate model, where it is used to compute the effect of growth rate on transpiration.
          VariableReference Photosynthesis: VariableName=[Leaf].Photosynthesis
          MultiplyFunction PotentialPhotosynthesis
            VariableReference RUE: VariableName=[Leaf].Photosynthesis.RUE
            MaximumFunction Radiation
              VariableReference RadnInt: VariableName=[Leaf].RadiationIntercepted
              Constant MinRadn: FixedValue=1e-05
        Constant StomatalConductanceCO2Modifier: FixedValue=1
        PhaseLookup TargetBiomassProportion
          Memo note
            This is the 'ideal' proportion of biomass for this organ within the above ground biomass (not total).
          PhaseLookupValue VegetativeInductive: Start=Emergence; End=Flowering
            Constant TargetProportion: FixedValue=0.8; Units=g/g
          PhaseLookupValue Reproductive: Start=Flowering; End=Ripening
            Constant TargetProportion: FixedValue=0.3
        NutrientDemandFunctions DMDemands
          MultiplyFunction Structural
            Constant StructuralFraction: FixedValue=0.95; Units=g/g
              Memo Description
                This is the default value for PMF.
            MaximumFunction DMDemandFunction
              Memo Description
                The DM demand as defined here is a weighting factor, actual values are computed by the OrganArbitrator. The value is computed as the sum of a base demand, simply based on the potential partition according to the target proportions, and a deficit demand, which diverts more biomass to organs that deviate from their targeted proportions. This ensures faster regrowth of above ground organs after defoliation. The target proportion may vary with growth stage and environmental conditions.
              Constant Zero: FixedValue=0
              AddFunction OrganDMDemand
                Memo Description: same as Replacements.IntermediateWheatgrass.Leaf.DMDemands.Structural.DMDemandFunction.Description
                PartitionFractionDemandFunction BaseBiomassDemand
                  MultiplyFunction PartitionFraction
                    VariableReference TargetAboveGroundProp: VariableName=[TargetAboveGroundFraction]
                    VariableReference TargetOrganProp: VariableName=[Leaf].TargetBiomassProportion
                SubtractFunction DeficitBiomassDemand
                  MultiplyFunction TargetBiomass
                    VariableReference TargetAboveGroundProp: VariableName=[TargetAboveGroundFraction]
                    VariableReference TargetOrganProp: VariableName=[Leaf].TargetBiomassProportion
                    VariableReference TotalBiomass: VariableName=[TotalLive].Wt
                  VariableReference CurrentBiomass: VariableName=[Leaf].Live.Wt
          Constant Metabolic: FixedValue=0
          StorageDMDemandFunction Storage
            SubtractFunction StorageFraction
              Constant One: FixedValue=1
              VariableReference StructuralFraction: VariableName=[Leaf].DMDemands.Structural.StructuralFraction
          Constant QStructuralPriority: FixedValue=1
          Constant QMetabolicPriority: FixedValue=1
          Constant QStoragePriority: FixedValue=1
        NutrientDemandFunctions NDemands
          MultiplyFunction Structural
            VariableReference MinNconc: VariableName=[Leaf].MinimumNConc
            VariableReference PotentialDMAllocation: VariableName=[Leaf].potentialDMAllocation.Structural
          MultiplyFunction Metabolic
            SubtractFunction MetabolicNconc
              VariableReference CritNconc: VariableName=[Leaf].CriticalNConc
              VariableReference MinNconc: VariableName=[Leaf].MinimumNConc
            VariableReference PotentialDMAllocation: VariableName=[Leaf].potentialDMAllocation.Structural
          StorageNDemandFunction Storage
            VariableReference NitrogenDemandSwitch: VariableName=[Leaf].NitrogenDemandSwitch
            VariableReference MaxNconc: VariableName=[Leaf].MaximumNConc
          Constant QStructuralPriority: FixedValue=1
          Constant QMetabolicPriority: FixedValue=1
          Constant QStoragePriority: FixedValue=1
        Constant DMConversionEfficiency: FixedValue=1; Units=0-1
          Memo Description
            This is the default value for PMF.
        Constant MaintenanceRespiration: FixedValue=0; Units=0-1
          Memo Description
            This is the default value for PMF.
        MultiplyFunction Area
          Memo Description
            The leaf area index (LAI) for green leaves of perennial grain is defined based on their biomass and specific leaf area (SLA). The value for SLA is currently assumed to be constant, although factors such as age and environmental conditions (shading and nutrient status) should have an effect on this value.  Variations due to age can ignored because the model simulates a generic population, and thus it represents leaves of varing ages at the same time.
          Constant SpecificLeafArea: FixedValue=0.03; Units=m^2/g
          VariableReference LiveLeafWeight: VariableName=[Leaf].Live.Wt
        MultiplyFunction LaiDead
          Memo Description
            No specific data for area of dead leaves were found for perennial grain. The value of SLA is thus assumed to be the same as that of live leaves (this is consistent for the model as very little biomass reallocation of biomass occurs during senescence).
          VariableReference SpecificLeafArea: VariableName=[Leaf].Area.SpecificLeafArea
          VariableReference DeadLeafWeight: VariableName=[Leaf].Dead.Wt
        MultiplyFunction ExtinctionCoefficient
          Constant VegetativePhase: FixedValue=0.5
          LinearInterpolationFunction DevelopmentFactor
            XYPairs: X=[5, 5.7, 6, 7, 8]; Y=[1, 1, 1.2, 1.4, 1.4]
            Memo
              Exntiction coefficient increases at stem extension as leaves become more prostrate
            VariableReference XValue: VariableName=[Phenology].Stage
        Constant ExtinctionCoefficientDead: FixedValue=0.1; Units=0-1
        LinearInterpolationFunction HeightFunction
          XYPairs: X=[3, 4, 5, 6]; Y=[10, 200, 200, 1500]
          VariableReference XValue: VariableName=[Phenology].Stage
        MultiplyFunction SenescenceRate
          Memo Description
            Perennial grain has similar senescence to wheat and other grains
          Constant ReferenceRate: FixedValue=0.05; Units=/day
          LinearInterpolationFunction StageFactor
            XYPairs: X=[3, 4, 5, 5.7, 6, 9]; Y=[1, 1, 1, 1.1, 1.2, 1.3]
            VariableReference XValue: VariableName=[Phenology].Stage
          LinearInterpolationFunction CoverFactor
            XYPairs: X=[3, 4, 5, 6]; Y=[0.1, 0.1, 0.1, 0.1]
            VariableReference XValue: VariableName=[Leaf].LAI
          WeightedTemperatureFunction TemperatureFactor: MaximumTemperatureWeighting=0.5
            XYPairs: X=[-20, -5, 0, 5, 17, 28, 37.5]; Y=[1.5, 0.25, 0.1, 0.1, 1, 1, 1.5]
          LinearInterpolationFunction SoilMoistureFactor
            XYPairs: X=[0, 0.5, 1]; Y=[2, 1, 1]
            VariableReference XValue: VariableName=[Leaf].Fw
        MultiplyFunction DetachmentRate
          Memo Description
            A generic relationship between detachment and soil moisture is assumed.  It implies that under dry conditions the detachment rate decreases due to the lower level of activity of decomposing microorganisms.
          Constant ReferenceRate: FixedValue=0.1; Units=/day
          LinearInterpolationFunction SoilMoistureFactor
            XYPairs: X=[0, 0.5, 1]; Y=[0.5, 0.5, 1]
            VariableReference XValue: VariableName=[Leaf].Fw
        Constant DMRetranslocationFactor: FixedValue=0; Units=/day
        Constant DMReallocationFactor: FixedValue=1
          Memo Description
            This is the default value for PMF.
        Constant NReallocationFactor: FixedValue=1; Units=/day
          Memo Description
            This is the default value for PMF.
        MultiplyFunction NRetranslocationFactor
          Memo Description
            A generic relationship between retranslocation and environmental factors is assumed, this is done so that retranslocation is enhanced when conditions are good for growth. Retranslocation from leaves is enable any time.
          Constant ReferenceRate: FixedValue=0.1; Units=/day
          WeightedTemperatureFunction TemperatureFactor: MaximumTemperatureWeighting=0.5
            XYPairs: X=[0, 2, 7.5, 15, 18, 26, 33, 35]; Y=[0, 0, 0.15, 0.7, 1, 1, 0.1, 0]
          LinearInterpolationFunction SoilMoistureFactor
            XYPairs: X=[0, 0.5, 1]; Y=[0, 1, 1]
            VariableReference XValue: VariableName=[Leaf].Fw
        Constant RemobilisationCost: FixedValue=0
          Memo Description
            This is the default value for PMF.
        BiomassRemoval BiomassRemovalDefaults: HarvestFractionLiveToRemove=0.6; HarvestFractionDeadToRemove=0.7; HarvestFractionLiveToResidue=0.2; HarvestFractionDeadToResidue=0.2
      GenericOrgan Stem: IsAboveGround=true
        LinearInterpolationFunction SenescenceRate
          XYPairs: X=[3, 4, 5, 6, 7, 8, 9]; Y=[0, 0, 0, 0, 0, 0.1, 0.2]
          VariableReference XValue: VariableName=[Phenology].Stage
        Constant RemobilisationCost: FixedValue=0
        LinearInterpolationFunction MaximumNConc
          XYPairs: X=[3, 4, 5, 6, 7, 8, 9]; Y=[0.07, 0.04, 0.04, 0.015, 0.012, 0.012, 0.012]
          VariableReference XValue: VariableName=[Phenology].Stage
        Constant MinimumNConc: FixedValue=0.0025
        PhaseLookupValue NitrogenDemandSwitch: Start=Emergence; End=Ripening
          Constant: FixedValue=1
        Constant NReallocationFactor: FixedValue=0
        PhaseLookup NRetranslocationFactor
          PhaseLookupValue VegetativeGrowth: Start=Emergence; End=StemElongation
            Constant Fraction: FixedValue=0
          PhaseLookupValue ReproductiveGrowth: Start=StemElongation; End=Mature
            Constant Fraction: FixedValue=0.5
        PhaseLookup DMRetranslocationFactor
          PhaseLookupValue VegetativeGrowth: Start=Emergence; End=Induction
            Constant DMRetranslocationFactor: FixedValue=0
          PhaseLookupValue ReproductiveGrowth: Start=StemElongation; End=Mature
            Constant DMRetranslocationFactor: FixedValue=0.5
        BiomassRemoval BiomassRemovalDefaults: HarvestFractionLiveToRemove=0.7; HarvestFractionDeadToRemove=0.7; HarvestFractionLiveToResidue=0.3; HarvestFractionDeadToResidue=0.3
        DivideFunction PercentWSC
          VariableReference WSC: VariableName=[Stem].Live.StorageWt
          VariableReference StemWt: VariableName=[Stem].Live.Wt
        Constant DetachmentRateFunction: FixedValue=0; Units=/d
        Constant MaintenanceRespirationFunction: FixedValue=0; Units=0-1
        Constant DMConversionEfficiency: FixedValue=1; Units=0-1
        Constant DMReallocationFactor: FixedValue=0
        AddFunction CriticalNConc
          VariableReference MinimumNConc: VariableName=[Stem].MinimumNConc
          MultiplyFunction MetabolicNconc
            SubtractFunction NonStructuralN
              VariableReference MaximumNConc: VariableName=[Stem].MaximumNConc
              VariableReference MinimumNConc: VariableName=[Stem].MinimumNConc
            Constant Proportion: FixedValue=0.5
        Constant CarbonConcentration: FixedValue=0.4
        NutrientDemandFunctions DMDemands
          MultiplyFunction Structural
            PartitionFractionDemandFunction DMDemandFunction
              PhaseLookup PartitionFraction
                PhaseLookupValue PreStemElongation: Start=Emergence; End=Induction
                  Constant StemFraction: FixedValue=0.2
                PhaseLookupValue StemElongation: Start=StemElongation; End=Flowering
                  Constant StemFraction: FixedValue=0.7; Units=0
                PhaseLookupValue EarEmergence: Start=Ripening; End=Mature
                  Constant StemFraction: FixedValue=0
            PhaseLookup StructuralFraction
              PhaseLookupValue VegetativeGrowth: Start=Emergence; End=StemElongation
                Constant Fraction: FixedValue=0.3
              PhaseLookupValue ReproductiveGrowth: Start=StemElongation; End=Ripening
                Constant Fraction: FixedValue=0.04
          Constant Metabolic: FixedValue=0
          StorageDMDemandFunction Storage
            SubtractFunction StorageFraction
              Constant One: FixedValue=1
              VariableReference StructuralFraction: VariableName=[Stem].DMDemands.Structural.StructuralFraction
          Constant QStructuralPriority: FixedValue=1
          Constant QMetabolicPriority: FixedValue=1
          Constant QStoragePriority: FixedValue=1
        NutrientDemandFunctions NDemands
          MultiplyFunction Structural
            VariableReference MinNconc: VariableName=[Stem].minimumNconc
            VariableReference PotentialDMAllocation: VariableName=[Stem].potentialDMAllocation.Structural
          MultiplyFunction Metabolic
            SubtractFunction MetabolicNconc
              VariableReference CritNconc: VariableName=[Stem].criticalNConc
              VariableReference MinNconc: VariableName=[Stem].minimumNconc
            VariableReference PotentialDMAllocation: VariableName=[Stem].potentialDMAllocation.Structural
          StorageNDemandFunction Storage
            VariableReference NitrogenDemandSwitch: VariableName=[Stem].nitrogenDemandSwitch
            VariableReference MaxNconc: VariableName=[Stem].maximumNconc
          Constant QStructuralPriority: FixedValue=1
          Constant QMetabolicPriority: FixedValue=1
          Constant QStoragePriority: FixedValue=1
        RetranslocateNonStructural RetranslocateNitrogen
        NutrientPoolFunctions InitialWt
          Constant Structural: FixedValue=0; Units=g/m^2
          Constant Metabolic: FixedValue=0
          Constant Storage: FixedValue=0
        Constant Photosynthesis: FixedValue=0
        VariableReference initialNConcFunction: VariableName=[Stem].MinimumNConc
      ReproductiveOrgan Grain: GrowthRespiration=0; MaintenanceRespiration=0; RipeStage=Ripe
        Biomass Live
        Biomass Dead
        HoldFunction NumberFunction: WhenToHold=Flowering
          MultiplyFunction GrainNumber
            Constant GrainsPerGramOfStem: FixedValue=15; Units=grains
            VariableReference StemMass: VariableName=[StemPlusSpike].Wt
        Constant DMConversionEfficiency: FixedValue=1
        Constant RemobilisationCost: FixedValue=0
        Constant InitialGrainProportion: FixedValue=0.1
        Constant MaximumPotentialGrainSize: FixedValue=0.02; Units=g
        PhaseLookup DMDemandFunction
          PhaseLookupValue PreFlowering: Start=Sowing; End=Induction
            Constant Demand: FixedValue=0
          PhaseLookupValue GrainGrowthPhase: Start=Flowering; End=Mature
            MinimumFunction Rate
              MultiplyFunction Actual
                PhaseLookup PotentialRate
                  PhaseLookupValue InitialPhase: Start=Flowering; End=Ripening
                    DivideFunction Rate
                      MultiplyFunction PotentialSizeIncrease
                        VariableReference InitialProportion: VariableName=[Grain].InitialGrainProportion
                        VariableReference MaximumSize: VariableName=[Grain].MaximumPotentialGrainSize
                      VariableReference FillingDuration: VariableName=[Phenology].Maturing.Target
                  PhaseLookupValue LinearPhase: Start=Ripening; End=Mature
                    DivideFunction Rate
                      MultiplyFunction PotentialSizeIncrease
                        SubtractFunction ProportionLinearPhase
                          Constant One: FixedValue=1
                          VariableReference InitialProportion: VariableName=[Grain].InitialGrainProportion
                        VariableReference MaximumSize: VariableName=[Grain].MaximumPotentialGrainSize
                      VariableReference FillingDuration: VariableName=[Phenology].Maturing.Target
                VariableReference ThermalTime: VariableName=[Phenology].ThermalTime
                VariableReference NumberFunction: VariableName=[Grain].NumberFunction
              MultiplyFunction Maximum
                MaximumFunction RemainingGrowth
                  Constant Zero: FixedValue=0
                  SubtractFunction Difference
                    VariableReference MaxSize: VariableName=[Grain].MaximumPotentialGrainSize
                    VariableReference CurrentSize: VariableName=[Grain].Size
                VariableReference NumberFunction: VariableName=[Grain].NumberFunction
        PhaseLookup NFillingRate
          PhaseLookupValue PreFlowering: Start=Sowing; End=Flowering
            Constant Demand: FixedValue=0
          PhaseLookupValue GrainGrowthPhase: Start=Flowering; End=Mature
            MultiplyFunction Demand
              DivideFunction Rate
                Constant PotentialKernalN: FixedValue=0.0011; Units=g
                AddFunction FillingDuration
                  VariableReference EarlyFillingDuration: VariableName=[Phenology].GrainFilling.Target
                  VariableReference GrainFillingDuration: VariableName=[Phenology].Maturing.Target
              VariableReference ThermalTime: VariableName=[Phenology].ThermalTime
              VariableReference NumberFunction: VariableName=[Grain].NumberFunction
        Constant MinimumNConc: FixedValue=0.0123
        Constant MaxNConcDailyGrowth: FixedValue=0.035
        Constant MaximumNConc: FixedValue=0.0463
        Constant WaterContent: FixedValue=0.12
        AccumulateFunction AccumThermalTime: StartStageName=Flowering; EndStageName=Mature; ResetStageName=Emergence; FractionRemovedOnCut=0; FractionRemovedOnHarvest=0; FractionRemovedOnGraze=0; FractionRemovedOnPrune=0
          VariableReference DailyThermalTimeValue: VariableName=[Phenology].ThermalTime
        ExpressionFunction Protein
          Expression=divide(([Grain].Live.N + [Grain].Dead.N),([Grain].Live.Wt + [Grain].Dead.Wt)) * 100 * 5.71
        BiomassRemoval BiomassRemovalDefaults: HarvestFractionLiveToRemove=1; HarvestFractionDeadToRemove=1; HarvestFractionLiveToResidue=0; HarvestFractionDeadToResidue=0
        Constant CarbonConcentration: FixedValue=0.4
        NutrientPoolFunctions DMDemandPriorityFactors
          Constant Structural: FixedValue=1
          Constant Metabolic: FixedValue=1
          Constant Storage: FixedValue=1
        NutrientPoolFunctions NDemandPriorityFactors: same as Replacements.IntermediateWheatgrass.Grain.DMDemandPriorityFactors
        DivideFunction NperKernal
          VariableReference GrainN: VariableName=[Grain].N
          VariableReference GrainNumber: VariableName=[Grain].NumberFunction
      GenericOrgan Spike: IsAboveGround=true
        Constant NReallocationFactor: FixedValue=0
        Constant RemobilisationCost: FixedValue=0
        PhaseLookup NRetranslocationFactor
          PhaseLookupValue EarlyGrowth: Start=Emergence; End=Flowering
            Constant ValueDuringEarlyGrowth: FixedValue=0
          PhaseLookupValue ReproductiveGrowth: Start=Ripening; End=Mature
            Constant ValueDuringGrainFill: FixedValue=0.5
        LinearInterpolationFunction MaximumNConc
          XYPairs: X=[3, 4, 5, 5.5, 6.5, 7, 8]; Y=[0.01, 0.01, 0.01, 0.01, 0.025, 0.025, 0.025]
          VariableReference XValue: VariableName=[Phenology].Stage
        Constant MinimumNConc: FixedValue=0.004
        BiomassRemoval BiomassRemovalDefaults: HarvestFractionLiveToRemove=0.9; HarvestFractionDeadToRemove=0.8; HarvestFractionLiveToResidue=0.1; HarvestFractionDeadToResidue=0.2
        PhaseLookupValue NitrogenDemandSwitch: Start=Emergence; End=Flowering
          Constant: FixedValue=1
        PhaseLookup DMRetranslocationFactor
          PhaseLookupValue VegetativeGrowth: Start=Emergence; End=Flowering
            Constant DMRetranslocationFactor: FixedValue=0
          PhaseLookupValue ReproductiveGrowth: Start=Ripening; End=Mature
            Constant DMRetranslocationFactor: FixedValue=0.5
        Constant DetachmentRateFunction: FixedValue=0; Units=/d
        Constant MaintenanceRespirationFunction: FixedValue=0; Units=0-1
        Constant DMConversionEfficiency: FixedValue=1; Units=0-1
        Constant DMReallocationFactor: FixedValue=0
        AddFunction CriticalNConc
          VariableReference MinimumNConc: VariableName=[Spike].MinimumNConc
          MultiplyFunction MetabolicNconc
            SubtractFunction NonStructuralN
              VariableReference MaximumNConc: VariableName=[Spike].MaximumNConc
              VariableReference MinimumNConc: VariableName=[Spike].MinimumNConc
            Constant Proportion: FixedValue=0.8
        LinearInterpolationFunction SenescenceRate
          XYPairs: X=[3, 4, 5, 6, 7, 8]; Y=[0.07, 0.04, 0.04, 0.015, 0.012, 0.012]
          VariableReference XValue: VariableName=[Phenology].Stage
        Constant CarbonConcentration: FixedValue=0.4
        NutrientDemandFunctions DMDemands
          MultiplyFunction Structural
            PartitionFractionDemandFunction DMDemandFunction
              LinearInterpolationFunction PartitionFraction
                XYPairs: X=[5, 6, 6.01, 8, 9]; Y=[0, 0.01, 0.9, 0, 0]
                VariableReference XValue: VariableName=[Phenology].Stage
            PhaseLookup StructuralFraction
              PhaseLookupValue VegetativeGrowth: Start=Emergence; End=StemElongation
                Constant StructuralFractionEG: FixedValue=0
              PhaseLookupValue ReproductiveGrowth: Start=Flowering; End=Mature
                Constant StructuralFractionGF: FixedValue=0.5
          Constant Metabolic: FixedValue=0
          StorageDMDemandFunction Storage
            SubtractFunction StorageFraction
              Constant One: FixedValue=1
              VariableReference StructuralFraction: VariableName=[Spike].DMDemands.Structural.StructuralFraction
          Constant QStructuralPriority: FixedValue=1
          Constant QMetabolicPriority: FixedValue=1
          Constant QStoragePriority: FixedValue=1
        NutrientDemandFunctions NDemands
          MultiplyFunction Structural
            VariableReference MinNconc: VariableName=[Spike].minimumNconc
            VariableReference PotentialDMAllocation: VariableName=[Spike].potentialDMAllocation.Structural
          MultiplyFunction Metabolic
            SubtractFunction MetabolicNconc
              VariableReference CritNconc: VariableName=[Spike].criticalNConc
              VariableReference MinNconc: VariableName=[Spike].minimumNconc
            VariableReference PotentialDMAllocation: VariableName=[Spike].potentialDMAllocation.Structural
          StorageNDemandFunction Storage
            VariableReference NitrogenDemandSwitch: VariableName=[Spike].nitrogenDemandSwitch
            VariableReference MaxNconc: VariableName=[Spike].maximumNconc
          Constant QStructuralPriority: FixedValue=1
          Constant QMetabolicPriority: FixedValue=1
          Constant QStoragePriority: FixedValue=1
        RetranslocateNonStructural RetranslocateNitrogen
        NutrientPoolFunctions InitialWt: same as Replacements.IntermediateWheatgrass.Stem.InitialWt
        Constant Photosynthesis: FixedValue=0
        VariableReference initialNConcFunction: VariableName=[Spike].MinimumNConc
      Root: GrowthRespiration=0; MaintenanceRespiration=0
        RootShapeCylinder RootShape
        Constant DMConversionEfficiency: FixedValue=1
        Constant RemobilisationCost: FixedValue=0
        Constant KLModifier: FixedValue=1
        Constant SoilWaterEffect: FixedValue=1
        Constant MaxDailyNUptake: FixedValue=20
        Constant SenescenceRate: FixedValue=0.005
        Constant MaximumRootDepth: FixedValue=1000000
        Constant MaximumNConc: FixedValue=0.01
        Constant MinimumNConc: FixedValue=0.01
        PhaseLookupValue NitrogenDemandSwitch: Start=Germination; End=Mature
          Constant: FixedValue=1
        BiomassRemoval BiomassRemovalDefaults (disabled): HarvestFractionLiveToRemove=0; HarvestFractionDeadToRemove=0; HarvestFractionLiveToResidue=0.2; HarvestFractionDeadToResidue=0
        Constant KNO3: FixedValue=0.02
        Constant KNH4: FixedValue=0.01
        Constant SpecificRootLength: FixedValue=105; Units=m/g
        MultiplyFunction RootFrontVelocity
          PhaseLookup PotentialRootFrontVelocity
            PhaseLookupValue PreEmergence: Start=Germination; End=Emergence
              Constant Value: FixedValue=5; Units=mm/d
            PhaseLookupValue PostEmergence: Start=Emergence; End=Ripening
              Constant Value: FixedValue=20; Units=mm/d
          WeightedTemperatureFunction TemperatureFactor: MaximumTemperatureWeighting=0.5
            XYPairs: X=[0, 15, 25, 35]; Y=[0, 1, 1, 0]
          LinearInterpolationFunction WaterFactor
            SoilWaterScale XValue: LLModel=0
            XYPairs: X=[0, 0.25, 1]; Y=[0, 1, 1]
        MinimumFunction NUptakeSWFactor
          SoilWaterScale: LLModel=1
          Constant One: FixedValue=1
        Constant CarbonConcentration: FixedValue=0.4
        Constant MaintenanceRespirationFunction: FixedValue=0
        NutrientDemandFunctions DMDemands
          MultiplyFunction Structural
            PartitionFractionDemandFunction DMDemandFunction
              PhaseLookup PartitionFraction
                PhaseLookupValue PreEmergence: Start=Germination; End=Emergence
                  Constant Value: FixedValue=0
                PhaseLookupValue PreFlowering: Start=Emergence; End=Flowering
                  LinearInterpolationFunction AgeFactor
                    XYPairs: X=[3, 5, 6]; Y=[0.5, 0.2, 0.2]
                    VariableReference XValue: VariableName=[Phenology].Stage
                PhaseLookupValue PostFlowering: Start=Flowering; End=Mature
                  Constant Value: FixedValue=0.2
            Constant StructuralFraction: FixedValue=1
          Constant Metabolic: FixedValue=0
          StorageDMDemandFunction Storage
            SubtractFunction StorageFraction
              Constant One: FixedValue=1
              VariableReference StructuralFraction: VariableName=[Root].DMDemands.Structural.StructuralFraction
          Constant QStructuralPriority: FixedValue=1
          Constant QMetabolicPriority: FixedValue=1
          Constant QStoragePriority: FixedValue=1
        NutrientDemandFunctions NDemands
          MultiplyFunction Structural
            VariableReference MinNconc: VariableName=[Root].minimumNconc
            VariableReference PotentialDMAllocation: VariableName=[Root].potentialDMAllocation.Structural
          MultiplyFunction Metabolic
            SubtractFunction MetabolicNconc
              VariableReference CritNconc: VariableName=[Root].criticalNConc
              VariableReference MinNconc: VariableName=[Root].minimumNconc
            VariableReference PotentialDMAllocation: VariableName=[Root].potentialDMAllocation.Structural
          StorageNDemandFunction Storage
            VariableReference NitrogenDemandSwitch: VariableName=[Root].nitrogenDemandSwitch
            VariableReference MaxNconc: VariableName=[Root].maximumNconc
          Constant QStructuralPriority: FixedValue=1
          Constant QMetabolicPriority: FixedValue=1
          Constant QStoragePriority: FixedValue=1
        VariableReference CriticalNConc: VariableName=[Root].MinimumNConc
        NutrientPoolFunctions InitialWt
          Constant Structural: FixedValue=0.005; Units=g/plant
          Constant Metabolic: FixedValue=0
          Constant Storage: FixedValue=0
      CompositeBiomass AboveGround: OrganNames=[Leaf, Stem, Spike, Grain]; IncludeLive=true; IncludeDead=true
      CompositeBiomass StemPlusSpike: OrganNames=[Stem, Spike]; IncludeLive=true; IncludeDead=true
      CompositeBiomass AboveGroundLive: OrganNames=[Leaf, Stem, Spike, Grain]; IncludeLive=true; IncludeDead=false
      CompositeBiomass AboveGroundDead: OrganNames=[Leaf, Stem, Spike, Grain]; IncludeLive=false; IncludeDead=true
      CompositeBiomass BelowGround: OrganNames=[Root]; IncludeLive=true; IncludeDead=true
      CompositeBiomass TotalLive: OrganNames=[Leaf, Stem, Spike, Grain, Root]; IncludeLive=true; IncludeDead=false
      CompositeBiomass Total: OrganNames=[Leaf, Stem, Spike, Grain, Root]; IncludeLive=true; IncludeDead=true
      LinearInterpolationFunction DeltaAnnualDayLength
        XYPairs
          X=[-60.561, -60, -58, -56, -53, -50, -45, -40, -35, -30, -20, -10, 0, 10, 20, 30, 35, 40, 45, 50, 53, 56, 58, 60, 60.561]
          Y=[8.16263, 7.22844, 6.23534, 5.57804, 4.82687, 4.2383, 3.47239, 2.87562, 2.37888, 1.94128, 1.21059, 0.58553637, 0, 0.58553637, 1.21059, 1.94128, 2.37888, 2.87562, 3.47239, 4.2383, 4.82687, 5.57804, 6.23534, 7.22844, 8.16263]
        Memo
          This is the variation in day length within a year (i.e. the length of longest day minus that of the shortest).  It could, or should, be computed functions in 'Weather' as it is a function of latitude, but due to the lack of an accessor, a fitted function is used instead.  The value is used to generalise the computations of the target partitioning of new growth to above ground organs.
        VariableReference XValue: VariableName=[Weather].Latitude
      Constant SeedMortalityRate: FixedValue=0
      Constant MortalityRate: FixedValue=0
      PhaseLookup TargetAboveGroundFraction
        Memo Description
          The model attempts to keep the proportion of the plant biomass above and below ground at a given value.  The 'target' value is the 'ideal' relative proportion of biomass above and below ground for the plant at a given growth phase.  The approach used here mimics the allocation pattern in strongly taprooted forages (e.g. [Teixeira2008DMPartition]).  In spring, nearly all biomass is allocated to above ground organs, with the proportion reducing as the length of day increases.  In summer-autumn the allocation evenly distributed amoung all organs, favouring the replenishment of below ground reserves ([Evans1973RootShoot]; [HeichelEtAl1985]).
          The approach used in the IntermediateWheatgrass model is based on that used for describing biomass partitioning in lucerne ([Teixeira2008DMPartition]), which was parameterised for Lincoln, NZ, only.  This was generalised by assuming that miminum and maximum allocations are a function of the annual variation in day length (which is a function of latitude).  Thus, the variation in allocation to above ground organs is small in the tropics and reaches a maximum near the polar circle.  This function allows for smooth transition between seasons and describe the general pattern sensibly, but it should be revised when more data becomes available.
        PhaseLookupValue AllPhases: Start=Emergence; End=Ripening
          LessThanFunction TargetAboveGroundAllocation
            VariableReference PhotoperiodVariation: VariableName=[Phenology].PhotoperiodVariation
            Constant Zero: FixedValue=0
            VariableReference BaseAllocationFraction: VariableName=[LowerAllocationFractionAboveG]
            AddFunction VariableAllocationFraction
              VariableReference BaseAllocationFraction: VariableName=[LowerAllocationFractionAboveG]
              MultiplyFunction AdditionalAllocation
                SubtractFunction DeltaAllocation
                  VariableReference MaximumAllocationFraction: VariableName=[UpperAllocationFractionAboveG]
                  VariableReference MinimumAllocationFraction: VariableName=[LowerAllocationFractionAboveG]
                SubtractFunction DayLengthFactor
                  Constant One: FixedValue=1
                  PowerFunction PowerFactor: Exponent=2.5
                    DivideFunction BaseFactor
                      MaximumFunction Nominator
                        Constant Zero: FixedValue=0
                        SubtractFunction PhotoDev
                          PhotoperiodFunction PhotoPeriod: Twilight=0; DayLength=0
                          SubtractFunction Deviation
                            Constant Noon: FixedValue=12; Units=hours
                            VariableReference DeltaDayLength: VariableName=[DeltaAnnualDayLength]
                      MultiplyFunction Denominator
                        Constant Two: FixedValue=2
                        VariableReference DeltaDayLength: VariableName=[DeltaAnnualDayLength]
      MaximumFunction LowerAllocationFractionAboveG
        Memo
          This is the lower limit for biomass allocation in above ground organs, assumed to be a function of latitude.
        Constant MinimumAllocation: FixedValue=0.4; Units=g/g
        SubtractFunction EstimatedAllocation
          Constant MedianAllocation: FixedValue=0.75; Units=g/g
          MultiplyFunction LatitudeFactor
            LessThanFunction AbsLatitude
              VariableReference Latitude: VariableName=[Weather].Latitude
              Constant Zero: FixedValue=0
              MultiplyFunction SouthLatitude
                Constant MinusOne: FixedValue=-1
                VariableReference Latitude: VariableName=[Weather].Latitude
              VariableReference NorthLatitude: VariableName=[Weather].Latitude
            DivideFunction Variation
              SubtractFunction DeltaAllocation
                VariableReference MedianAllocation
                  VariableName=[LowerAllocationFractionAboveG].EstimatedAllocation.MedianAllocation
                VariableReference MinimumAllocation: VariableName=[LowerAllocationFractionAboveG].MinimumAllocation
              Constant ReferenceLatitude: FixedValue=65; Units=degrees
      MinimumFunction UpperAllocationFractionAboveG
        Memo
          This is the upper limit for biomass allocation in above ground organs, assumed to be a function of latitude.  It is the values used for partitioning growth in early spring.
        Constant MaximumAllocation: FixedValue=0.99; Units=g/g
        AddFunction EstimatedAllocation
          VariableReference MedianAllocation
            VariableName=[LowerAllocationFractionAboveG].EstimatedAllocation.MedianAllocation
          MultiplyFunction LatitudeFactor
            LessThanFunction AbsLatitude: same as Replacements.IntermediateWheatgrass.LowerAllocationFractionAboveG.EstimatedAllocation.LatitudeFactor.AbsLatitude
            DivideFunction Variation
              SubtractFunction DeltaAllocation
                VariableReference MaximumAllocation: VariableName=[UpperAllocationFractionAboveG].MaximumAllocation
                VariableReference MedianAllocation
                  VariableName=[LowerAllocationFractionAboveG].EstimatedAllocation.MedianAllocation
              Constant ReferenceLatitude: FixedValue=50; Units=degrees
      Folder Cultivars
        Cultivar Kernza
          Memo Description
            Kernza Intermediate Wheatgrass for testing perennial grains model
        Cultivar KernzaExampleWithParams
          Command:
            [Leaf].Photosynthesis.FT.XYPairs.X = 0,4,9,15,18.5,27,35,37.5
            [Leaf].Photosynthesis.FT.XYPairs.Y = 0,0,0.15,0.6,1,1,0.1,0
            [Leaf].NRetranslocationFactor.TemperatureFactor.XYPairs.X = 0,4,9,15,18.5,27,35,37.5
            [Leaf].NRetranslocationFactor.TemperatureFactor.XYPairs.Y = 0,0,0.15,0.6,1,1,0.1,0
            [Phenology].Inductive.Target.FixedValue = 10
            [Phenology].Inductive.Progression.SomeProgression.XYPairs.X = 13,14,14,14
            [Phenology].Reproductive.Target.FixedValue = 2000
          Memo Description
            Kernza Intermediate Wheatgrass for testing perennial grains model
        Cultivar Kernza-LI4
          Command=[Leaf].TargetBiomassProportion.Reproductive.TargetProportion.FixedValue = 0.3
          Memo Description
            Kernza Intermediate Wheatgrass for testing perennial grains model
        Cultivar Kernza-LI3
          Command=[Leaf].TargetBiomassProportion.Reproductive.TargetProportion.FixedValue = 0.31
          Memo Description
            Kernza Intermediate Wheatgrass for testing perennial grains model
        Cultivar Kernza-LI2
          Command=[Leaf].TargetBiomassProportion.Reproductive.TargetProportion.FixedValue = 0.32
          Memo Description
            Kernza Intermediate Wheatgrass for testing perennial grains model
        Cultivar Kernza-LI1
          Command=[Leaf].TargetBiomassProportion.Reproductive.TargetProportion.FixedValue = 0.33
          Memo Description
            Kernza Intermediate Wheatgrass for testing perennial grains model
  DataStore
    ExcelInput Observed: FileNames=[Observed.xlsx]; SheetNames=[Observed-IWG]
    PredictedObserved: PredictedTableName=Report; ObservedTableName=Observed-IWG; FieldNameUsedForMatch=Date; FieldName2UsedForMatch=SimulationName; AllColumns=false
      Tests: POName=PredictedObserved
        AcceptedStatsName=Name n Slope Intercept SEslope SEintercept R2 RMSE NSE ME MAE RSR
  Folder Parameterisation
    Simulation Innes2024a
      Clock: Start=2022-01-01; End=2024-05-28
      Weather: FileName=Cowra.met
      Summary summaryfile
      SoilArbitrator Soil Arbitrator
      Zone Field: Area=1; Slope=0; AspectAngle=0; Altitude=50
        MicroClimate: a_interception=0; b_interception=1; c_interception=0; d_interception=0; SoilHeatFluxFraction=0.4; MinimumHeightDiffForNewLayer=0; NightInterceptionFraction=0.5; ReferenceHeight=2
        Irrigation
        Fertiliser
        SurfaceOrganicMatter: InitialResidueName=grass; InitialResidueType=grass; InitialResidueMass=1000; InitialStandingFraction=0; InitialCPR=0; InitialCNR=30
        Plant IntermediateWheatgrass
        Soil Synthetic Soil Derived from ISRIC SoilGrids: ASCOrder=NA; ASCSubOrder=NA; SoilType=Haplic Luvisols; Site=NA; NearestTown=NA; Region=NA; State=NA; Country=Australia; NaturalVegetation=NA; ApsoilNumber=9999; Latitude=-33.875; Longitude=148.625; LocationAccuracy=+- 250 m; YearOfSampling=2019; DataSource=ISRIC SoilGrids
          Water: Thickness=[150, 150, 150, 150, 200, 200, 200, 200, 300, 300]; FilledFromTop=true
            InitialValues=[0.19, 0.2, 0.217, 0.232, 0.237, 0.233, 0.23, 0.23, 0.23, 0.23]
          Physical
            Thickness  ParticleSizeSand  ParticleSizeSilt  ParticleSizeClay  Rocks  BD     AirDry  LL15   DUL    SAT    KS
            150        58.7              20.7              21.3              0      1.422  0.063   0.19   0.285  0.42   29.571
            150        54.5              19.5              26.5              0      1.49   0.067   0.2    0.29   0.405  16.24
            150        49                18.5              33.2              0      1.529  0.072   0.217  0.3    0.4    7.422
            150        45                17.5              37.8              0      1.543  0.077   0.232  0.307  0.4    4.404
            200        43                17                40                0      1.555  0.079   0.237  0.31   0.4    3.392
            200        43                17                40                0      1.565  0.077   0.233  0.31   0.4    3.392
            200        43                17.1              40                0      1.569  0.077   0.23   0.31   0.4    3.392
            200        43                17.3              40                0      1.567  0.077   0.23   0.31   0.4    3.392
            300        43                17.6              40                0      1.565  0.077   0.23   0.31   0.4    3.392
            300        43                17.8              40                0      1.561  0.077   0.23   0.31   0.4    3.392
            Rocks source: Calculated
            SoilCrop IntermediateWheatgrassSoil
              LL=[0.151, 0.146, 0.129, 0.111, 0.08, 0.077, 0.085, 0.082, 0.23, 0.23]
              KL=[0.12, 0.11, 0.08, 0.05, 0.02, 0.005, 0, 0, 0.06, 0.06]
              XF=[1, 1, 1, 1, 1, 1, 1, 1, 1, 1]
              LL, KL, XF source: Calculated (layer 9, 10)
          WaterBalance SoilWater: SummerDate=1-nov; SummerU=6; SummerCona=6; WinterDate=1-apr; WinterU=2; WinterCona=2; DiffusConst=3656.42; DiffusSlope=9.71; Salb=0.13; CN2Bare=73; CNRed=20; CNCov=0; DischargeWidth=5; CatchmentArea=10; PSIDul=-100; Thickness=[150, 150, 150, 150, 200, 200, 200, 200, 300, 300]
            SWCON=[0.424, 0.368, 0.278, 0.215, 0.148, 0.148, 0.148, 0.148, 0.106, 0.106]
          Organic: FOMCNRatio=40; CarbonUnits=Total
            Thickness  Carbon  SoilCNRatio  FBiom  FInert  FOM
            150        1.374   8.2          0.04   0.194   60.644
            150        0.836   8.2          0.031  0.305   48.4252
            150        0.443   8.2          0.014  0.561   38.6683
            150        0.319   8.2          0.01   0.772   30.8773
            200        0.24    8.2          0.01   0.99    22.8745
            200        0.203   8.2          0.01   0.99    16.9458
            200        0.176   8.2          0.01   0.99    12.5538
            200        0.158   8.2          0.01   0.99    9.30006
            300        0.136   8.2          0.01   0.99    5.92998
            300        0.11    8.2          0.01   0.99    3.78112
          Chemical: Thickness=[150, 150, 150, 150, 200, 200, 200, 200, 300, 300]; PH=[6.3, 6.45, 6.7, 6.9, 7.08, 7.23, 7.32, 7.36, 7.41, 7.47]; PHUnits=Water
          Nutrient
          Solute NO3: Thickness=[150, 150, 150, 150, 200, 200, 200, 200, 300, 300]; InitialValues=[0, 0, 0, 0, 0, 0, 0, 0, 0, 0]; InitialValuesUnits=ppm; WaterTableConcentration=0; D0=0; DepthConstant=0; MaxDepthSoluteAccessible=0; RunoffEffectivenessAtMovingSolute=0; MaxEffectiveRunoff=0
          Solute NH4: same as Parameterisation.Innes2024a.Field.Synthetic Soil Derived from ISRIC SoilGrids.NO3
          Solute Urea: Thickness=[150, 150, 150, 150, 200, 200, 200, 200, 300, 300]; InitialValues=[0, 0, 0, 0, 0, 0, 0, 0, 0, 0]; InitialValuesUnits=kg/ha; WaterTableConcentration=0; D0=0; DepthConstant=0; MaxDepthSoluteAccessible=0; RunoffEffectivenessAtMovingSolute=0; MaxEffectiveRunoff=0
          SoilTemperature Temperature
        Operations IrrigationSchedule
          2022-05-20  [Irrigation].Apply(amount: 7, efficiency: 0.8)
          2022-06-20  [Irrigation].Apply(amount: 7, efficiency: 0.8)
          2022-07-20  [Irrigation].Apply(amount: 7, efficiency: 0.8)
        Manager HarvestingRule
```csharp
using System;
using Models.Core;
using Models.Interfaces;
using Models.PMF;
using APSIM.Shared.Utilities;

namespace Models
{
    [Serializable]
    public class Script : Model
    {
        [Link] IClock Clock;
        [Link] ISummary Summary;
        [Link] IPlant crop;
        
        private bool harvestWhenRipe = true;

        [EventSubscribe("DoManagement")]
        private void DoDailyCalculations(object sender, EventArgs e)
        {
            // Called once per day
            if (crop.IsReadyForHarvesting && harvestWhenRipe)
            {  
               	Summary.WriteMessage(this, "Debug** IsReadyForHarvesting:Harvest Crop", MessageType.Diagnostic);
               	//crop.Harvest();
            }
        }
    }
}
```
        Report: EventNames=[Clock].EndOfDay
          VariableNames:
            [Clock].Today as Date
            [IntermediateWheatgrass].Population
            [IntermediateWheatgrass].PlantType
            [IntermediateWheatgrass].Leaf.RadiationIntercepted as InterceptedRadiation
            [IntermediateWheatgrass].AboveGround.Wt*10 as totalBiomass
            [IntermediateWheatgrass].BelowGround.Wt*10 as Roots
            [IntermediateWheatgrass].Leaf.Live.NConc
            [IntermediateWheatgrass].Leaf.LAI*100
            [IntermediateWheatgrass].Leaf.Live.Wt*10 as LeavesWeight
            [IntermediateWheatgrass].Stem.Live.Wt*10 as StemsWeight
            [IntermediateWheatgrass].Spike.Live.Wt*10 as SpikesWeight
            [IntermediateWheatgrass].Grain.Live.Wt*10 as GrainWeight
            [IntermediateWheatgrass].Root.Live.Wt*10 as RootsWeight
            [IntermediateWheatgrass].Leaf.Senesced.Wt*10 as LeavesDeadWeight
            [IntermediateWheatgrass].Stem.Senesced.Wt*10 as StemsDeadWeight
            [IntermediateWheatgrass].Spike.Senesced.Wt*10 as SpikesDeadWeight
            [IntermediateWheatgrass].Phenology.CurrentStageName
            [IntermediateWheatgrass].Phenology.CurrentPhaseName
            [IntermediateWheatgrass].Phenology.Stage
            [Phenology].Vernalisation.TodaysVernalisation*100
            LeavesWeight+LeavesDeadWeight+StemsWeight+StemsDeadWeight+SpikesWeight+SpikesDeadWeight+GrainWeight as AboveGndBiomass
            [Phenology].StageToZadok
            [IntermediateWheatgrass].Phenology.AccumulatedTT
            [IntermediateWheatgrass].Phenology.ThermalStress
            [Leaf].Fw
            [Leaf].Fn
            [Phenology].Reproductive.Progression
            [Phenology].ThermalTime
        Operations Sowing
          2022-05-22  [IntermediateWheatgrass].Sow(population: 50, cultivar: "Kernza", depth: 20, rowSpacing: 150)
          2022-05-18  [Fertiliser].Apply(amount: 75, type: "DAP", depth: 10)
          2023-02-05  [IntermediateWheatgrass].Harvest()
          2024-02-09  [IntermediateWheatgrass].Harvest()
        Manager PhenologyRulesDAS
```csharp
using Models.Soils;
using System;
using System.Linq;
using Models.Core;
using Models.PMF;
using Models.PMF.Interfaces;

using APSIM.Shared.Utilities;
using Models.Surface;
using Models.Utilities;
using Models.Soils.Nutrients;
using Models.Interfaces;
using Models.PMF.Organs;
using Models.PMF.Library;
using Models.PMF.Phen;
using Newtonsoft.Json;
using Models.DCAPST.Interfaces;
using Models.Functions;

namespace Models
{
    [Serializable]
    public class Script : Model
    {
        [Link] private Clock clock;
        [Link] private IPlant crop;      
        [Link] private Summary Summary;
        [Link] private SimpleLeaf leaf;
        [Link] private BiomassRemoval biomassRemoval;
        [Link] private Phenology phenology;
        [Link] private Plant IntermediateWheatgrass;
        [Link] private Zone zone;
        

		[Link(ByName=true)] private SubDailyInterpolation ThermalStress;
		[Link(ByName=true)] private Constant ThermalStressThreshold;
		[Link(ByName=true)] private LinearInterpolationFunction FW;
		[Link(ByName=true)] private Constant FWThreshold;
		[Link(ByName=true)] private VariableReference FWPhen;

        private double leafFracToRemove = 0.05;
        private double leafFracToResidue = 0.05;
        private double leafDeadToRemove = 0.0;
        private double leafDeadToResidue = 0.0;
        private double stemFracToRemove = 0.05;
        private double stemFracToResidue = 0.05;
        private double stemDeadToRemove = 0.0;
        private double stemDeadToResidue = 0.0;
        private double grainFracToRemove = 0.0;
        private double grainFracToResidue = 0.0;
        private double grainDeadToRemove = 0.0;
        private double grainDeadToResidue = 0.0;
        private double rootFracToRemove = 0.0;
        private double rootFracToResidue = 0.0;
        private double rootDeadToRemove = 0.0;
        private double rootDeadToResidue = 0.0;
        private double spikeFracToRemove = 0.0;
        private double spikeFracToResidue = 0.0;
        private double spikeDeadToRemove = 0.0;
        private double spikeDeadToResidue = 0.0;
      
        private double accumulatedTempStress = 0;   
        private bool writeToSummary = true;
        private bool harvestWhenRipe = true;
        
        //Delayed plantings of perennials in the fall can result in stand mortality and subsequent reductions
        //in biomass yields the year following seeding (Hall, 1995)
        private bool delayedGermination = false;
        
  		private enum Stage { Sowing, Germinating, Emerging, Vernalising, Inducing, Reproductive, GrainFilling, Maturing, Harvest, GotoPhase }
        
        [EventSubscribe("EndOfDay")]      
        private void OnDoManagementCalculations(object sender, EventArgs e)
        {
        	Summary.WriteMessage(this,phenology.CurrentPhaseName, MessageType.Diagnostic);

            // The following code is designed to capture the effects of temperature stress on the early reproductive stages
            // of a perennial grain. If the acummualted temperature are above a designated threshold, and there is water stress,
            // then consider the reproductive organs have suffered ireversable damage and rewind to the vernalising/vegetative stage
            //
            if (phenology.CurrentPhaseName == "Reproductive")
            { 
            	double tempStress = ThermalStress.Value();
            	double stressThreshold = ThermalStressThreshold.Value();
            	double waterStress = FWPhen.Value();
            	double wsThreshold = FWThreshold.Value();
               	
               	accumulatedTempStress += tempStress;
                 
            	Summary.WriteMessage(this, "accumulatedTempStress = "+ accumulatedTempStress, MessageType.Diagnostic);
            	Summary.WriteMessage(this, "stressThreshold = "+ stressThreshold, MessageType.Diagnostic);
            	Summary.WriteMessage(this, "waterStress = "+ waterStress, MessageType.Diagnostic);
            	Summary.WriteMessage(this, "watereStressThreshold = "+ wsThreshold, MessageType.Diagnostic);
            	
            	if((accumulatedTempStress > stressThreshold)&&(waterStress < wsThreshold))
            	{           	              	
                	phenology.SetToStage((double)Stage.Vernalising);
               		Summary.WriteMessage(this, "Debug** Set to Vernalising Stage", MessageType.Diagnostic);
               		accumulatedTempStress = 0;
               		Summary.WriteMessage(this, "accumulatedTempStress = "+accumulatedTempStress+" FW="+waterStress, MessageType.Diagnostic);
               	}
            }
            
            if (phenology.CurrentPhaseName == "GrainRipening")
            {   
                accumulatedTempStress = 0;
                Summary.WriteMessage(this, "Maturing: accumulatedTempStress = "+ accumulatedTempStress, MessageType.Diagnostic); 
            }
        }
        
        [EventSubscribe("EndOfDay")]
        private void OnEndOfDay(object sender, EventArgs e)
        {
            Summary.WriteMessage(this, "PhaseName = "+ phenology.CurrentPhaseName + " population = " + IntermediateWheatgrass.Population, MessageType.Diagnostic);
            if (phenology.CurrentPhaseName == "Emerging")
            {
                if (IntermediateWheatgrass.DaysAfterSowing > 30)
                {  
                    delayedGermination = true;
                }
            }    
                    
            if (delayedGermination)
            {
                // set removal fractions (these override the default removals in the plant)
                // Actually do the biomass removal
           	    var Leaf = IntermediateWheatgrass.FindChild<IHasDamageableBiomass>("Leaf");
                var Stem = IntermediateWheatgrass.FindChild<IHasDamageableBiomass>("Stem");
           	    var Grain = IntermediateWheatgrass.FindChild<IHasDamageableBiomass>("Grain");
           	    var Root = IntermediateWheatgrass.FindChild<IHasDamageableBiomass>("Root");
                var Spike = IntermediateWheatgrass.FindChild<IHasDamageableBiomass>("Spike");
               
           	    Leaf.RemoveBiomass(leafFracToRemove, leafDeadToRemove, leafFracToResidue, leafDeadToResidue);
           	    Stem.RemoveBiomass(stemFracToRemove, stemDeadToRemove, stemFracToResidue, stemDeadToResidue);
           	    Grain.RemoveBiomass(grainFracToRemove, grainDeadToRemove, grainFracToResidue, grainDeadToResidue);
           	    Root.RemoveBiomass(rootFracToRemove, rootDeadToRemove, rootFracToResidue, rootDeadToResidue);
           	    Spike.RemoveBiomass(spikeFracToRemove, spikeDeadToRemove, spikeFracToResidue, spikeDeadToResidue);
                                   
                Summary.WriteMessage(this, "Debug** RemoveBiomass", MessageType.Diagnostic);      
            }             
        }    
    }
}
```
        Manager BiomassRemovalRule
          leafFracToRemove = 0.7
          leafDeadToRemove = 0.7
          leafFracToResidue = 0
          leafDeadToResidue = 0
          stemFracToRemove = 0.7
          stemDeadToRemove = 0.7
          stemFracToResidue = 0
          stemDeadToResidue = 0
          grainFracToRemove = 1
          grainDeadToRemove = 1
          grainFracToResidue = 0
          grainDeadToResidue = 0
          spikeFracToRemove = 1
          spikeDeadToRemove = 1
          spikeFracToResidue = 0
          spikeDeadToResidue = 0
          rootFracToRemove = 0
          rootDeadToRemove = 0
          rootFracToResidue = 0
          rootDeadToResidue = 0
```csharp
using Models.Soils;
using System;
using System.Linq;
using Models.Core;
using Models.PMF;
using Models.PMF.Interfaces;

using APSIM.Shared.Utilities;
using Models.Surface;
using Models.Utilities;
using Models.Soils.Nutrients;
using Models.Interfaces;
using Models.PMF.Organs;
using Models.PMF.Library;
using Models.PMF.Phen;
using Newtonsoft.Json;


namespace Models
{
    [Serializable]

    public class Script : Model
    {
        [Link] private Clock clock;
        [Link] private IPlant crop;      
        [Link] private Summary summary;
        [Link] private SimpleLeaf leaf;
        [Link] private BiomassRemoval biomassRemoval;
        [Link] private Phenology phenology;
        [Link] private Plant IntermediateWheatgrass;
                
		[Description("    Live leaf fraction to remove from the field     ")]
		public double leafFracToRemove { get; set; } = 1.0;
		[Description("    Dead leaf fraction to remove from the field     ")]
		public double leafDeadToRemove { get; set; } = 1.0;
		[Description("    Live leaf fraction to residue     ")]
		public double leafFracToResidue { get; set; } = 0;
		[Description("    Dead leaf fraction to residue     ")]
		public double leafDeadToResidue { get; set; } = 0;		
	
 		[Description("    Live stem fraction to remove from the field     ")]
		public double stemFracToRemove { get; set; } = 1.0;
		[Description("    Dead stem fraction to remove from the field     ")]
		public double stemDeadToRemove { get; set; } = 1.0;
		[Description("    Live stem fraction to residue     ")]
		public double stemFracToResidue { get; set; } = 0;
		[Description("    Dead stem fraction to residue     ")]
		public double stemDeadToResidue { get; set; } = 0;		
	
 		[Description("    Live grain fraction to remove from the field     ")]
		public double grainFracToRemove { get; set; } = 1.0;
		[Description("    Dead grain fraction to remove from the field     ")]
		public double grainDeadToRemove { get; set; } = 1.0;
		[Description("    Live grain fraction to residue     ")]
		public double grainFracToResidue { get; set; } = 0;
		[Description("    Dead grain fraction to residue     ")]
		public double grainDeadToResidue { get; set; } = 0;		
	
 		[Description("    Live spike fraction to remove from the field     ")]
		public double spikeFracToRemove { get; set; } = 1.0;
		[Description("    Dead spike fraction to remove from the field     ")]
		public double spikeDeadToRemove { get; set; } = 1.0;
		[Description("    Live spike fraction to residue     ")]
		public double spikeFracToResidue { get; set; } = 0;
		[Description("    Dead spike fraction to residue     ")]
		public double spikeDeadToResidue { get; set; } = 0;		
	
  		[Description("    Live root fraction to remove from the field     ")]
		public double rootFracToRemove { get; set; } = 0;
		[Description("    Dead root fraction to remove from the field     ")]
		public double rootDeadToRemove { get; set; } = 0;
		[Description("    Live root fraction to residue     ")]
		public double rootFracToResidue { get; set; } = 0;
		[Description("    Dead root fraction to residue     ")]
		public double rootDeadToResidue { get; set; } = 0;		
     
        private bool writeToSummary = true;
        
  		private enum Stage { Sowing, Germination, Emergence, Induction, StemElongation, Flowering, 
  		Ripening, Mature, Rewind }
        
 
        [EventSubscribe("Cutting")]      
        private void OnDoCutting(object sender, EventArgs e)
        {
                             
           	// set removal fractions (these override the default removals in the plant)
            // Actually do the biomass removal
           	var Leaf = IntermediateWheatgrass.FindChild<IHasDamageableBiomass>("Leaf");
            var Stem = IntermediateWheatgrass.FindChild<IHasDamageableBiomass>("Stem");
           	var Grain = IntermediateWheatgrass.FindChild<IHasDamageableBiomass>("Grain");
           	var Root = IntermediateWheatgrass.FindChild<IHasDamageableBiomass>("Root");
            var Spike = IntermediateWheatgrass.FindChild<IHasDamageableBiomass>("Spike");
               
           	Leaf.RemoveBiomass(leafFracToRemove, leafDeadToRemove, leafFracToResidue, leafDeadToResidue);
           	Stem.RemoveBiomass(stemFracToRemove, stemDeadToRemove, stemFracToResidue, stemDeadToResidue);
           	Grain.RemoveBiomass(grainFracToRemove, grainDeadToRemove, grainFracToResidue, grainDeadToResidue);
           	Root.RemoveBiomass(rootFracToRemove, rootDeadToRemove, rootFracToResidue, rootDeadToResidue);
           	Spike.RemoveBiomass(spikeFracToRemove, spikeDeadToRemove, spikeFracToResidue, spikeDeadToResidue);
                                   
            summary.WriteMessage(this, "Debug** RemoveBiomass", MessageType.Diagnostic);                              
        }
    }
}
```
    Simulation Innes2024b
      Clock: Start=2022-01-01; End=2024-06-28
      Summary summaryfile
      Weather: FileName=pittsworth.met
      SoilArbitrator Soil Arbitrator
      Zone Field: Area=1; Slope=0; AspectAngle=0; Altitude=50
        MicroClimate: a_interception=0; b_interception=1; c_interception=0; d_interception=0; SoilHeatFluxFraction=0.4; MinimumHeightDiffForNewLayer=0; NightInterceptionFraction=0.5; ReferenceHeight=2
        Irrigation
        Fertiliser
        SurfaceOrganicMatter: InitialResidueName=grass; InitialResidueType=grass; InitialResidueMass=1000; InitialStandingFraction=0; InitialCPR=0; InitialCNR=30
        Plant IntermediateWheatgrass
        Operations IrrigationSchedule
          2022-06-20  [Irrigation].Apply(amount: 7, efficiency: 0.8)
          2022-07-20  [Irrigation].Apply(amount: 7, efficiency: 0.8)
          2022-08-20  [Irrigation].Apply(amount: 7, efficiency: 0.8)
        Manager HarvestingRule: same as Parameterisation.Innes2024a.Field.HarvestingRule
        Soil Synthetic Soil Derived from the SLGA1: ASCOrder=NA; ASCSubOrder=NA; SoilType=Silty Clay Loam over Clay; Site=21261_46362; NearestTown=PITTSWORTH; Region=Brigalow Belt South; State=Queensland; NaturalVegetation=Cleared, non-native vegetation, buildings; ApsoilNumber=9999; Latitude=-27.7179; Longitude=151.635; LocationAccuracy=+- 90m; YearOfSampling=2024; Comments=Landuse is Urban residential
          DataSource=Soil and Landscape Grid of Australia. This soil parameter file was automatically generated from the GSM National Surfaces using pedotransfer functions.
          Water: Thickness=[150, 150, 150, 150, 200, 200, 200]; FilledFromTop=false
            InitialValues=[0.411049, 0.410515, 0.416494, 0.414463, 0.409385, 0.403573, 0.399156]
          Physical
            Thickness  ParticleSizeSand  ParticleSizeSilt  ParticleSizeClay  Rocks  BD       AirDry     LL15      DUL       SAT       KS
            150        5                 65                30                0      1.22704  0.0830275  0.249083  0.411049  0.491987  5.39585
            150        5                 65                30                0      1.27511  0.0875388  0.262616  0.410515  0.484295  2.49692
            150        5                 65                30                0      1.29241  0.0906574  0.271972  0.416494  0.48275   1.6772
            150        5                 65                30                0      1.30599  0.0907856  0.272357  0.414463  0.478938  1.53352
            200        5                 65                30                0      1.31978  0.0909302  0.27279   0.409385  0.47519   1.38187
            200        5                 65                30                0      1.33276  0.0908799  0.27264   0.403573  0.471416  1.27841
            200        5                 65                30                0      1.34291  0.0903161  0.270948  0.399156  0.467752  1.28222
            Rocks, ParticleSizeSand, ParticleSizeSilt, ParticleSizeClay source: Calculated
            SoilCrop IntermediateWheatgrassSoil
              LL=[0.258801, 0.27149, 0.280596, 0.280176, 0.27935, 0.27788, 0.275053]
              KL=[0.06, 0.06, 0.0596733, 0.05502, 0.04802, 0.04002, 0.03202]
              XF=[1, 1, 1, 1, 1, 1, 1]
          WaterBalance SoilWater: SummerDate=1-nov; SummerU=6; SummerCona=6; WinterDate=1-apr; WinterU=2; WinterCona=2; DiffusConst=53.7587; DiffusSlope=30.1764; Salb=0.12; CN2Bare=78; CNRed=20; CNCov=0; DischargeWidth=10; CatchmentArea=3590.51; PSIDul=-100; Thickness=[150, 150, 150, 150, 200, 200, 200]
            SWCON=[0.263026, 0.172567, 0.13969, 0.1332, 0.0934826, 0.085081, 0.0844651]
          Organic: FOMCNRatio=40; CarbonUnits=Total
            Thickness  Carbon    SoilCNRatio  FBiom    FInert    FOM
            150        2.04661   11.234       0.04     0.323699  417.668
            150        1.24403   11.234       0.03106  0.529185  287.059
            150        0.909048  11.234       0.01404  0.721375  197.293
            150        0.75501   11.234       0.01     0.868652  135.597
            200        0.624345  11.234       0.01     0.992827  82.2438
            200        0.524882  11.234       0.01     1         49.8834
            200        0.475289  11.234       0.01     1         30.2558
          Chemical: Thickness=[150, 150, 150, 150, 200, 200, 200]; PHUnits=Water
            PH=[6.65654, 6.79558, 7.07455, 7.33577, 7.49076, 7.58085, 7.64926]
          Solute NO3: Thickness=[150, 150, 150, 150, 200, 200, 200]; InitialValues=[0, 0, 0, 0, 0, 0, 0]; InitialValuesUnits=ppm; WaterTableConcentration=0; D0=0; DepthConstant=0; MaxDepthSoluteAccessible=0; RunoffEffectivenessAtMovingSolute=0; MaxEffectiveRunoff=0
          Solute NH4: same as Parameterisation.Innes2024b.Field.Synthetic Soil Derived from the SLGA1.NO3
          Solute Urea: same as Parameterisation.Innes2024b.Field.Synthetic Soil Derived from the SLGA1.NO3
          Nutrient
          SoilTemperature
        Operations Sowing
          2022-06-20  [IntermediateWheatgrass].Sow(population: 50, cultivar: "Kernza", depth: 20, rowSpacing: 150)
          2022-06-20  [Fertiliser].Apply(amount: 100, type: "DAP", depth: 10)
          2022-06-20  [Fertiliser].Apply(amount: 100, type: "UreaN", depth: 10)
          2023-04-30  [IntermediateWheatgrass].Harvest()
          2024-03-15  [IntermediateWheatgrass].Harvest()
        Report: same as Parameterisation.Innes2024a.Field.Report
        Manager PhenologyRulesDAS: same as Parameterisation.Innes2024a.Field.PhenologyRulesDAS
        Manager BiomassRemovalRule: same as Parameterisation.Innes2024a.Field.BiomassRemovalRule
    Simulation Fernandez2020a
      Clock: Start=2014-01-01; End=2017-12-31
      Weather: FileName=Roseau2014.met
      Summary summaryfile
      SoilArbitrator Soil Arbitrator
      Zone Field: Area=1; Slope=0; AspectAngle=0; Altitude=50
        MicroClimate: a_interception=0; b_interception=1; c_interception=0; d_interception=0; SoilHeatFluxFraction=0.4; MinimumHeightDiffForNewLayer=0; NightInterceptionFraction=0.5; ReferenceHeight=2
        Irrigation
        Fertiliser
        SurfaceOrganicMatter: InitialResidueName=grass; InitialResidueType=grass; InitialResidueMass=1000; InitialStandingFraction=0; InitialCPR=0; InitialCNR=30
        Plant IntermediateWheatgrass
        Operations Sowing
          2014-08-28  [IntermediateWheatgrass].Sow(population: 145, cultivar: "Kernza", depth: 20, rowSpacing: 150)
          2015-04-14  [Fertiliser].Apply(amount: 100, type: "NH4NO3N", depth: 10)
          2016-05-10  [Fertiliser].Apply(amount: 70, type: "UreaN", depth: 10)
          2017-05-17  [Fertiliser].Apply(amount: 70, type: "UreaN", depth: 10)
          2015-09-05  [IntermediateWheatgrass].Harvest()
          2016-09-05  [IntermediateWheatgrass].Harvest()
          2017-09-05  [IntermediateWheatgrass].Harvest()
        Operations IrrigationSchedule (disabled)
          2022-05-20  [Irrigation].Apply(amount: 7, efficiency: 0.8)
          2022-06-20  [Irrigation].Apply(amount: 7, efficiency: 0.8)
          2022-07-20  [Irrigation].Apply(amount: 7, efficiency: 0.8)
          2022-09-20  [Irrigation].Apply(amount: 7, efficiency: 0.8)
          2022-10-20  [Irrigation].Apply(amount: 7, efficiency: 0.8)
          2022-11-20  [Irrigation].Apply(amount: 7, efficiency: 0.8)
          2022-12-20  [Irrigation].Apply(amount: 7, efficiency: 0.8)
          2022-01-20  [Irrigation].Apply(amount: 7, efficiency: 0.8)
          2022-02-20  [Irrigation].Apply(amount: 7, efficiency: 0.8)
          2022-03-20  [Irrigation].Apply(amount: 7, efficiency: 0.8)
          2022-04-20  [Irrigation].Apply(amount: 7, efficiency: 0.8)
          2022-05-20  [Irrigation].Apply(amount: 7, efficiency: 0.8)
          2022-06-20  [Irrigation].Apply(amount: 7, efficiency: 0.8)
          2022-07-20  [Irrigation].Apply(amount: 7, efficiency: 0.8)
          2022-08-20  [Irrigation].Apply(amount: 7, efficiency: 0.8)
        Manager HarvestingRule: same as Parameterisation.Innes2024a.Field.HarvestingRule
        Report: EventNames=[Clock].EndOfDay
          VariableNames:
            [Clock].Today as Date
            [IntermediateWheatgrass].Population
            [IntermediateWheatgrass].PlantType
            [IntermediateWheatgrass].Leaf.RadiationIntercepted as InterceptedRadiation
            [IntermediateWheatgrass].AboveGround.Wt*10 as totalBiomass
            [IntermediateWheatgrass].BelowGround.Wt*10 as Roots
            [IntermediateWheatgrass].Leaf.Live.NConc
            [IntermediateWheatgrass].Leaf.LAI*100
            [IntermediateWheatgrass].Leaf.Live.Wt*10 as LeavesWeight
            [IntermediateWheatgrass].Stem.Live.Wt*10 as StemsLiveWeight
            [IntermediateWheatgrass].Spike.Live.Wt*10 as SpikesWeight
            [IntermediateWheatgrass].Grain.Live.Wt*10 as GrainWeight
            [IntermediateWheatgrass].Root.Live.Wt*10 as RootsWeight
            [IntermediateWheatgrass].Leaf.Senesced.Wt*10 as LeavesDeadWeight
            [IntermediateWheatgrass].Stem.Senesced.Wt*10 as StemsDeadWeight
            [IntermediateWheatgrass].Spike.Senesced.Wt*10 as SpikesDeadWeight
            StemsLiveWeight+StemsDeadWeight as StemsWeight
            [IntermediateWheatgrass].Phenology.CurrentStageName
            [IntermediateWheatgrass].Phenology.CurrentPhaseName
            [IntermediateWheatgrass].Phenology.Stage
            [Phenology].Vernalisation.TodaysVernalisation*100
            LeavesWeight+LeavesDeadWeight+StemsWeight+StemsDeadWeight+SpikesWeight+SpikesDeadWeight+GrainWeight as AboveGndBiomass
            [Phenology].StageToZadok
            [IntermediateWheatgrass].Phenology.AccumulatedTT
            [IntermediateWheatgrass].Phenology.ThermalStress
            [Leaf].Fw
            [Leaf].Fn
            [Phenology].Reproductive.Progression
            [Phenology].ThermalTime
        Soil Synthetic Soil Derived from ISRIC SoilGrids: ASCOrder=NA; ASCSubOrder=NA; SoilType=Haplic Chernozems; Site=NA; NearestTown=NA; Region=NA; State=NA; Country=United States of America; NaturalVegetation=NA; ApsoilNumber=9999; Latitude=48.875; Longitude=-95.875; LocationAccuracy=+- 250 m; YearOfSampling=2019; DataSource=ISRIC SoilGrids
          Water: Thickness=[150, 150, 150, 150, 200, 200, 200, 200, 300, 300]; FilledFromTop=true
            InitialValues=[0.28, 0.26, 0.25, 0.25, 0.25, 0.25, 0.249, 0.247, 0.244, 0.241]
          Physical
            Thickness  ParticleSizeSand  ParticleSizeSilt  ParticleSizeClay  Rocks  BD     AirDry  LL15   DUL    SAT    KS
            150        48.3              24.7              28                0      1.042  0.093   0.28   0.413  0.548  13.646
            150        48.5              23.5              28                0      1.25   0.087   0.26   0.373  0.485  13.646
            150        48                23.5              28                0      1.321  0.083   0.25   0.358  0.465  13.646
            150        48                24.5              28                0      1.347  0.083   0.25   0.358  0.455  13.646
            200        47.2              25.2              28.3              0      1.37   0.083   0.25   0.356  0.448  13.256
            200        45.8              25.8              28.7              0      1.391  0.083   0.25   0.352  0.443  12.509
            200        44.9              26.1              29                0      1.403  0.083   0.249  0.349  0.44   12.152
            200        44.7              26.3              29                0      1.406  0.082   0.247  0.347  0.44   12.152
            300        44.5              26.6              29                0      1.411  0.081   0.244  0.344  0.44   12.152
            300        44.1              26.9              29                0      1.416  0.08    0.241  0.341  0.44   12.152
            Rocks source: Calculated
            SoilCrop WheatSoil
              LL=[0.28, 0.26, 0.251, 0.259, 0.271, 0.284, 0.295, 0.307, 0.321, 0.337]
              KL=[0.06, 0.06, 0.06, 0.055, 0.048, 0.04, 0.032, 0.024, 0.014, 0.003]
              XF=[1, 1, 1, 1, 1, 1, 1, 1, 1, 1]
            SoilCrop IntermediateWheatgrassSoil
              LL=[0.192, 0.17, 0.168, 0.171, 0.178, 0.187, 0.197, 0.208, 0.223, 0.239]
              KL=[0.06, 0.06, 0.06, 0.055, 0.048, 0.04, 0.032, 0.024, 0.014, 0.003]
              XF=[1, 1, 1, 1, 1, 1, 1, 1, 1, 1]
          WaterBalance SoilWater: SummerDate=1-may; SummerU=6; SummerCona=6; WinterDate=1-oct; WinterU=2; WinterCona=2; DiffusConst=1218.26; DiffusSlope=15.15; Salb=0.13; CN2Bare=73; CNRed=20; CNCov=0; DischargeWidth=5; CatchmentArea=10; PSIDul=-100; Thickness=[150, 150, 150, 150, 200, 200, 200, 200, 300, 300]
            SWCON=[0.312, 0.343, 0.351, 0.367, 0.323, 0.316, 0.311, 0.308, 0.24, 0.236]
          Organic: FOMCNRatio=40; CarbonUnits=Total
            Thickness  Carbon  SoilCNRatio  FBiom  FInert  FOM
            150        12.028  11.2         0.04   0.493   0
            150        8.707   11.2         0.031  0.568   0
            150        7.095   11.2         0.014  0.659   0
            150        5.536   11.2         0.01   0.828   0
            200        4.711   11.2         0.01   0.957   0
            200        4.577   11.2         0.01   0.97    0
            200        4.496   11.2         0.01   0.979   0
            200        4.466   11.2         0.01   0.983   0
            300        4.429   11.2         0.01   0.988   0
            300        4.384   11.2         0.01   0.99    0
          Chemical: Thickness=[150, 150, 150, 150, 200, 200, 200, 200, 300, 300]; PH=[7.1, 7.25, 7.48, 7.62, 7.7, 7.7, 7.71, 7.73, 7.76, 7.79]; PHUnits=Water
          Nutrient
          Solute NO3: same as Parameterisation.Innes2024a.Field.Synthetic Soil Derived from ISRIC SoilGrids.NO3
          Solute NH4: same as Parameterisation.Innes2024a.Field.Synthetic Soil Derived from ISRIC SoilGrids.NO3
          Solute Urea: same as Parameterisation.Innes2024a.Field.Synthetic Soil Derived from ISRIC SoilGrids.Urea
          SoilTemperature Temperature
        Manager PhenologyRulesDAS: same as Parameterisation.Innes2024a.Field.PhenologyRulesDAS
        Manager BiomassRemovalRule: same as Parameterisation.Innes2024a.Field.BiomassRemovalRule
    Simulation Fernandez2020b
      Clock: Start=2014-01-01; End=2017-12-31
      Weather: FileName=Roseau2014.met
      Summary summaryfile
      SoilArbitrator Soil Arbitrator
      Zone Field: Area=1; Slope=0; AspectAngle=0; Altitude=50
        MicroClimate: a_interception=0; b_interception=1; c_interception=0; d_interception=0; SoilHeatFluxFraction=0.4; MinimumHeightDiffForNewLayer=0; NightInterceptionFraction=0.5; ReferenceHeight=2
        Irrigation
        Fertiliser
        SurfaceOrganicMatter: InitialResidueName=grass; InitialResidueType=grass; InitialResidueMass=1000; InitialStandingFraction=0; InitialCPR=0; InitialCNR=30
        Plant IntermediateWheatgrass
        Operations Sowing
          2014-08-28  [IntermediateWheatgrass].Sow(population: 145, cultivar: "Kernza-LI4", depth: 20, rowSpacing: 150)
          2015-04-14  [Fertiliser].Apply(amount: 120, type: "NH4NO3N", depth: 10)
          2016-05-10  [Fertiliser].Apply(amount: 150, type: "UreaN", depth: 10)
          2017-05-17  [Fertiliser].Apply(amount: 150, type: "UreaN", depth: 10)
          2015-09-01  [IntermediateWheatgrass].Harvest()
          2016-09-01  [IntermediateWheatgrass].Harvest()
          2017-09-01  [IntermediateWheatgrass].Harvest()
        Operations IrrigationSchedule (disabled): same as Parameterisation.Fernandez2020a.Field.IrrigationSchedule
        Manager HarvestingRule: same as Parameterisation.Innes2024a.Field.HarvestingRule
        Report: same as Parameterisation.Fernandez2020a.Field.Report
        Soil Synthetic Soil Derived from ISRIC SoilGrids: same as Parameterisation.Fernandez2020a.Field.Synthetic Soil Derived from ISRIC SoilGrids
        Manager PhenologyRulesDAS: same as Parameterisation.Innes2024a.Field.PhenologyRulesDAS
        Manager BiomassRemovalRule: same as Parameterisation.Innes2024a.Field.BiomassRemovalRule
    Simulation Jungers2018
      Clock: Start=2014-06-01; End=2016-10-31
      Weather: FileName=StPaul2015.met
      Summary summaryfile
      SoilArbitrator Soil Arbitrator
      Zone Field: Area=1; Slope=0; AspectAngle=0; Altitude=50
        MicroClimate: a_interception=0; b_interception=1; c_interception=0; d_interception=0; SoilHeatFluxFraction=0.4; MinimumHeightDiffForNewLayer=0; NightInterceptionFraction=0.5; ReferenceHeight=2
        Irrigation
        Fertiliser
        SurfaceOrganicMatter: InitialResidueName=grass; InitialResidueType=grass; InitialResidueMass=1000; InitialStandingFraction=0; InitialCPR=0; InitialCNR=30
        Plant IntermediateWheatgrass
        Operations Sowing
          2014-09-05  [IntermediateWheatgrass].Sow(population: 50, cultivar: "Kernza", depth: 20, rowSpacing: 150)
          2015-08-04  [Fertiliser].Apply(amount: 120, type: "NH4NO3N", depth: 10)
          2016-07-29  [Fertiliser].Apply(amount: 120, type: "NH4NO3N", depth: 10)
          2015-08-05  [IntermediateWheatgrass].Harvest()
          2016-07-29  [IntermediateWheatgrass].Harvest()
        Operations IrrigationSchedule (disabled): same as Parameterisation.Fernandez2020a.Field.IrrigationSchedule
        Manager HarvestingRule: same as Parameterisation.Innes2024a.Field.HarvestingRule
        Soil Synthetic Soil Derived from ISRIC SoilGrids1: ASCOrder=NA; ASCSubOrder=NA; SoilType=Haplic Luvisols; Site=NA; NearestTown=NA; Region=NA; State=NA; Country=United States of America; NaturalVegetation=NA; ApsoilNumber=9999; Latitude=44.875; Longitude=-93.125; LocationAccuracy=+- 250 m; YearOfSampling=2019; DataSource=ISRIC SoilGrids
          Water: Thickness=[150, 150, 150, 150, 200, 200, 200, 200, 300, 300]; FilledFromTop=true
            InitialValues=[0.232, 0.215, 0.21, 0.21, 0.208, 0.203, 0.199, 0.197, 0.195, 0.192]
          WaterBalance SoilWater: SummerDate=1-may; SummerU=6; SummerCona=6; WinterDate=1-oct; WinterU=2; WinterCona=2; DiffusConst=86.49; DiffusSlope=35.44; Salb=0.13; CN2Bare=73; CNRed=20; CNCov=0; DischargeWidth=5; CatchmentArea=10; PSIDul=-100; Thickness=[150, 150, 150, 150, 200, 200, 200, 200, 300, 300]
            SWCON=[0.468, 0.477, 0.492, 0.507, 0.466, 0.465, 0.464, 0.464, 0.398, 0.397]
          Organic: FOMCNRatio=40; CarbonUnits=Total
            Thickness  Carbon  SoilCNRatio  FBiom  FInert  FOM
            150        3.236   9.7          0.04   0.262   0
            150        1.694   9.7          0.031  0.445   0
            150        1.067   9.7          0.014  0.665   0
            150        0.838   9.7          0.01   0.831   0
            200        0.669   9.7          0.01   0.99    0
            200        0.555   9.7          0.01   0.99    0
            200        0.493   9.7          0.01   0.99    0
            200        0.482   9.7          0.01   0.99    0
            300        0.469   9.7          0.01   0.99    0
            300        0.452   9.7          0.01   0.99    0
          Chemical: Thickness=[150, 150, 150, 150, 200, 200, 200, 200, 300, 300]; PH=[6.3, 6.3, 6.33, 6.38, 6.48, 6.62, 6.72, 6.76, 6.81, 6.87]; PHUnits=Water
          Nutrient
          Solute NO3: same as Parameterisation.Innes2024a.Field.Synthetic Soil Derived from ISRIC SoilGrids.NO3
          Solute NH4: same as Parameterisation.Innes2024a.Field.Synthetic Soil Derived from ISRIC SoilGrids.NO3
          Solute Urea: same as Parameterisation.Innes2024a.Field.Synthetic Soil Derived from ISRIC SoilGrids.Urea
          Physical: same as Parameterisation.Innes2024a.Field.Synthetic Soil Derived from ISRIC SoilGrids.Physical
          SoilTemperature Temperature
        Manager PhenologyRules
```csharp
using Models.Soils;
using System;
using System.Linq;
using Models.Core;
using Models.PMF;
using Models.PMF.Interfaces;

using APSIM.Shared.Utilities;
using Models.Surface;
using Models.Utilities;
using Models.Soils.Nutrients;
using Models.Interfaces;
using Models.PMF.Organs;
using Models.PMF.Library;
using Models.PMF.Phen;
using Newtonsoft.Json;
using Models.DCAPST.Interfaces;
using Models.Functions;

namespace Models
{
    [Serializable]
    public class Script : Model
    {
        [Link] private Clock clock;
        [Link] private IPlant crop;      
        [Link] private Summary Summary;
        [Link] private SimpleLeaf leaf;
        [Link] private BiomassRemoval biomassRemoval;
        [Link] private Phenology phenology;
        [Link] private Plant IntermediateWheatgrass;
        [Link] private Zone zone;
        

		[Link(ByName=true)] private SubDailyInterpolation ThermalStress;
		[Link(ByName=true)] private Constant ThermalStressThreshold;
		[Link(ByName=true)] private LinearInterpolationFunction FW;
		[Link(ByName=true)] private Constant FWThreshold;
		[Link(ByName=true)] private VariableReference FWPhen;
        
        private double accumulatedTempStress = 0;   
        private bool writeToSummary = true;
        private bool harvestWhenRipe = true;
        
  		private enum Stage { Sowing, Germinating, Emerging, Vernalising, Inducing, Reproductive, GrainFilling, Maturing, Harvest, GotoPhase }
        
        [EventSubscribe("EndOfDay")]      
        private void OnDoManagementCalculations(object sender, EventArgs e)
        {
        	Summary.WriteMessage(this,phenology.CurrentPhaseName, MessageType.Diagnostic);

            // The following code is designed to capture the effects of temperature stress on the early reproductive stages
            // of a perennial grain. If the acummualted temperature are above a designated threshold, and there is water stress,
            // then consider the reproductive organs have suffered ireversable damage and rewind to the vernalising/vegetative stage
            //
            if (phenology.CurrentPhaseName == "Reproductive")
            { 
            	double tempStress = ThermalStress.Value();
            	double stressThreshold = ThermalStressThreshold.Value();
            	double waterStress = FWPhen.Value();
            	double wsThreshold = FWThreshold.Value();
               	
               	accumulatedTempStress += tempStress;
                 
            	Summary.WriteMessage(this, "accumulatedTempStress = "+ accumulatedTempStress, MessageType.Diagnostic);
            	Summary.WriteMessage(this, "stressThreshold = "+ stressThreshold, MessageType.Diagnostic);
            	Summary.WriteMessage(this, "waterStress = "+ waterStress, MessageType.Diagnostic);
            	Summary.WriteMessage(this, "watereStressThreshold = "+ wsThreshold, MessageType.Diagnostic);
            	
            	if((accumulatedTempStress > stressThreshold)&&(waterStress < wsThreshold))
            	{           	              	
                	phenology.SetToStage((double)Stage.Vernalising);
               		Summary.WriteMessage(this, "Debug** Set to Vernalising Stage", MessageType.Diagnostic);
               		accumulatedTempStress = 0;
               		Summary.WriteMessage(this, "accumulatedTempStress = "+accumulatedTempStress+" FW="+waterStress, MessageType.Diagnostic);
               	}
            }
            
            if (phenology.CurrentPhaseName == "GrainRipening")
            {   
                accumulatedTempStress = 0;
                Summary.WriteMessage(this, "Maturing: accumulatedTempStress = "+ accumulatedTempStress, MessageType.Diagnostic); 
            }    
        }
    }
}
```
        Report: same as Parameterisation.Innes2024a.Field.Report
        Manager BiomassRemovalRule
          leafFracToRemove = 1
          leafDeadToRemove = 1
          leafFracToResidue = 0
          leafDeadToResidue = 0
          stemFracToRemove = 1
          stemDeadToRemove = 1
          stemFracToResidue = 0
          stemDeadToResidue = 0
          grainFracToRemove = 1
          grainDeadToRemove = 1
          grainFracToResidue = 0
          grainDeadToResidue = 0
          spikeFracToRemove = 1
          spikeDeadToRemove = 1
          spikeFracToResidue = 0
          spikeDeadToResidue = 0
          rootFracToRemove = 0
          rootDeadToRemove = 0
          rootFracToResidue = 0
          rootDeadToResidue = 0
          script: same as in Parameterisation.Innes2024a.Field.BiomassRemovalRule
        BiomassRemovalEvents: NameOfPlantToRemoveFrom=IntermediateWheatgrass; RemovalType=0; StageToSet=Emergence
    Simulation Culman2013a
      Clock: Start=2009-07-01; End=2010-10-31
      Weather: FileName=KellogsBiolWeatherStnDaily.met
      Summary summaryfile
      SoilArbitrator Soil Arbitrator
      Zone Field: Area=1; Slope=0; AspectAngle=0; Altitude=50
        MicroClimate: a_interception=0; b_interception=1; c_interception=0; d_interception=0; SoilHeatFluxFraction=0.4; MinimumHeightDiffForNewLayer=0; NightInterceptionFraction=0.5; ReferenceHeight=2
        Irrigation
        Fertiliser
        SurfaceOrganicMatter: InitialResidueName=grass; InitialResidueType=grass; InitialResidueMass=1000; InitialStandingFraction=0; InitialCPR=0; InitialCNR=30
        Plant IntermediateWheatgrass
        Operations Sowing
          2009-11-12  [IntermediateWheatgrass].Sow(population: 310, cultivar: "Kernza-LI2", depth: 50, rowSpacing: 150)
          2010-04-23  [Fertiliser].Apply(amount: 60, type: "UreaGranular", depth: 10)
          2010-05-26  [Fertiliser].Apply(amount: 60, type: "UreaGranular", depth: 10)
          2010-09-27  [IntermediateWheatgrass].Harvest()
          2011-04-05  [Fertiliser].Apply(amount: 60, type: "UreaGranular", depth: 10)
          2011-05-10  [Fertiliser].Apply(amount: 60, type: "UreaGranular", depth: 10)
          2011-08-03  [IntermediateWheatgrass].Harvest()
        Operations IrrigationSchedule (disabled)
          2014-09-01  [Irrigation].Apply(amount: 200, efficiency: 0.8)
          2015-09-01  [Irrigation].Apply(amount: 200, efficiency: 0.8)
          2016-09-01  [Irrigation].Apply(amount: 200, efficiency: 0.8)
          2017-09-01  [Irrigation].Apply(amount: 200, efficiency: 0.8)
        Manager HarvestingRule: same as Parameterisation.Innes2024a.Field.HarvestingRule
        Manager PhenologyRules: same as Parameterisation.Jungers2018.Field.PhenologyRules
        Report: same as Parameterisation.Innes2024a.Field.Report
        Soil Synthetic Soil Derived from ISRIC SoilGrids: ASCOrder=NA; ASCSubOrder=NA; SoilType=Haplic Luvisols; Site=NA; NearestTown=NA; Region=NA; State=NA; Country=United States of America; NaturalVegetation=NA; ApsoilNumber=9999; Latitude=42.375; Longitude=-85.375; LocationAccuracy=+- 250 m; YearOfSampling=2019; DataSource=ISRIC SoilGrids
          Water: Thickness=[150, 150, 150, 150, 200, 200, 200, 200, 300, 300]; FilledFromTop=true
            InitialValues=[0.322, 0.278, 0.271, 0.265, 0.26, 0.24, 0.149, 0.147, 0.145, 0.142]
          Physical
            Thickness  ParticleSizeSand  ParticleSizeSilt  ParticleSizeClay  Rocks     BD     AirDry  LL15   DUL    SAT    KS
            150        54                37                7                 0.104455  1.6    0.064   0.192  0.322  0.33   66.607
            150        54                37                7                 0.185868  1.6    0.057   0.17   0.278  0.3    58.176
            150        39                41                20                0.10017   1.7    0.056   0.168  0.271  0.3    53.328
            150        48                23                29                0         1.8    0.054   0.163  0.265  0.3    50.323
            200        79                4                 17                0         1.5    0.052   0.158  0.26   0.387  50.323
            200        93                0                 7                 0         1.516  0.051   0.152  0.255  0.383  53.328
            200        93                0                 7                 0         1.525  0.05    0.149  0.251  0.38   55.538
            200        93                0                 7                 0         1.528  0.049   0.147  0.249  0.38   56.842
            300        93                0                 7                 0         1.531  0.048   0.145  0.246  0.38   58.514
            300        93                0                 7                 0         1.534  0.047   0.142  0.243  0.38   60.586
            Rocks source: Calculated
            SoilCrop WheatSoil: same as Parameterisation.Fernandez2020a.Field.Synthetic Soil Derived from ISRIC SoilGrids.Physical.IntermediateWheatgrassSoil
            SoilCrop IntermediateWheatgrassSoil: same as Parameterisation.Fernandez2020a.Field.Synthetic Soil Derived from ISRIC SoilGrids.Physical.IntermediateWheatgrassSoil
          WaterBalance SoilWater: SummerDate=1-may; SummerU=6; SummerCona=6; WinterDate=1-oct; WinterU=2; WinterCona=2; DiffusConst=499.42; DiffusSlope=24.56; Salb=0.13; CN2Bare=73; CNRed=20; CNCov=0; DischargeWidth=5; CatchmentArea=10; PSIDul=-100; Thickness=[150, 150, 150, 150, 200, 200, 200, 200, 300, 300]
            SWCON=[0.495, 0.508, 0.504, 0.498, 0.452, 0.459, 0.463, 0.464, 0.401, 0.403]
          Organic: FOMCNRatio=40; CarbonUnits=Total
            Thickness  Carbon  SoilCNRatio  FBiom  FInert  FOM
            150        2.5     8            0.04   0.419   0
            150        2.5     8            0.031  0.651   0
            150        1.5     8            0.014  0.827   0
            150        0.2     8            0.01   0.905   0
            200        0.2     8            0.01   0.986   0
            200        0.2     8            0.01   0.99    0
            200        0.2     8            0.01   0.99    0
            200        0.2     8            0.01   0.99    0
            300        0.2     8            0.01   0.99    0
            300        0.2     8            0.01   0.99    0
          Chemical: Thickness=[150, 150, 150, 150, 200, 200, 200, 200, 300, 300]; PH=[5.5, 5.5, 5.5, 6.25, 6.38, 6.53, 6.64, 6.72, 6.82, 6.94]; PHUnits=Water
          Nutrient
          Solute NO3: Thickness=[150, 150, 150, 150, 200, 200, 200, 200, 300, 300]; InitialValues=[1, 1, 1, 1, 1, 1, 1, 1, 1, 1]; InitialValuesUnits=ppm; WaterTableConcentration=0; D0=0; DepthConstant=0; MaxDepthSoluteAccessible=0; RunoffEffectivenessAtMovingSolute=0; MaxEffectiveRunoff=0
          Solute NH4: Thickness=[150, 150, 150, 150, 200, 200, 200, 200, 300, 300]; InitialValues=[0.1, 0.1, 0.1, 0.1, 0.1, 0.1, 0.1, 0.1, 0.1, 0.1]; InitialValuesUnits=ppm; WaterTableConcentration=0; D0=0; DepthConstant=0; MaxDepthSoluteAccessible=0; RunoffEffectivenessAtMovingSolute=0; MaxEffectiveRunoff=0
          Solute Urea: same as Parameterisation.Innes2024a.Field.Synthetic Soil Derived from ISRIC SoilGrids.NO3
          SoilTemperature CERESSoilTemperature
    Simulation Culman2013b
      Clock: Start=2009-07-01; End=2010-10-31
      Weather: FileName=KellogsBiolWeatherStnDaily.met
      Summary summaryfile
      SoilArbitrator Soil Arbitrator
      Zone Field: Area=1; Slope=0; AspectAngle=0; Altitude=50
        MicroClimate: a_interception=0; b_interception=1; c_interception=0; d_interception=0; SoilHeatFluxFraction=0.4; MinimumHeightDiffForNewLayer=0; NightInterceptionFraction=0.5; ReferenceHeight=2
        Irrigation
        Fertiliser
        SurfaceOrganicMatter: InitialResidueName=grass; InitialResidueType=grass; InitialResidueMass=1000; InitialStandingFraction=0; InitialCPR=0; InitialCNR=30
        Plant IntermediateWheatgrass
        Operations Sowing
          2009-11-12  [IntermediateWheatgrass].Sow(population: 310, cultivar: "Kernza-LI2", depth: 10, rowSpacing: 150)
          2010-04-23  [Fertiliser].Apply(amount: 110, type: "UreaGranular", depth: 20)
          2010-05-26  [Fertiliser].Apply(amount: 110, type: "UreaGranular", depth: 10)
          2010-09-27  [IntermediateWheatgrass].Harvest()
          2011-04-05  [Fertiliser].Apply(amount: 110, type: "UreaGranular", depth: 10)
          2011-05-10  [Fertiliser].Apply(amount: 110, type: "UreaGranular", depth: 10)
          2011-08-03  [IntermediateWheatgrass].Harvest()
        Operations IrrigationSchedule (disabled): same as Parameterisation.Culman2013a.Field.IrrigationSchedule
        Manager HarvestingRule: same as Parameterisation.Innes2024a.Field.HarvestingRule
        Manager PhenologyRules: same as Parameterisation.Jungers2018.Field.PhenologyRules
        Report: same as Parameterisation.Innes2024a.Field.Report
        Soil Synthetic Soil Derived from ISRIC SoilGrids: same as Parameterisation.Culman2013a.Field.Synthetic Soil Derived from ISRIC SoilGrids
  Folder Validation
    Simulation Hayes2017a
      Clock: Start=2013-03-01; End=2014-08-01
      Weather: FileName=Cowra.met
      Summary summaryfile
      SoilArbitrator Soil Arbitrator
      Zone Field: Area=1; Slope=0; AspectAngle=0; Altitude=50
        MicroClimate: a_interception=0; b_interception=1; c_interception=0; d_interception=0; SoilHeatFluxFraction=0.4; MinimumHeightDiffForNewLayer=0; NightInterceptionFraction=0.5; ReferenceHeight=2
        Irrigation
        Fertiliser
        SurfaceOrganicMatter: InitialResidueName=grass; InitialResidueType=grass; InitialResidueMass=1000; InitialStandingFraction=0; InitialCPR=0; InitialCNR=30
        Plant IntermediateWheatgrass
        Soil Synthetic Soil Derived from ISRIC SoilGrids: ASCOrder=NA; ASCSubOrder=NA; SoilType=Haplic Luvisols; Site=NA; NearestTown=NA; Region=NA; State=NA; Country=Australia; NaturalVegetation=NA; ApsoilNumber=9999; Latitude=-33.875; Longitude=148.625; LocationAccuracy=+- 250 m; YearOfSampling=2019; DataSource=ISRIC SoilGrids
          Water: Thickness=[150, 150, 150, 150, 200, 200, 200, 200, 300, 300]; FilledFromTop=true
            InitialValues=[0.19, 0.2, 0.217, 0.232, 0.237, 0.233, 0.23, 0.23, 0.23, 0.23]
          Physical
            Thickness  ParticleSizeSand  ParticleSizeSilt  ParticleSizeClay  Rocks  BD     AirDry  LL15   DUL    SAT    KS
            150        58.7              20.7              21.3              0      1.422  0.063   0.19   0.285  0.42   29.571
            150        54.5              19.5              26.5              0      1.49   0.067   0.2    0.29   0.405  16.24
            150        49                18.5              33.2              0      1.529  0.072   0.217  0.3    0.4    7.422
            150        45                17.5              37.8              0      1.543  0.077   0.232  0.307  0.4    4.404
            200        43                17                40                0      1.555  0.079   0.237  0.31   0.4    3.392
            200        43                17                40                0      1.565  0.077   0.233  0.31   0.4    3.392
            200        43                17.1              40                0      1.569  0.077   0.23   0.31   0.4    3.392
            200        43                17.3              40                0      1.567  0.077   0.23   0.31   0.4    3.392
            300        43                17.6              40                0      1.565  0.077   0.23   0.31   0.4    3.392
            300        43                17.8              40                0      1.561  0.077   0.23   0.31   0.4    3.392
            Rocks source: Calculated
            SoilCrop IntermediateWheatgrassSoil: same as Parameterisation.Fernandez2020a.Field.Synthetic Soil Derived from ISRIC SoilGrids.Physical.IntermediateWheatgrassSoil
          WaterBalance SoilWater: same as Parameterisation.Innes2024a.Field.Synthetic Soil Derived from ISRIC SoilGrids.SoilWater
          Organic: same as Parameterisation.Innes2024a.Field.Synthetic Soil Derived from ISRIC SoilGrids.Organic
          Chemical: Thickness=[150, 150, 150, 150, 200, 200, 200, 200, 300, 300]; PH=[6.3, 6.45, 6.7, 6.9, 7.08, 7.23, 7.32, 7.36, 7.41, 7.47]; PHUnits=Water
          Nutrient
          Solute NO3: same as Parameterisation.Innes2024a.Field.Synthetic Soil Derived from ISRIC SoilGrids.NO3
          Solute NH4: same as Parameterisation.Innes2024a.Field.Synthetic Soil Derived from ISRIC SoilGrids.NO3
          Solute Urea: same as Parameterisation.Innes2024a.Field.Synthetic Soil Derived from ISRIC SoilGrids.Urea
          SoilTemperature Temperature
        Operations IrrigationSchedule
          2013-12-01  [Irrigation].Apply(amount: 50, efficiency: 0.8)
        Manager HarvestingRule: same as Parameterisation.Innes2024a.Field.HarvestingRule
        Report: same as Parameterisation.Innes2024a.Field.Report
        BiomassRemovalEvents: NameOfPlantToRemoveFrom=IntermediateWheatgrass; RemovalType=0
        Manager BiomassRemovalRule
          leafFracToRemove = 1
          leafDeadToRemove = 1
          leafFracToResidue = 0
          leafDeadToResidue = 0
          stemFracToRemove = 1
          stemDeadToRemove = 1
          stemFracToResidue = 0
          stemDeadToResidue = 0
          grainFracToRemove = 1
          grainDeadToRemove = 1
          grainFracToResidue = 0
          grainDeadToResidue = 0
          spikeFracToRemove = 1
          spikeDeadToRemove = 1
          spikeFracToResidue = 0
          spikeDeadToResidue = 0
          rootFracToRemove = 0
          rootDeadToRemove = 0
          rootFracToResidue = 0
          rootDeadToResidue = 0
```csharp
using Models.Soils;
using System;
using System.Linq;
using Models.Core;
using Models.PMF;
using Models.PMF.Interfaces;

using APSIM.Shared.Utilities;
using Models.Surface;
using Models.Utilities;
using Models.Soils.Nutrients;
using Models.Interfaces;
using Models.PMF.Organs;
using Models.PMF.Library;
using Models.PMF.Phen;
using Newtonsoft.Json;


namespace Models
{
    [Serializable]

    public class Script : Model
    {
        [Link] private Clock clock;
        [Link] private IPlant crop;      
        [Link] private Summary summary;
        [Link] private SimpleLeaf leaf;
        [Link] private BiomassRemoval biomassRemoval;
        [Link] private Phenology phenology;
        [Link] private Plant IntermediateWheatgrass;
                
		[Description("    Live leaf fraction to remove from the field     ")]
		public double leafFracToRemove { get; set; } = 0.75;
		[Description("    Dead leaf fraction to remove from the field     ")]
		public double leafDeadToRemove { get; set; } = 1.0;
		[Description("    Live leaf fraction to residue     ")]
		public double leafFracToResidue { get; set; } = 0;
		[Description("    Dead leaf fraction to residue     ")]
		public double leafDeadToResidue { get; set; } = 0;		
	
 		[Description("    Live stem fraction to remove from the field     ")]
		public double stemFracToRemove { get; set; } = 1.0;
		[Description("    Dead stem fraction to remove from the field     ")]
		public double stemDeadToRemove { get; set; } = 1.0;
		[Description("    Live stem fraction to residue     ")]
		public double stemFracToResidue { get; set; } = 0;
		[Description("    Dead stem fraction to residue     ")]
		public double stemDeadToResidue { get; set; } = 0;		
	
 		[Description("    Live grain fraction to remove from the field     ")]
		public double grainFracToRemove { get; set; } = 1.0;
		[Description("    Dead grain fraction to remove from the field     ")]
		public double grainDeadToRemove { get; set; } = 1.0;
		[Description("    Live grain fraction to residue     ")]
		public double grainFracToResidue { get; set; } = 0;
		[Description("    Dead grain fraction to residue     ")]
		public double grainDeadToResidue { get; set; } = 0;		
	
 		[Description("    Live spike fraction to remove from the field     ")]
		public double spikeFracToRemove { get; set; } = 1.0;
		[Description("    Dead spike fraction to remove from the field     ")]
		public double spikeDeadToRemove { get; set; } = 1.0;
		[Description("    Live spike fraction to residue     ")]
		public double spikeFracToResidue { get; set; } = 0;
		[Description("    Dead spike fraction to residue     ")]
		public double spikeDeadToResidue { get; set; } = 0;		
	
  		[Description("    Live root fraction to remove from the field     ")]
		public double rootFracToRemove { get; set; } = 0;
		[Description("    Dead root fraction to remove from the field     ")]
		public double rootDeadToRemove { get; set; } = 0;
		[Description("    Live root fraction to residue     ")]
		public double rootFracToResidue { get; set; } = 0;
		[Description("    Dead root fraction to residue     ")]
		public double rootDeadToResidue { get; set; } = 0;		
     
        private bool writeToSummary = true;
        
  		private enum Stage { Sowing, Germination, Emergence, Induction, StemElongation, Flowering, 
  		Ripening, Mature, Rewind }
        
 
        [EventSubscribe("Cutting")]      
        private void OnDoCutting(object sender, EventArgs e)
        {
                             
           	// set removal fractions (these override the default removals in the plant)
            // Actually do the biomass removal
           	var Leaf = IntermediateWheatgrass.FindChild<IHasDamageableBiomass>("Leaf");
            var Stem = IntermediateWheatgrass.FindChild<IHasDamageableBiomass>("Stem");
           	var Grain = IntermediateWheatgrass.FindChild<IHasDamageableBiomass>("Grain");
           	var Root = IntermediateWheatgrass.FindChild<IHasDamageableBiomass>("Root");
            var Spike = IntermediateWheatgrass.FindChild<IHasDamageableBiomass>("Spike");
               
           	Leaf.RemoveBiomass(leafFracToRemove, leafDeadToRemove, leafFracToResidue, leafDeadToResidue);
           	Stem.RemoveBiomass(stemFracToRemove, stemDeadToRemove, stemFracToResidue, stemDeadToResidue);
           	Grain.RemoveBiomass(grainFracToRemove, grainDeadToRemove, grainFracToResidue, grainDeadToResidue);
           	Root.RemoveBiomass(rootFracToRemove, rootDeadToRemove, rootFracToResidue, rootDeadToResidue);
           	Spike.RemoveBiomass(spikeFracToRemove, spikeDeadToRemove, spikeFracToResidue, spikeDeadToResidue);
                                  
            summary.WriteMessage(this, "Debug** RemoveBiomass leafFractToRemove = " + leafFracToRemove, MessageType.Diagnostic);                              
        }
    }
}
```
        Operations Sowing
          2013-05-13  [IntermediateWheatgrass].Sow(population: 80, cultivar: "Kernza", depth: 20, rowSpacing: 250)
          2013-05-13  [Fertiliser].Apply(amount: 100, type: "DAP", depth: 10)
        Manager PhenologyRulesDAS: same as Parameterisation.Innes2024a.Field.PhenologyRulesDAS
    Simulation Hayes2017b
      Clock: Start=2013-03-01; End=2014-08-01
      Weather: FileName=Cowra.met
      Summary summaryfile
      SoilArbitrator Soil Arbitrator
      Zone Field: Area=1; Slope=0; AspectAngle=0; Altitude=50
        MicroClimate: a_interception=0; b_interception=1; c_interception=0; d_interception=0; SoilHeatFluxFraction=0.4; MinimumHeightDiffForNewLayer=0; NightInterceptionFraction=0.5; ReferenceHeight=2
        Irrigation
        Fertiliser
        SurfaceOrganicMatter: InitialResidueName=grass; InitialResidueType=grass; InitialResidueMass=1000; InitialStandingFraction=0; InitialCPR=0; InitialCNR=30
        Plant IntermediateWheatgrass
        Soil Synthetic Soil Derived from ISRIC SoilGrids: same as Validation.Hayes2017a.Field.Synthetic Soil Derived from ISRIC SoilGrids
        Operations IrrigationSchedule
          2013-12-01  [Irrigation].Apply(amount: 50, efficiency: 0.8)
        Manager HarvestingRule: same as Parameterisation.Innes2024a.Field.HarvestingRule
        Report: same as Parameterisation.Innes2024a.Field.Report
        BiomassRemovalEvents: NameOfPlantToRemoveFrom=IntermediateWheatgrass; RemovalType=0; StageToSet=Emergence
        Manager BiomassRemovalRule: same as Parameterisation.Jungers2018.Field.BiomassRemovalRule
        Operations Sowing: same as Validation.Hayes2017a.Field.Sowing
        Manager PhenologyRulesDAS: same as Parameterisation.Innes2024a.Field.PhenologyRulesDAS
    Simulation Hunter2020a
      Clock: Start=2014-01-01; End=2017-10-31
      Weather: FileName=StPaul.met
      Summary summaryfile
      SoilArbitrator Soil Arbitrator
      Zone Field: Area=1; Slope=0; AspectAngle=0; Altitude=50
        MicroClimate: a_interception=0; b_interception=1; c_interception=0; d_interception=0; SoilHeatFluxFraction=0.4; MinimumHeightDiffForNewLayer=0; NightInterceptionFraction=0.5; ReferenceHeight=2
        Irrigation
        Fertiliser
        SurfaceOrganicMatter: InitialResidueName=lucerne; InitialResidueType=lucerne; InitialResidueMass=1000; InitialStandingFraction=0; InitialCPR=0; InitialCNR=30
        Plant IntermediateWheatgrass
        Operations Sowing
          2014-09-05  [IntermediateWheatgrass].Sow(population: 85, cultivar: "Kernza", depth: 20, rowSpacing: 150)
          2015-04-05  [Fertiliser].Apply(amount: 120, type: "NH4N", depth: 10)
          2016-04-05  [Fertiliser].Apply(amount: 120, type: "UreaN", depth: 10)
          2017-04-05  [Fertiliser].Apply(amount: 120, type: "UreaN", depth: 10)
          2015-08-06  [IntermediateWheatgrass].Harvest()
          2016-08-06  [IntermediateWheatgrass].Harvest()
          2017-08-06  [IntermediateWheatgrass].Harvest()
        Operations IrrigationSchedule (disabled): same as Parameterisation.Culman2013a.Field.IrrigationSchedule
        Manager HarvestingRule: same as Parameterisation.Innes2024a.Field.HarvestingRule
        Soil Synthetic Soil Derived from ISRIC SoilGrids: ASCOrder=NA; ASCSubOrder=NA; SoilType=Haplic Luvisols; Site=NA; NearestTown=NA; Region=NA; State=NA; Country=United States of America; NaturalVegetation=NA; ApsoilNumber=9999; Latitude=44.875; Longitude=-93.125; LocationAccuracy=+- 250 m; YearOfSampling=2019; DataSource=ISRIC SoilGrids
          Water: Thickness=[150, 150, 150, 150, 200, 200, 200, 200, 300, 300]; FilledFromTop=true
            InitialValues=[0.285, 0.29, 0.3, 0.307, 0.31, 0.31, 0.31, 0.31, 0.31, 0.31]
          WaterBalance SoilWater: same as Parameterisation.Jungers2018.Field.Synthetic Soil Derived from ISRIC SoilGrids1.SoilWater
          Organic: FOMCNRatio=40; CarbonUnits=Total
            Thickness  Carbon  SoilCNRatio  FBiom  FInert  FOM
            150        3.236   9.7          0.04   0.262   0
            150        1.694   9.7          0.031  0.445   0
            150        1.067   9.7          0.014  0.665   0
            150        0.838   9.7          0.01   0.831   0
            200        0.669   9.7          0.01   0.99    0
            200        0.555   9.7          0.01   0.99    0
            200        0.493   9.7          0.01   0.99    0
            200        0.482   9.7          0.01   0.99    0
            300        0.469   9.7          0.01   0.99    0
            300        0.452   9.7          0.01   0.99    0
          Chemical: Thickness=[150, 150, 150, 150, 200, 200, 200, 200, 300, 300]; PH=[6.3, 6.3, 6.33, 6.38, 6.48, 6.62, 6.72, 6.76, 6.81, 6.87]; PHUnits=Water
          Nutrient
          Solute NO3: same as Parameterisation.Innes2024a.Field.Synthetic Soil Derived from ISRIC SoilGrids.NO3
          Solute NH4: same as Parameterisation.Innes2024a.Field.Synthetic Soil Derived from ISRIC SoilGrids.NO3
          Solute Urea: same as Parameterisation.Innes2024a.Field.Synthetic Soil Derived from ISRIC SoilGrids.Urea
          Physical: same as Validation.Hayes2017a.Field.Synthetic Soil Derived from ISRIC SoilGrids.Physical
          SoilTemperature Temperature
        Manager PhenologyRules: same as Parameterisation.Jungers2018.Field.PhenologyRules
        Report: same as Parameterisation.Innes2024a.Field.Report
    Simulation Hunter2020b
      Clock: Start=2014-01-01; End=2017-10-31
      Weather: FileName=StPaul.met
      Summary summaryfile
      SoilArbitrator Soil Arbitrator
      Zone Field: Area=1; Slope=0; AspectAngle=0; Altitude=50
        MicroClimate: a_interception=0; b_interception=1; c_interception=0; d_interception=0; SoilHeatFluxFraction=0.4; MinimumHeightDiffForNewLayer=0; NightInterceptionFraction=0.5; ReferenceHeight=2
        Irrigation
        Fertiliser
        SurfaceOrganicMatter: InitialResidueName=lucerne; InitialResidueType=lucerne; InitialResidueMass=1000; InitialStandingFraction=0; InitialCPR=0; InitialCNR=30
        Plant IntermediateWheatgrass
        Operations Sowing
          2014-09-05  [IntermediateWheatgrass].Sow(population: 190, cultivar: "Kernza", depth: 20, rowSpacing: 300)
          2015-04-05  [Fertiliser].Apply(amount: 120, type: "NH4N", depth: 10)
          2016-04-05  [Fertiliser].Apply(amount: 120, type: "UreaN", depth: 10)
          2017-04-05  [Fertiliser].Apply(amount: 120, type: "UreaN", depth: 10)
          2015-08-05  [IntermediateWheatgrass].Harvest()
          2016-08-05  [IntermediateWheatgrass].Harvest()
          2017-08-05  [IntermediateWheatgrass].Harvest()
        Operations IrrigationSchedule (disabled): same as Parameterisation.Fernandez2020a.Field.IrrigationSchedule
        Manager HarvestingRule: same as Parameterisation.Innes2024a.Field.HarvestingRule
        Manager PhenologyRules: same as Parameterisation.Jungers2018.Field.PhenologyRules
        Report: same as Parameterisation.Innes2024a.Field.Report
        Soil Synthetic Soil Derived from ISRIC SoilGrids: same as Validation.Hunter2020a.Field.Synthetic Soil Derived from ISRIC SoilGrids
    Simulation Hunter2020c
      Clock: Start=2014-01-01; End=2017-10-31
      Weather: FileName=StPaul.met
      Summary summaryfile
      SoilArbitrator Soil Arbitrator
      Zone Field: Area=1; Slope=0; AspectAngle=0; Altitude=50
        MicroClimate: a_interception=0; b_interception=1; c_interception=0; d_interception=0; SoilHeatFluxFraction=0.4; MinimumHeightDiffForNewLayer=0; NightInterceptionFraction=0.5; ReferenceHeight=2
        Irrigation
        Fertiliser
        SurfaceOrganicMatter: InitialResidueName=lucerne; InitialResidueType=lucerne; InitialResidueMass=1000; InitialStandingFraction=0; InitialCPR=0; InitialCNR=30
        Plant IntermediateWheatgrass
        Operations Sowing
          2014-09-05  [IntermediateWheatgrass].Sow(population: 48, cultivar: "Kernza", depth: 20, rowSpacing: 610)
          2015-04-05  [Fertiliser].Apply(amount: 120, type: "NH4N", depth: 10)
          2016-04-05  [Fertiliser].Apply(amount: 120, type: "UreaN", depth: 10)
          2017-04-05  [Fertiliser].Apply(amount: 120, type: "UreaN", depth: 10)
          2015-08-05  [IntermediateWheatgrass].Harvest()
          2016-08-05  [IntermediateWheatgrass].Harvest()
          2017-08-05  [IntermediateWheatgrass].Harvest()
        Operations IrrigationSchedule (disabled): same as Parameterisation.Fernandez2020a.Field.IrrigationSchedule
        Manager HarvestingRule: same as Parameterisation.Innes2024a.Field.HarvestingRule
        Manager PhenologyRules: same as Parameterisation.Jungers2018.Field.PhenologyRules
        Report: same as Parameterisation.Innes2024a.Field.Report
        Soil Synthetic Soil Derived from ISRIC SoilGrids: same as Validation.Hunter2020a.Field.Synthetic Soil Derived from ISRIC SoilGrids
    Simulation Jungers2018a
      Clock: Start=2015-06-01; End=2016-10-31
      Weather: FileName=Rosemount2016.met
      Summary summaryfile
      SoilArbitrator Soil Arbitrator
      Zone Field: Area=1; Slope=0; AspectAngle=0; Altitude=50
        MicroClimate: a_interception=0; b_interception=1; c_interception=0; d_interception=0; SoilHeatFluxFraction=0.4; MinimumHeightDiffForNewLayer=0; NightInterceptionFraction=0.5; ReferenceHeight=2
        Irrigation
        Fertiliser
        SurfaceOrganicMatter: InitialResidueName=grass; InitialResidueType=grass; InitialResidueMass=1000; InitialStandingFraction=0; InitialCPR=0; InitialCNR=30
        Plant IntermediateWheatgrass
        Operations Sowing
          2015-09-04  [IntermediateWheatgrass].Sow(population: 50, cultivar: "Kernza", depth: 20, rowSpacing: 150)
          2016-04-06  [Fertiliser].Apply(amount: 120, type: "NH4NO3N", depth: 10)
        Operations IrrigationSchedule (disabled): same as Parameterisation.Fernandez2020a.Field.IrrigationSchedule
        Manager HarvestingRule: same as Parameterisation.Innes2024a.Field.HarvestingRule
        Soil Synthetic Soil Derived from ISRIC SoilGrids1: ASCOrder=NA; ASCSubOrder=NA; SoilType=Haplic Chernozems; Site=NA; NearestTown=NA; Region=NA; State=NA; Country=United States of America; NaturalVegetation=NA; ApsoilNumber=9999; Latitude=44.625; Longitude=-93.125; LocationAccuracy=+- 250 m; YearOfSampling=2019; DataSource=ISRIC SoilGrids
          Water: Thickness=[150, 150, 150, 150, 200, 200, 200, 200, 300, 300]; FilledFromTop=true
            InitialValues=[0.218, 0.205, 0.198, 0.193, 0.185, 0.175, 0.17, 0.17, 0.17, 0.17]
          WaterBalance SoilWater: SummerDate=1-may; SummerU=6; SummerCona=6; WinterDate=1-oct; WinterU=2; WinterCona=2; DiffusConst=406.19; DiffusSlope=28.64; Salb=0.13; CN2Bare=73; CNRed=20; CNCov=0; DischargeWidth=5; CatchmentArea=10; PSIDul=-100; Thickness=[150, 150, 150, 150, 200, 200, 200, 200, 300, 300]
            SWCON=[0.482, 0.493, 0.505, 0.499, 0.455, 0.467, 0.474, 0.477, 0.418, 0.423]
          Organic: FOMCNRatio=40; CarbonUnits=Total
            Thickness  Carbon  SoilCNRatio  FBiom  FInert  FOM
            150        3.305   8            0.04   0.172   0
            150        1.834   8            0.031  0.286   0
            150        1.038   8            0.014  0.483   0
            150        0.685   8            0.01   0.719   0
            200        0.459   8            0.01   0.99    0
            200        0.354   8            0.01   0.99    0
            200        0.298   8            0.01   0.99    0
            200        0.29    8            0.01   0.99    0
            300        0.28    8            0.01   0.99    0
            300        0.267   8            0.01   0.99    0
          Chemical: Thickness=[150, 150, 150, 150, 200, 200, 200, 200, 300, 300]; PH=[6.3, 6.3, 6.33, 6.38, 6.48, 6.62, 6.74, 6.82, 6.92, 7.04]; PHUnits=Water
          Nutrient
          Solute NO3: same as Parameterisation.Innes2024a.Field.Synthetic Soil Derived from ISRIC SoilGrids.NO3
          Solute NH4: same as Parameterisation.Innes2024a.Field.Synthetic Soil Derived from ISRIC SoilGrids.NO3
          Solute Urea: same as Parameterisation.Innes2024a.Field.Synthetic Soil Derived from ISRIC SoilGrids.Urea
          Physical: same as Parameterisation.Innes2024a.Field.Synthetic Soil Derived from ISRIC SoilGrids.Physical
          SoilTemperature Temperature
        Report: same as Parameterisation.Innes2024a.Field.Report
        Manager PhenologyRulesDAS: same as Parameterisation.Innes2024a.Field.PhenologyRulesDAS
    Simulation Pugliese2019
      Clock: Start=2014-03-01; End=2017-08-31
      Weather: FileName=Wooster.met
      Summary summaryfile
      SoilArbitrator Soil Arbitrator
      Zone Field: Area=1; Slope=0; AspectAngle=0; Altitude=50
        MicroClimate: a_interception=0; b_interception=1; c_interception=0; d_interception=0; SoilHeatFluxFraction=0.4; MinimumHeightDiffForNewLayer=0; NightInterceptionFraction=0.5; ReferenceHeight=2
        Irrigation
        Fertiliser
        SurfaceOrganicMatter: InitialResidueName=grass; InitialResidueType=grass; InitialResidueMass=1000; InitialStandingFraction=0; InitialCPR=0; InitialCNR=30
        Plant IntermediateWheatgrass
        Operations Sowing
          2014-08-27  [IntermediateWheatgrass].Sow(population: 140, cultivar: "Kernza", depth: 50, rowSpacing: 150)
          2014-05-24  [Fertiliser].Apply(amount: 67, type: "MAP", depth: 10)
          2014-05-24  [Fertiliser].Apply(amount: 100, type: "UreaGranular", depth: 10)
          2015-08-19  [Fertiliser].Apply(amount: 80, type: "UreaGranular", depth: 10)
          2016-03-30  [Fertiliser].Apply(amount: 80, type: "UreaGranular", depth: 10)
          2016-08-15  [Fertiliser].Apply(amount: 80, type: "UreaGranular", depth: 10)
          2017-04-04  [Fertiliser].Apply(amount: 80, type: "UreaGranular", depth: 10)
          2015-08-13  [IntermediateWheatgrass].Harvest()
          2016-08-03  [IntermediateWheatgrass].Harvest()
          2017-08-10  [IntermediateWheatgrass].Harvest()
        Operations IrrigationSchedule (disabled): same as Parameterisation.Culman2013a.Field.IrrigationSchedule
        Manager HarvestingRule: same as Parameterisation.Innes2024a.Field.HarvestingRule
        Manager PhenologyRules: same as Parameterisation.Jungers2018.Field.PhenologyRules
        Report: same as Parameterisation.Innes2024a.Field.Report
        Soil Synthetic Soil Derived from ISRIC SoilGrids: ASCOrder=NA; ASCSubOrder=NA; SoilType=Luvic Phaeozems; Site=NA; NearestTown=NA; Region=NA; State=NA; Country=United States of America; NaturalVegetation=NA; ApsoilNumber=9999; Latitude=40.875; Longitude=-89.875; LocationAccuracy=+- 250 m; YearOfSampling=2019; DataSource=ISRIC SoilGrids
          Water: Thickness=[150, 150, 150, 150, 200, 200, 200, 200, 300, 300]; FilledFromTop=true
            InitialValues=[0.377, 0.366, 0.363, 0.358, 0.353, 0.3415, 0.249, 0.247, 0.244, 0.241]
          Physical
            Thickness  ParticleSizeSand  ParticleSizeSilt  ParticleSizeClay  Rocks  BD     AirDry  LL15   DUL    SAT    KS
            150        5                 67.7              27.3              0      1.437  0.087   0.262  0.377  0.428  14.744
            150        5                 66                29                0      1.492  0.087   0.26   0.366  0.41   12.152
            150        4.8               64.8              30.5              0      1.507  0.087   0.26   0.363  0.405  10.211
            150        4.2               64.2              31.5              0      1.541  0.087   0.26   0.358  0.395  9.093
            200        4.5               64.5              31.2              0      1.565  0.086   0.258  0.353  0.387  9.36
            200        5.5               65.5              29.8              0      1.578  0.084   0.253  0.349  0.383  11.139
            200        6.3               66.2              28.4              0      1.584  0.083   0.249  0.346  0.38   13.028
            200        6.9               66.6              27.2              0      1.584  0.082   0.247  0.346  0.38   14.973
            300        7.6               67.1              25.7              0      1.584  0.081   0.244  0.345  0.38   17.819
            300        8.5               67.7              23.9              0      1.584  0.08    0.241  0.345  0.38   21.957
            Rocks source: Calculated
            SoilCrop RiceSoil
              LL=[0.262, 0.26, 0.261, 0.271, 0.283, 0.295, 0.31, 0.328, 0.344, 0.345]
              KL=[0.06, 0.06, 0.059, 0.053, 0.044, 0.033, 0.022, 0.011, 0.001, 0]
              XF=[1, 0.94, 0.895, 0.805, 0.747, 0.722, 0.713, 0.719, 0.726, 0]
            SoilCrop WheatSoil: same as Validation.Pugliese2019.Field.Synthetic Soil Derived from ISRIC SoilGrids.Physical.RiceSoil
            SoilCrop TeffSoil: same as Validation.Pugliese2019.Field.Synthetic Soil Derived from ISRIC SoilGrids.Physical.RiceSoil
            SoilCrop SugarcaneSoil
              LL=[0.262, 0.26, 0.261, 0.266, 0.272, 0.277, 0.284, 0.294, 0.305, 0.32]
              KL=[0.06, 0.06, 0.06, 0.056, 0.051, 0.045, 0.038, 0.032, 0.024, 0.014]
              XF=[1, 0.94, 0.895, 0.805, 0.747, 0.722, 0.713, 0.719, 0.726, 0.735]
            SoilCrop MaizeSoil: same as Validation.Pugliese2019.Field.Synthetic Soil Derived from ISRIC SoilGrids.Physical.RiceSoil
            SoilCrop SoybeanSoil: same as Validation.Pugliese2019.Field.Synthetic Soil Derived from ISRIC SoilGrids.Physical.RiceSoil
            SoilCrop OilPalmSoil: same as Validation.Pugliese2019.Field.Synthetic Soil Derived from ISRIC SoilGrids.Physical.SugarcaneSoil
            SoilCrop CassavaSoil: same as Validation.Pugliese2019.Field.Synthetic Soil Derived from ISRIC SoilGrids.Physical.RiceSoil
            SoilCrop PlantainForageSoil: same as Validation.Pugliese2019.Field.Synthetic Soil Derived from ISRIC SoilGrids.Physical.SugarcaneSoil
            SoilCrop SunflowerSoil
              LL=[0.262, 0.268, 0.278, 0.287, 0.297, 0.307, 0.32, 0.336, 0.345, 0.345]
              KL=[0.1, 0.092, 0.083, 0.072, 0.059, 0.043, 0.027, 0.01, 0, 0]
              XF=[1, 0.94, 0.895, 0.805, 0.747, 0.722, 0.713, 0.719, 0.726, 0]
            SoilCrop CanolaSoil: same as Validation.Pugliese2019.Field.Synthetic Soil Derived from ISRIC SoilGrids.Physical.RiceSoil
            SoilCrop SorghumSoil
              LL=[0.262, 0.26, 0.261, 0.268, 0.277, 0.285, 0.295, 0.308, 0.324, 0.342]
              KL=[0.07, 0.07, 0.069, 0.064, 0.056, 0.047, 0.037, 0.027, 0.015, 0.002]
              XF=[1, 0.94, 0.895, 0.805, 0.747, 0.722, 0.713, 0.719, 0.726, 0.735]
            SoilCrop MilletSoil: same as Validation.Pugliese2019.Field.Synthetic Soil Derived from ISRIC SoilGrids.Physical.SorghumSoil
            SoilCrop PeanutSoil
              LL=[0.262, 0.26, 0.26, 0.261, 0.273, 0.29, 0.309, 0.331, 0.345, 0.345]
              KL=[0.06, 0.06, 0.06, 0.059, 0.05, 0.037, 0.023, 0.009, 0, 0]
              XF=[1, 0.94, 0.895, 0.805, 0.747, 0.722, 0.713, 0.719, 0.726, 0]
            SoilCrop BarleySoil
              LL=[0.262, 0.26, 0.261, 0.27, 0.28, 0.29, 0.303, 0.318, 0.337, 0.345]
              KL=[0.07, 0.07, 0.069, 0.063, 0.054, 0.042, 0.031, 0.019, 0.006, 0]
              XF=[1, 0.94, 0.895, 0.805, 0.747, 0.722, 0.713, 0.719, 0.726, 0]
            SoilCrop CottonSoil
              LL=[0.262, 0.26, 0.26, 0.26, 0.259, 0.267, 0.279, 0.292, 0.31, 0.332]
              KL=[0.1, 0.1, 0.1, 0.1, 0.098, 0.085, 0.07, 0.054, 0.035, 0.012]
              XF=[1, 0.94, 0.895, 0.805, 0.747, 0.722, 0.713, 0.719, 0.726, 0.735]
            SoilCrop OatsSoil: same as Validation.Pugliese2019.Field.Synthetic Soil Derived from ISRIC SoilGrids.Physical.RiceSoil
            SoilCrop ChickpeaSoil
              LL=[0.262, 0.26, 0.26, 0.261, 0.272, 0.287, 0.305, 0.325, 0.344, 0.345]
              KL=[0.06, 0.06, 0.06, 0.059, 0.051, 0.038, 0.025, 0.013, 0.001, 0]
              XF=[1, 0.94, 0.895, 0.805, 0.747, 0.722, 0.713, 0.719, 0.726, 0]
            SoilCrop MungbeanSoil
              LL=[0.262, 0.26, 0.26, 0.267, 0.286, 0.307, 0.331, 0.346, 0.345, 0.345]
              KL=[0.06, 0.06, 0.06, 0.056, 0.042, 0.026, 0.009, 0, 0, 0]
              XF=[1, 0.94, 0.895, 0.805, 0.747, 0.722, 0.713, 0.719, 0, 0]
            SoilCrop Pigeon PeaSoil: same as Validation.Pugliese2019.Field.Synthetic Soil Derived from ISRIC SoilGrids.Physical.PeanutSoil
            SoilCrop CowpeaSoil: same as Validation.Pugliese2019.Field.Synthetic Soil Derived from ISRIC SoilGrids.Physical.RiceSoil
            SoilCrop FababeanSoil
              LL=[0.262, 0.26, 0.26, 0.26, 0.264, 0.278, 0.294, 0.312, 0.336, 0.345]
              KL=[0.08, 0.08, 0.08, 0.08, 0.074, 0.059, 0.043, 0.027, 0.008, 0]
              XF=[1, 0.94, 0.895, 0.805, 0.747, 0.722, 0.713, 0.719, 0.726, 0]
            SoilCrop LucerneSoil
              LL=[0.262, 0.26, 0.26, 0.26, 0.258, 0.252, 0.252, 0.262, 0.275, 0.292]
              KL=[0.1, 0.1, 0.1, 0.1, 0.1, 0.1, 0.097, 0.085, 0.069, 0.051]
              XF=[1, 0.94, 0.895, 0.805, 0.747, 0.722, 0.713, 0.719, 0.726, 0.735]
            SoilCrop LupinSoil: same as Validation.Pugliese2019.Field.Synthetic Soil Derived from ISRIC SoilGrids.Physical.RiceSoil
            SoilCrop LentilSoil: same as Validation.Pugliese2019.Field.Synthetic Soil Derived from ISRIC SoilGrids.Physical.RiceSoil
            SoilCrop TriticaleSoil
              LL=[0.262, 0.26, 0.269, 0.284, 0.301, 0.32, 0.34, 0.346, 0.345, 0.345]
              KL=[0.07, 0.07, 0.064, 0.053, 0.038, 0.021, 0.004, 0, 0, 0]
              XF=[1, 0.94, 0.895, 0.805, 0.747, 0.722, 0.713, 0, 0, 0]
            SoilCrop EucalyptusSoil
              LL=[0.262, 0.26, 0.26, 0.261, 0.259, 0.256, 0.254, 0.253, 0.253, 0.252]
              KL=[0.08, 0.08, 0.08, 0.079, 0.078, 0.077, 0.076, 0.075, 0.074, 0.072]
              XF=[1, 0.94, 0.895, 0.805, 0.747, 0.722, 0.713, 0.719, 0.726, 0.735]
            SoilCrop GliricidiaSoil
              LL=[0.262, 0.26, 0.26, 0.262, 0.261, 0.259, 0.259, 0.26, 0.261, 0.263]
              KL=[0.08, 0.08, 0.08, 0.079, 0.077, 0.074, 0.072, 0.07, 0.067, 0.063]
              XF=[1, 0.94, 0.895, 0.805, 0.747, 0.722, 0.713, 0.719, 0.726, 0.735]
            SoilCrop PinusSoil: same as Validation.Pugliese2019.Field.Synthetic Soil Derived from ISRIC SoilGrids.Physical.EucalyptusSoil
            SoilCrop SCRUMSoil: same as Validation.Pugliese2019.Field.Synthetic Soil Derived from ISRIC SoilGrids.Physical.RiceSoil
            SoilCrop IntermediateWheatgrassSoil: same as Parameterisation.Fernandez2020a.Field.Synthetic Soil Derived from ISRIC SoilGrids.Physical.IntermediateWheatgrassSoil
          WaterBalance SoilWater: SummerDate=1-may; SummerU=6; SummerCona=6; WinterDate=1-oct; WinterU=2; WinterCona=2; DiffusConst=33.53; DiffusSlope=45.96; Salb=0.12; CN2Bare=73; CNRed=20; CNCov=0; DischargeWidth=5; CatchmentArea=10; PSIDul=-100; Thickness=[150, 150, 150, 150, 200, 200, 200, 200, 300, 300]
            SWCON=[0.409, 0.41, 0.403, 0.402, 0.36, 0.373, 0.382, 0.389, 0.342, 0.354]
          Organic: FOMCNRatio=40; CarbonUnits=Total
            Thickness  Carbon  SoilCNRatio  FBiom  FInert  FOM
            150        2.777   10.2         0.04   0.221   12.1288
            150        1.843   10.2         0.031  0.321   9.68504
            150        1.229   10.2         0.014  0.477   7.73366
            150        0.803   10.2         0.01   0.714   6.17546
            200        0.523   10.2         0.01   0.99    4.57489
            200        0.376   10.2         0.01   0.99    3.38916
            200        0.294   10.2         0.01   0.99    2.51075
            200        0.277   10.2         0.01   0.99    1.86001
            300        0.254   10.2         0.01   0.99    1.186
            300        0.228   10.2         0.01   0.99    0.756224
          Chemical: Thickness=[150, 150, 150, 150, 200, 200, 200, 200, 300, 300]; PH=[6.2, 6.15, 6.1, 6.1, 6.23, 6.48, 6.67, 6.81, 6.99, 7.2]; PHUnits=Water
          Nutrient
          Solute NO3: same as Parameterisation.Innes2024a.Field.Synthetic Soil Derived from ISRIC SoilGrids.NO3
          Solute NH4: same as Parameterisation.Innes2024a.Field.Synthetic Soil Derived from ISRIC SoilGrids.NO3
          Solute Urea: same as Parameterisation.Innes2024a.Field.Synthetic Soil Derived from ISRIC SoilGrids.Urea
          SoilTemperature Temperature
    Simulation Jungers2022a
      Clock: Start=2015-01-01; End=2016-08-31
      Weather: FileName=StPaul2015.met
      Summary summaryfile
      SoilArbitrator Soil Arbitrator
      Zone Field: Area=1; Slope=0; AspectAngle=0; Altitude=50
        MicroClimate: a_interception=0; b_interception=1; c_interception=0; d_interception=0; SoilHeatFluxFraction=0.4; MinimumHeightDiffForNewLayer=0; NightInterceptionFraction=0.5; ReferenceHeight=2
        Irrigation
        Fertiliser
        SurfaceOrganicMatter: InitialResidueName=grass; InitialResidueType=soybean; InitialResidueMass=1000; InitialStandingFraction=0; InitialCPR=0; InitialCNR=30
        Plant IntermediateWheatgrass
        Operations Sowing
          2015-09-05  [IntermediateWheatgrass].Sow(population: 50, cultivar: "Kernza", depth: 20, rowSpacing: 1000)
          2016-05-15  [Fertiliser].Apply(amount: 140, type: "UreaN", depth: 10)
          2016-08-15  [IntermediateWheatgrass].Harvest()
        Operations IrrigationSchedule (disabled): same as Parameterisation.Fernandez2020a.Field.IrrigationSchedule
        Manager HarvestingRule: same as Parameterisation.Innes2024a.Field.HarvestingRule
        Soil Synthetic Soil Derived from ISRIC SoilGrids1: same as Parameterisation.Jungers2018.Field.Synthetic Soil Derived from ISRIC SoilGrids1
        Report: same as Parameterisation.Innes2024a.Field.Report
        Manager PhenologyRulesDAS: same as Parameterisation.Innes2024a.Field.PhenologyRulesDAS
    Simulation Jungers2022b
      Clock: Start=2015-01-01; End=2016-08-31
      Weather: FileName=StPaul2015.met
      Summary summaryfile
      SoilArbitrator Soil Arbitrator
      Zone Field: Area=1; Slope=0; AspectAngle=0; Altitude=50
        MicroClimate: a_interception=0; b_interception=1; c_interception=0; d_interception=0; SoilHeatFluxFraction=0.4; MinimumHeightDiffForNewLayer=0; NightInterceptionFraction=0.5; ReferenceHeight=2
        Irrigation
        Fertiliser
        SurfaceOrganicMatter: InitialResidueName=grass; InitialResidueType=soybean; InitialResidueMass=1000; InitialStandingFraction=0; InitialCPR=0; InitialCNR=30
        Plant IntermediateWheatgrass
        Operations Sowing
          2015-10-05  [IntermediateWheatgrass].Sow(population: 50, cultivar: "Kernza", depth: 20, rowSpacing: 1000)
          2016-05-15  [Fertiliser].Apply(amount: 140, type: "UreaN", depth: 10)
          2016-08-15  [IntermediateWheatgrass].Harvest()
        Operations IrrigationSchedule (disabled): same as Parameterisation.Fernandez2020a.Field.IrrigationSchedule
        Manager HarvestingRule: same as Parameterisation.Innes2024a.Field.HarvestingRule
        Soil Synthetic Soil Derived from ISRIC SoilGrids1: same as Parameterisation.Jungers2018.Field.Synthetic Soil Derived from ISRIC SoilGrids1
        Report: same as Parameterisation.Innes2024a.Field.Report
        Manager PhenologyRulesDAS: same as Parameterisation.Innes2024a.Field.PhenologyRulesDAS
    Simulation Jungers2022c
      Clock: Start=2015-01-01; End=2016-08-31
      Weather: FileName=StPaul2015.met
      Summary summaryfile
      SoilArbitrator Soil Arbitrator
      Zone Field: Area=1; Slope=0; AspectAngle=0; Altitude=50
        MicroClimate: a_interception=0; b_interception=1; c_interception=0; d_interception=0; SoilHeatFluxFraction=0.4; MinimumHeightDiffForNewLayer=0; NightInterceptionFraction=0.5; ReferenceHeight=2
        Irrigation
        Fertiliser
        SurfaceOrganicMatter: InitialResidueName=grass; InitialResidueType=soybean; InitialResidueMass=1000; InitialStandingFraction=0; InitialCPR=0; InitialCNR=30
        Plant IntermediateWheatgrass
        Operations Sowing
          2015-12-05  [IntermediateWheatgrass].Sow(population: 50, cultivar: "Kernza", depth: 20, rowSpacing: 1000)
          2016-05-15  [Fertiliser].Apply(amount: 140, type: "UreaN", depth: 10)
          2016-08-15  [IntermediateWheatgrass].Harvest()
        Operations IrrigationSchedule (disabled): same as Parameterisation.Fernandez2020a.Field.IrrigationSchedule
        Manager HarvestingRule: same as Parameterisation.Innes2024a.Field.HarvestingRule
        Soil Synthetic Soil Derived from ISRIC SoilGrids1: same as Parameterisation.Jungers2018.Field.Synthetic Soil Derived from ISRIC SoilGrids1
        Report: same as Parameterisation.Innes2024a.Field.Report
        Manager PhenologyRulesDAS: same as Parameterisation.Innes2024a.Field.PhenologyRulesDAS
    Simulation Jungers2022d
      Clock: Start=2016-01-01; End=2017-08-31
      Weather: FileName=StPaul2015.met
      Summary summaryfile
      SoilArbitrator Soil Arbitrator
      Zone Field: Area=1; Slope=0; AspectAngle=0; Altitude=50
        MicroClimate: a_interception=0; b_interception=1; c_interception=0; d_interception=0; SoilHeatFluxFraction=0.4; MinimumHeightDiffForNewLayer=0; NightInterceptionFraction=0.5; ReferenceHeight=2
        Irrigation
        Fertiliser
        SurfaceOrganicMatter: InitialResidueName=grass; InitialResidueType=soybean; InitialResidueMass=1000; InitialStandingFraction=0; InitialCPR=0; InitialCNR=30
        Plant IntermediateWheatgrass
        Operations Sowing
          2016-09-01  [IntermediateWheatgrass].Sow(population: 50, cultivar: "Kernza", depth: 20, rowSpacing: 1000)
          2017-05-15  [Fertiliser].Apply(amount: 140, type: "UreaN", depth: 10)
          2017-08-15  [IntermediateWheatgrass].Harvest()
        Operations IrrigationSchedule (disabled): same as Parameterisation.Fernandez2020a.Field.IrrigationSchedule
        Manager HarvestingRule: same as Parameterisation.Innes2024a.Field.HarvestingRule
        Soil Synthetic Soil Derived from ISRIC SoilGrids1: same as Parameterisation.Jungers2018.Field.Synthetic Soil Derived from ISRIC SoilGrids1
        Report: same as Parameterisation.Innes2024a.Field.Report
        Manager PhenologyRulesDAS: same as Parameterisation.Innes2024a.Field.PhenologyRulesDAS
    Simulation Jungers2022e
      Clock: Start=2016-01-01; End=2017-08-31
      Weather: FileName=StPaul2015.met
      Summary summaryfile
      SoilArbitrator Soil Arbitrator
      Zone Field: Area=1; Slope=0; AspectAngle=0; Altitude=50
        MicroClimate: a_interception=0; b_interception=1; c_interception=0; d_interception=0; SoilHeatFluxFraction=0.4; MinimumHeightDiffForNewLayer=0; NightInterceptionFraction=0.5; ReferenceHeight=2
        Irrigation
        Fertiliser
        SurfaceOrganicMatter: InitialResidueName=grass; InitialResidueType=soybean; InitialResidueMass=1000; InitialStandingFraction=0; InitialCPR=0; InitialCNR=30
        Plant IntermediateWheatgrass
        Operations Sowing
          2016-10-15  [IntermediateWheatgrass].Sow(population: 50, cultivar: "Kernza", depth: 20, rowSpacing: 1000)
          2017-05-15  [Fertiliser].Apply(amount: 140, type: "UreaN", depth: 10)
          2017-08-15  [IntermediateWheatgrass].Harvest()
        Operations IrrigationSchedule (disabled)
        Manager HarvestingRule: same as Parameterisation.Innes2024a.Field.HarvestingRule
        Soil Synthetic Soil Derived from ISRIC SoilGrids1: same as Parameterisation.Jungers2018.Field.Synthetic Soil Derived from ISRIC SoilGrids1
        Report: EventNames=[Clock].EndOfDay
          VariableNames:
            [Clock].Today as Date
            [IntermediateWheatgrass].Population
            [IntermediateWheatgrass].PlantType
            [IntermediateWheatgrass].Leaf.RadiationIntercepted as InterceptedRadiation
            [IntermediateWheatgrass].AboveGround.Wt*10 as totalBiomass
            [IntermediateWheatgrass].BelowGround.Wt*10 as Roots
            [IntermediateWheatgrass].Leaf.Live.NConc
            [IntermediateWheatgrass].Leaf.LAI*100
            [IntermediateWheatgrass].Leaf.Live.Wt*10 as LeavesWeight
            [IntermediateWheatgrass].Stem.Live.Wt*10 as StemsWeight
            [IntermediateWheatgrass].Spike.Live.Wt*10 as SpikesWeight
            [IntermediateWheatgrass].Grain.Live.Wt*10 as GrainWeight
            [IntermediateWheatgrass].Root.Live.Wt*10 as RootsWeight
            [IntermediateWheatgrass].Leaf.Senesced.Wt*10 as LeavesDeadWeight
            [IntermediateWheatgrass].Stem.Senesced.Wt*10 as StemsDeadWeight
            [IntermediateWheatgrass].Spike.Senesced.Wt*10 as SpikesDeadWeight
            [IntermediateWheatgrass].Phenology.CurrentStageName
            [IntermediateWheatgrass].Phenology.CurrentPhaseName
            [IntermediateWheatgrass].Phenology.Stage
            [Phenology].Vernalisation.TodaysVernalisation*100
            LeavesWeight+LeavesDeadWeight+StemsWeight+StemsDeadWeight+SpikesWeight+SpikesDeadWeight+GrainWeight as AboveGndBiomass
            [Phenology].StageToZadok
            [IntermediateWheatgrass].Phenology.AccumulatedTT
            [IntermediateWheatgrass].Phenology.ThermalStress
            [Leaf].Fw
            [Leaf].Fn
            [Phenology].Reproductive.Progression
            [Phenology].ThermalTime
            [Soil].Temperature.AverageSoilSurfaceTemperature
        Manager PhenologyRulesDAS: same as Parameterisation.Innes2024a.Field.PhenologyRulesDAS
    Simulation Barriball2022
      Clock: Start=2017-06-01; End=2019-10-31
      Weather: FileName=Salina2018.met
      Summary summaryfile
      SoilArbitrator Soil Arbitrator
      Zone Field: Area=1; Slope=0; AspectAngle=0; Altitude=50
        MicroClimate: a_interception=0; b_interception=1; c_interception=0; d_interception=0; SoilHeatFluxFraction=0.4; MinimumHeightDiffForNewLayer=0; NightInterceptionFraction=0.5; ReferenceHeight=2
        Irrigation
        Fertiliser
        SurfaceOrganicMatter: InitialResidueName=grass; InitialResidueType=grass; InitialResidueMass=1000; InitialStandingFraction=0; InitialCPR=0; InitialCNR=30
        Plant IntermediateWheatgrass
        Operations Sowing
          2017-09-26  [IntermediateWheatgrass].Sow(population: 50, cultivar: "Kernza", depth: 5, rowSpacing: 300)
          2019-03-01  [Fertiliser].Apply(amount: 174, type: "UreaN", depth: 10)
          2018-07-07  [IntermediateWheatgrass].Harvest()
        Manager HarvestingRule: same as Parameterisation.Innes2024a.Field.HarvestingRule
        Operations IrrigationSchedule (disabled)
        Soil Synthetic Soil Derived from ISRIC SoilGrids: ASCOrder=NA; ASCSubOrder=NA; SoilType=Haplic Kastanozems; Site=NA; NearestTown=NA; Region=NA; State=NA; Country=United States of America; NaturalVegetation=NA; ApsoilNumber=9999; Latitude=38.875; Longitude=-97.625; LocationAccuracy=+- 250 m; YearOfSampling=2019; DataSource=ISRIC SoilGrids
          Water: Thickness=[150, 150, 150, 150, 200, 200, 200, 200, 300, 300]; FilledFromTop=true
            InitialValues=[0.252, 0.25, 0.25, 0.25, 0.247, 0.242, 0.24, 0.24, 0.24, 0.24]
          WaterBalance SoilWater: SummerDate=1-may; SummerU=6; SummerCona=6; WinterDate=1-oct; WinterU=2; WinterCona=2; DiffusConst=56.18; DiffusSlope=48.92; Salb=0.12; CN2Bare=73; CNRed=20; CNCov=0; DischargeWidth=5; CatchmentArea=10; PSIDul=-100; Thickness=[150, 150, 150, 150, 200, 200, 200, 200, 300, 300]
            SWCON=[0.413, 0.419, 0.416, 0.433, 0.39, 0.395, 0.396, 0.393, 0.322, 0.32]
          Organic: FOMCNRatio=40; CarbonUnits=Total
            Thickness  Carbon  SoilCNRatio  FBiom  FInert  FOM
            150        1.715   10.2         0.04   0.361   36.3864
            150        1.104   10.2         0.031  0.523   29.0551
            150        0.819   10.2         0.014  0.685   23.201
            150        0.657   10.2         0.01   0.841   18.5264
            200        0.514   10.2         0.01   0.99    13.7247
            200        0.388   10.2         0.01   0.99    10.1675
            200        0.318   10.2         0.01   0.99    7.53226
            200        0.302   10.2         0.01   0.99    5.58003
            300        0.283   10.2         0.01   0.99    3.55799
            300        0.259   10.2         0.01   0.99    2.26867
          Chemical: Thickness=[150, 150, 150, 150, 200, 200, 200, 200, 300, 300]; PHUnits=Water
            PH=[6.55, 6.75, 6.98, 7.12, 7.28, 7.42, 7.51, 7.53, 7.56, 7.58]
          Nutrient
          Solute NO3: same as Parameterisation.Innes2024a.Field.Synthetic Soil Derived from ISRIC SoilGrids.NO3
          Solute NH4: same as Parameterisation.Innes2024a.Field.Synthetic Soil Derived from ISRIC SoilGrids.NO3
          Solute Urea: same as Parameterisation.Innes2024a.Field.Synthetic Soil Derived from ISRIC SoilGrids.Urea
          Physical: same as Parameterisation.Innes2024a.Field.Synthetic Soil Derived from ISRIC SoilGrids.Physical
          SoilTemperature Temperature
        Report: same as Parameterisation.Innes2024a.Field.Report
        Manager PhenologyRulesDAS: same as Parameterisation.Innes2024a.Field.PhenologyRulesDAS
  Folder SensibilityIrrigation
    Folder NoIrrigation
      Simulation CowraIWGNoIrrigation
        Clock: Start=2006-01-01; End=2009-05-28
        Weather: FileName=Cowra.met
        Summary summaryfile
        SoilArbitrator Soil Arbitrator
        Zone Field: Area=1; Slope=0; AspectAngle=0; Altitude=50
          MicroClimate: a_interception=0; b_interception=1; c_interception=0; d_interception=0; SoilHeatFluxFraction=0.4; MinimumHeightDiffForNewLayer=0; NightInterceptionFraction=0.5; ReferenceHeight=2
          Irrigation
          Fertiliser
          SurfaceOrganicMatter: InitialResidueName=grass; InitialResidueType=grass; InitialResidueMass=1000; InitialStandingFraction=0; InitialCPR=0; InitialCNR=30
          Plant IntermediateWheatgrass
          Soil Synthetic Soil Derived from ISRIC SoilGrids: ASCOrder=NA; ASCSubOrder=NA; SoilType=Haplic Luvisols; Site=NA; NearestTown=NA; Region=NA; State=NA; Country=Australia; NaturalVegetation=NA; ApsoilNumber=9999; Latitude=-33.875; Longitude=148.625; LocationAccuracy=+- 250 m; YearOfSampling=2019; DataSource=ISRIC SoilGrids
            Water: Thickness=[150, 150, 150, 150, 200, 200, 200, 200, 300, 300]; FilledFromTop=true
              InitialValues=[0.19, 0.2, 0.217, 0.232, 0.237, 0.233, 0.23, 0.23, 0.23, 0.23]
            Physical: same as Parameterisation.Innes2024a.Field.Synthetic Soil Derived from ISRIC SoilGrids.Physical
            WaterBalance SoilWater: same as Parameterisation.Innes2024a.Field.Synthetic Soil Derived from ISRIC SoilGrids.SoilWater
            Organic: FOMCNRatio=40; CarbonUnits=Total
              Thickness  Carbon  SoilCNRatio  FBiom  FInert  FOM
              150        2.5     8.2          0.04   0.194   60.644
              150        2.5     8.2          0.031  0.305   48.4252
              150        2.5     8.2          0.014  0.561   38.6683
              150        2       8.2          0.01   0.772   30.8773
              200        2       8.2          0.01   0.99    22.8745
              200        2       8.2          0.01   0.99    16.9458
              200        2       8.2          0.01   0.99    12.5538
              200        2       8.2          0.01   0.99    9.30006
              300        2       8.2          0.01   0.99    5.92998
              300        2       8.2          0.01   0.99    3.78112
            Chemical: Thickness=[150, 150, 150, 150, 200, 200, 200, 200, 300, 300]; PH=[6.3, 6.45, 6.7, 6.9, 7.08, 7.23, 7.32, 7.36, 7.41, 7.47]; PHUnits=Water
            Nutrient
            Solute NO3: same as Parameterisation.Innes2024a.Field.Synthetic Soil Derived from ISRIC SoilGrids.NO3
            Solute NH4: same as Parameterisation.Innes2024a.Field.Synthetic Soil Derived from ISRIC SoilGrids.NO3
            Solute Urea: same as Parameterisation.Innes2024a.Field.Synthetic Soil Derived from ISRIC SoilGrids.Urea
            SoilTemperature Temperature
          Manager HarvestingRule: same as Parameterisation.Innes2024a.Field.HarvestingRule
          Manager PhenologyRulesDAS: same as Parameterisation.Innes2024a.Field.PhenologyRulesDAS
          Manager BiomassRemovalRule: same as Parameterisation.Innes2024a.Field.BiomassRemovalRule
          Report: EventNames=[Clock].EndOfDay
            VariableNames:
              [Clock].Today as Date
              [IntermediateWheatgrass].Population
              [IntermediateWheatgrass].PlantType
              [IntermediateWheatgrass].Leaf.RadiationIntercepted as InterceptedRadiation
              [IntermediateWheatgrass].AboveGround.Wt*10 as totalBiomass
              [IntermediateWheatgrass].BelowGround.Wt*10 as Roots
              [IntermediateWheatgrass].Leaf.Live.NConc
              [IntermediateWheatgrass].Leaf.LAI*100
              [IntermediateWheatgrass].Leaf.Live.Wt*10 as LeavesWeight
              [IntermediateWheatgrass].Stem.Live.Wt*10 as StemsWeight
              [IntermediateWheatgrass].Spike.Live.Wt*10 as SpikesWeight
              [IntermediateWheatgrass].Grain.Live.Wt*10 as GrainWeight
              [IntermediateWheatgrass].Root.Live.Wt*10 as RootsWeight
              [IntermediateWheatgrass].Leaf.Senesced.Wt*10 as LeavesDeadWeight
              [IntermediateWheatgrass].Stem.Senesced.Wt*10 as StemsDeadWeight
              [IntermediateWheatgrass].Spike.Senesced.Wt*10 as SpikesDeadWeight
              [IntermediateWheatgrass].Phenology.CurrentStageName
              [IntermediateWheatgrass].Phenology.CurrentPhaseName
              [IntermediateWheatgrass].Phenology.Stage
              [Phenology].Vernalisation.TodaysVernalisation*100
              LeavesWeight+LeavesDeadWeight+StemsWeight+StemsDeadWeight+SpikesWeight+SpikesDeadWeight+GrainWeight as AboveGndBiomass
              [Phenology].StageToZadok
              [IntermediateWheatgrass].Phenology.AccumulatedTT
              [IntermediateWheatgrass].Phenology.ThermalStress
              [Leaf].FW
              [Leaf].Photosynthesis.FW
              [Leaf].Fn
              [Phenology].Reproductive.Progression
              [Phenology].ThermalTime
              [Leaf].WaterAllocation as WaterAllocation
              [Leaf].WaterDemand as WaterDemand
              [Leaf].PotentialEP as PotentialEvapTransp
              [Leaf].WaterAllocation / ([Leaf].WaterDemand + 1) as WaterDeficit
              WaterAllocation/(PotentialEvapTransp + 1) as MoistureStress
          Operations Sowing1
            2006-05-22  [IntermediateWheatgrass].Sow(population: 50, cultivar: "Kernza", depth: 20, rowSpacing: 150)
            2006-05-18  [Fertiliser].Apply(amount: 200, type: "DAP", depth: 10)
            2007-05-18  [Fertiliser].Apply(amount: 200, type: "DAP", depth: 10)
            2008-05-18  [Fertiliser].Apply(amount: 200, type: "DAP", depth: 10)
            2007-02-15  [IntermediateWheatgrass].Harvest()
            2008-02-15  [IntermediateWheatgrass].Harvest()
            2009-02-15  [IntermediateWheatgrass].Harvest()
    Folder IrrigationLow
      Simulation CowraIWGIrrigationLow
        Clock: Start=2006-01-01; End=2009-05-28
        Weather: FileName=Cowra.met
        Summary summaryfile
        SoilArbitrator Soil Arbitrator
        Zone Field: Area=1; Slope=0; AspectAngle=0; Altitude=50
          MicroClimate: a_interception=0; b_interception=1; c_interception=0; d_interception=0; SoilHeatFluxFraction=0.4; MinimumHeightDiffForNewLayer=0; NightInterceptionFraction=0.5; ReferenceHeight=2
          Irrigation
          Fertiliser
          SurfaceOrganicMatter: InitialResidueName=grass; InitialResidueType=grass; InitialResidueMass=1000; InitialStandingFraction=0; InitialCPR=0; InitialCNR=30
          Plant IntermediateWheatgrass
          Soil Synthetic Soil Derived from ISRIC SoilGrids: same as SensibilityIrrigation.NoIrrigation.CowraIWGNoIrrigation.Field.Synthetic Soil Derived from ISRIC SoilGrids
          Manager HarvestingRule: same as Parameterisation.Innes2024a.Field.HarvestingRule
          Manager PhenologyRulesDAS: same as Parameterisation.Innes2024a.Field.PhenologyRulesDAS
          Manager BiomassRemovalRule: same as Parameterisation.Innes2024a.Field.BiomassRemovalRule
          Manager Irrigate on fixed dates
            IrrigateDates = 24-jan, 24-feb, 24-mar, 24-apr, 24-may, 24-jun, 24-jul, 24-aug, 24-sep, 24-oct, 24-nov, 24-dec
            Amount = 30
            Depth = 10
            Efficiency = 1
            WillRunoff = False
```csharp
using Models.Soils;
using System;
using System.Linq;
using Models.Core;
using Models.PMF;
using APSIM.Shared.Utilities;
namespace Models
{
    [Serializable]
    public class Script : Model
    {
        [Link] Clock Clock;
        [Link] Irrigation Irrigation;
        
        [Separator("A component to apply irrigation on one or more dates on every year of the simulation")]

        [Description("Enter the irrigation dates as dd-mmm with comma separation (any year information entered will be ignored)")] 
        public string[] IrrigateDates { get; set; }
        
        [Description("Amount of irrigation to be applied (mm)")] 
        public double Amount { get; set; }
        
        [Description("Depth in the soil to apply the  irrigation (mm)")] 
        public double Depth { get; set; }
        
        [Description("Efficiency of irrigation (0-1)")] 
        public double Efficiency { get; set; }
        
        [Description("Will the irrigation runoff?")] 
        public bool WillRunoff { get; set; }
        
        [EventSubscribe("DoManagement")]
        private void OnDoManagement(object sender, EventArgs e)
        {
            foreach (string ddMMM in IrrigateDates)
            {
                if (DateUtilities.DatesEqual(ddMMM, Clock.Today))
                    Irrigation.Apply(amount: Amount, depth: Depth, efficiency: Efficiency, willRunoff: WillRunoff);
            }
        }
    }
}
```
          Report: same as SensibilityIrrigation.NoIrrigation.CowraIWGNoIrrigation.Field.Report
          Operations Sowing1: same as SensibilityIrrigation.NoIrrigation.CowraIWGNoIrrigation.Field.Sowing1
    Folder IrrigationHigh
      Simulation CowraIWGIrrigationHigh
        Clock: Start=2006-01-01; End=2009-05-28
        Weather: FileName=Cowra.met
        Summary summaryfile
        SoilArbitrator Soil Arbitrator
        Zone Field: Area=1; Slope=0; AspectAngle=0; Altitude=50
          MicroClimate: a_interception=0; b_interception=1; c_interception=0; d_interception=0; SoilHeatFluxFraction=0.4; MinimumHeightDiffForNewLayer=0; NightInterceptionFraction=0.5; ReferenceHeight=2
          Irrigation
          Fertiliser
          SurfaceOrganicMatter: InitialResidueName=grass; InitialResidueType=grass; InitialResidueMass=1000; InitialStandingFraction=0; InitialCPR=0; InitialCNR=30
          Plant IntermediateWheatgrass
          Soil Synthetic Soil Derived from ISRIC SoilGrids: ASCOrder=NA; ASCSubOrder=NA; SoilType=Haplic Luvisols; Site=NA; NearestTown=NA; Region=NA; State=NA; Country=Australia; NaturalVegetation=NA; ApsoilNumber=9999; Latitude=-33.875; Longitude=148.625; LocationAccuracy=+- 250 m; YearOfSampling=2019; DataSource=ISRIC SoilGrids
            Water: Thickness=[150, 150, 150, 150, 200, 200, 200, 200, 300, 300]; FilledFromTop=true
              InitialValues=[0.19, 0.2, 0.217, 0.232, 0.237, 0.233, 0.23, 0.23, 0.23, 0.23]
            Physical: same as Parameterisation.Innes2024a.Field.Synthetic Soil Derived from ISRIC SoilGrids.Physical
            WaterBalance SoilWater: same as Parameterisation.Innes2024a.Field.Synthetic Soil Derived from ISRIC SoilGrids.SoilWater
            Organic: same as SensibilityIrrigation.NoIrrigation.CowraIWGNoIrrigation.Field.Synthetic Soil Derived from ISRIC SoilGrids.Organic
            Chemical: Thickness=[150, 150, 150, 150, 200, 200, 200, 200, 300, 300]; PH=[6.3, 6.5, 6.7, 6.9, 7.1, 7.2, 7.3, 7.4, 7.4, 7.5]; PHUnits=Water
            Nutrient
            Solute NO3: same as Parameterisation.Innes2024a.Field.Synthetic Soil Derived from ISRIC SoilGrids.NO3
            Solute NH4: same as Parameterisation.Innes2024a.Field.Synthetic Soil Derived from ISRIC SoilGrids.NO3
            Solute Urea: same as Parameterisation.Innes2024a.Field.Synthetic Soil Derived from ISRIC SoilGrids.Urea
            SoilTemperature Temperature
          Manager HarvestingRule: same as Parameterisation.Innes2024a.Field.HarvestingRule
          Manager PhenologyRulesDAS: same as Parameterisation.Innes2024a.Field.PhenologyRulesDAS
          Manager BiomassRemovalRule: same as Parameterisation.Innes2024a.Field.BiomassRemovalRule
          Manager Irrigate on fixed dates
            IrrigateDates = 7-jan, 14-jan, 21-jan, 28-jan, 7-feb, 14-feb, 21-feb, 28-feb, 7-mar, 14-mar, 21-mar, 28-mar, 7-apr, 14-apr, 21-apr, 28-apr, 7-may, 14-may, 21-may, 28-may, 7-jun, 14-jun, 21-jun, 28-jun, 7-jul, 14-jul, 21-jul, 28-jul, 7-aug, 14-aug, 21-aug, 28-aug, 7-sep, 14-sep, 21-sep, 28-sep, 7-oct, 14-oct, 21-oct, 28-oct, 7-nov, 14-nov, 21-nov, 28-nov, 7-dec, 14-dec, 21-dec, 28-dec
            Amount = 15
            Depth = 10
            Efficiency = 1
            WillRunoff = False
            script: same as in SensibilityIrrigation.IrrigationLow.CowraIWGIrrigationLow.Field.Irrigate on fixed dates
          Report: same as SensibilityIrrigation.NoIrrigation.CowraIWGNoIrrigation.Field.Report
          Operations Sowing1: same as SensibilityIrrigation.NoIrrigation.CowraIWGNoIrrigation.Field.Sowing1
  Folder SensibilityFertiliser
    Folder Fertiliser0kg
      Simulation CowraIWGFertiliser0kg
        Clock: Start=2006-01-01; End=2009-05-28
        Weather: FileName=Cowra.met
        Summary summaryfile
        SoilArbitrator Soil Arbitrator
        Zone Field: Area=1; Slope=0; AspectAngle=0; Altitude=50
          MicroClimate: a_interception=0; b_interception=1; c_interception=0; d_interception=0; SoilHeatFluxFraction=0.4; MinimumHeightDiffForNewLayer=0; NightInterceptionFraction=0.5; ReferenceHeight=2
          Irrigation
          Fertiliser
          SurfaceOrganicMatter: InitialResidueName=grass; InitialResidueType=grass; InitialResidueMass=1000; InitialStandingFraction=0; InitialCPR=0; InitialCNR=30
          Plant IntermediateWheatgrass
          Soil Synthetic Soil Derived from ISRIC SoilGrids: ASCOrder=NA; ASCSubOrder=NA; SoilType=Haplic Luvisols; Site=NA; NearestTown=NA; Region=NA; State=NA; Country=Australia; NaturalVegetation=NA; ApsoilNumber=9999; Latitude=-33.875; Longitude=148.625; LocationAccuracy=+- 250 m; YearOfSampling=2019; DataSource=ISRIC SoilGrids
            Water: Thickness=[150, 150, 150, 150, 200, 200, 200, 200, 300, 300]; FilledFromTop=true
              InitialValues=[0.19, 0.2, 0.217, 0.232, 0.237, 0.233, 0.23, 0.23, 0.23, 0.23]
            Physical: same as Parameterisation.Innes2024a.Field.Synthetic Soil Derived from ISRIC SoilGrids.Physical
            WaterBalance SoilWater: same as Parameterisation.Innes2024a.Field.Synthetic Soil Derived from ISRIC SoilGrids.SoilWater
            Organic: FOMCNRatio=40; CarbonUnits=Total
              Thickness  Carbon  SoilCNRatio  FBiom  FInert  FOM
              150        2.5     20           0.04   0.194   60.644
              150        2.5     20           0.031  0.305   48.4252
              150        2.5     20           0.014  0.561   38.6683
              150        2       20           0.01   0.772   30.8773
              200        2       20           0.01   0.99    22.8745
              200        2       20           0.01   0.99    16.9458
              200        2       20           0.01   0.99    12.5538
              200        2       20           0.01   0.99    9.30006
              300        2       20           0.01   0.99    5.92998
              300        2       20           0.01   0.99    3.78112
            Chemical: Thickness=[150, 150, 150, 150, 200, 200, 200, 200, 300, 300]; PH=[6.3, 6.45, 6.7, 6.9, 7.08, 7.23, 7.32, 7.36, 7.41, 7.47]; PHUnits=Water
            Nutrient
            Solute NO3: same as Parameterisation.Innes2024a.Field.Synthetic Soil Derived from ISRIC SoilGrids.NO3
            Solute NH4: same as Parameterisation.Innes2024a.Field.Synthetic Soil Derived from ISRIC SoilGrids.NO3
            Solute Urea: same as Parameterisation.Innes2024a.Field.Synthetic Soil Derived from ISRIC SoilGrids.Urea
            SoilTemperature Temperature
          Manager HarvestingRule: same as Parameterisation.Innes2024a.Field.HarvestingRule
          Operations Sowing
            2006-05-22  [IntermediateWheatgrass].Sow(population: 50, cultivar: "Kernza", depth: 20, rowSpacing: 150)
            2007-02-15  [IntermediateWheatgrass].Harvest()
            2008-02-15  [IntermediateWheatgrass].Harvest()
            2009-02-15  [IntermediateWheatgrass].Harvest()
          Manager PhenologyRulesDAS: same as Parameterisation.Innes2024a.Field.PhenologyRulesDAS
          Manager BiomassRemovalRule: same as Parameterisation.Innes2024a.Field.BiomassRemovalRule
          Report: same as SensibilityIrrigation.NoIrrigation.CowraIWGNoIrrigation.Field.Report
          Manager Irrigate on fixed dates (disabled)
            IrrigateDates = 24-jan, 24-mar, 24-may, 24-jun, 24-jul, 24-aug, 24-sep, 24-oct, 24-nov, 24-dec
            Amount = 130
            Depth = 0
            Efficiency = 1
            WillRunoff = False
            script: same as in SensibilityIrrigation.IrrigationLow.CowraIWGIrrigationLow.Field.Irrigate on fixed dates
          Manager Irrigate on fixed dates1
            IrrigateDates = 7-jan, 14-jan, 21-jan, 28-jan, 7-feb, 14-feb, 21-feb, 28-mar, 7-mar, 14-mar, 21-mar, 7-apr, 14-apr, 21-apr, 7-mar, 14-mar, 21-mar, 7-apr, 14-apr, 28-apr, 7-may, 14-may, 21-may, 7-jun, 14-jun, 21-jun, 7-jul, 14-jul, 21-jul, 7-aug, 14-aug, 21-aug, 7-sep, 14-sep, 21-sep, 7-oct, 14-oct, 21-oct, 7-nov, 14-nov, 21-nov, 7-dec, 14-dec, 21-dec
            Amount = 30
            Depth = 0
            Efficiency = 1
            WillRunoff = False
            script: same as in SensibilityIrrigation.IrrigationLow.CowraIWGIrrigationLow.Field.Irrigate on fixed dates
    Folder Fertiliser50kg
      Simulation CowraIWGFertiliser50kg
        Clock: Start=2006-01-01; End=2009-05-28
        Weather: FileName=Cowra.met
        Summary summaryfile
        SoilArbitrator Soil Arbitrator
        Zone Field: Area=1; Slope=0; AspectAngle=0; Altitude=50
          MicroClimate: a_interception=0; b_interception=1; c_interception=0; d_interception=0; SoilHeatFluxFraction=0.4; MinimumHeightDiffForNewLayer=0; NightInterceptionFraction=0.5; ReferenceHeight=2
          Irrigation
          Fertiliser
          SurfaceOrganicMatter: InitialResidueName=grass; InitialResidueType=grass; InitialResidueMass=1000; InitialStandingFraction=0; InitialCPR=0; InitialCNR=30
          Plant IntermediateWheatgrass
          Soil Synthetic Soil Derived from ISRIC SoilGrids: same as SensibilityFertiliser.Fertiliser0kg.CowraIWGFertiliser0kg.Field.Synthetic Soil Derived from ISRIC SoilGrids
          Manager HarvestingRule: same as Parameterisation.Innes2024a.Field.HarvestingRule
          Operations Sowing
            2006-05-22  [IntermediateWheatgrass].Sow(population: 50, cultivar: "Kernza", depth: 20, rowSpacing: 150)
            2006-05-18  [Fertiliser].Apply(amount: 275, type: "DAP", depth: 10)
            2007-05-18  [Fertiliser].Apply(amount: 275, type: "DAP", depth: 10)
            2008-05-18  [Fertiliser].Apply(amount: 275, type: "DAP", depth: 10)
            2007-02-15  [IntermediateWheatgrass].Harvest()
            2008-02-15  [IntermediateWheatgrass].Harvest()
            2009-02-15  [IntermediateWheatgrass].Harvest()
          Manager PhenologyRulesDAS: same as Parameterisation.Innes2024a.Field.PhenologyRulesDAS
          Manager BiomassRemovalRule: same as Parameterisation.Innes2024a.Field.BiomassRemovalRule
          Report: EventNames=[Clock].EndOfDay
            VariableNames:
              [Clock].Today as Date
              [IntermediateWheatgrass].Population
              [IntermediateWheatgrass].PlantType
              [IntermediateWheatgrass].Leaf.RadiationIntercepted as InterceptedRadiation
              [IntermediateWheatgrass].AboveGround.Wt*10 as totalBiomass
              [IntermediateWheatgrass].BelowGround.Wt*10 as Roots
              [IntermediateWheatgrass].Leaf.Live.NConc
              [IntermediateWheatgrass].Leaf.LAI*100
              [IntermediateWheatgrass].Leaf.Live.Wt*10 as LeavesWeight
              [IntermediateWheatgrass].Stem.Live.Wt*10 as StemsWeight
              [IntermediateWheatgrass].Spike.Live.Wt*10 as SpikesWeight
              [IntermediateWheatgrass].Grain.Live.Wt*10 as GrainWeight
              [IntermediateWheatgrass].Root.Live.Wt*10 as RootsWeight
              [IntermediateWheatgrass].Leaf.Senesced.Wt*10 as LeavesDeadWeight
              [IntermediateWheatgrass].Stem.Senesced.Wt*10 as StemsDeadWeight
              [IntermediateWheatgrass].Spike.Senesced.Wt*10 as SpikesDeadWeight
              [IntermediateWheatgrass].Phenology.CurrentStageName
              [IntermediateWheatgrass].Phenology.CurrentPhaseName
              [IntermediateWheatgrass].Phenology.Stage
              [Phenology].Vernalisation.TodaysVernalisation*100
              LeavesWeight+LeavesDeadWeight+StemsWeight+StemsDeadWeight+SpikesWeight+SpikesDeadWeight+GrainWeight as AboveGndBiomass
              [Phenology].StageToZadok
              [IntermediateWheatgrass].Phenology.AccumulatedTT
              [IntermediateWheatgrass].Phenology.ThermalStress
              [Leaf].FW
              [Leaf].Photosynthesis.FW
              [Leaf].Fn
              [Phenology].Reproductive.Progression
              [Phenology].ThermalTime
              [Leaf].WaterAllocation as WaterAllocation
              [Leaf].WaterDemand as WaterDemand
              [Leaf].WaterAllocation / ([Leaf].WaterDemand + 1) as WaterDeficit
          Manager Irrigate on fixed dates (disabled): same as SensibilityFertiliser.Fertiliser0kg.CowraIWGFertiliser0kg.Field.Irrigate on fixed dates
          Manager Irrigate on fixed dates1: same as SensibilityFertiliser.Fertiliser0kg.CowraIWGFertiliser0kg.Field.Irrigate on fixed dates1
    Folder Fertiliser150kg
      Simulation CowraIWGFertiliser150kg
        Clock: Start=2006-01-01; End=2009-05-28
        Weather: FileName=Cowra.met
        Summary summaryfile
        SoilArbitrator Soil Arbitrator
        Zone Field: Area=1; Slope=0; AspectAngle=0; Altitude=50
          MicroClimate: a_interception=0; b_interception=1; c_interception=0; d_interception=0; SoilHeatFluxFraction=0.4; MinimumHeightDiffForNewLayer=0; NightInterceptionFraction=0.5; ReferenceHeight=2
          Irrigation
          Fertiliser
          SurfaceOrganicMatter: InitialResidueName=grass; InitialResidueType=grass; InitialResidueMass=1000; InitialStandingFraction=0; InitialCPR=0; InitialCNR=30
          Plant IntermediateWheatgrass
          Soil Synthetic Soil Derived from ISRIC SoilGrids: same as SensibilityFertiliser.Fertiliser0kg.CowraIWGFertiliser0kg.Field.Synthetic Soil Derived from ISRIC SoilGrids
          Manager HarvestingRule: same as Parameterisation.Innes2024a.Field.HarvestingRule
          Operations Sowing
            2006-05-22  [IntermediateWheatgrass].Sow(population: 50, cultivar: "Kernza", depth: 20, rowSpacing: 150)
            2006-05-18  [Fertiliser].Apply(amount: 850, type: "DAP", depth: 10)
            2007-05-18  [Fertiliser].Apply(amount: 850, type: "DAP", depth: 10)
            2008-05-18  [Fertiliser].Apply(amount: 850, type: "DAP", depth: 10)
            2007-02-15  [IntermediateWheatgrass].Harvest()
            2008-02-15  [IntermediateWheatgrass].Harvest()
            2009-02-15  [IntermediateWheatgrass].Harvest()
          Manager PhenologyRulesDAS: same as Parameterisation.Innes2024a.Field.PhenologyRulesDAS
          Manager BiomassRemovalRule: same as Parameterisation.Innes2024a.Field.BiomassRemovalRule
          Report: same as SensibilityFertiliser.Fertiliser50kg.CowraIWGFertiliser50kg.Field.Report
          Manager Irrigate on fixed dates (disabled): same as SensibilityFertiliser.Fertiliser0kg.CowraIWGFertiliser0kg.Field.Irrigate on fixed dates
          Manager Irrigate on fixed dates1: same as SensibilityFertiliser.Fertiliser0kg.CowraIWGFertiliser0kg.Field.Irrigate on fixed dates1
  Folder SensibilityLatitudeLocalSoil
    Folder Emerald
      Simulation Emerald
        Clock: Start=2015-01-01; End=2018-05-28
        Weather: FileName=Emerald.met
        Summary summaryfile
        SoilArbitrator Soil Arbitrator
        Zone Field: Area=1; Slope=0; AspectAngle=0; Altitude=50
          MicroClimate: a_interception=0; b_interception=1; c_interception=0; d_interception=0; SoilHeatFluxFraction=0.4; MinimumHeightDiffForNewLayer=0; NightInterceptionFraction=0.5; ReferenceHeight=2
          Irrigation
          Fertiliser
          SurfaceOrganicMatter: InitialResidueName=grass; InitialResidueType=grass; InitialResidueMass=1000; InitialStandingFraction=0; InitialCPR=0; InitialCNR=30
          Plant IntermediateWheatgrass
          Manager HarvestingRule
```csharp
using System;
using Models.Core;
using Models.Interfaces;
using Models.PMF;
using APSIM.Shared.Utilities;

namespace Models
{
    [Serializable]
    public class Script : Model
    {
        [Link] IClock Clock;
        [Link] ISummary Summary;
        [Link] IPlant crop;
        
        private bool harvestWhenRipe = true;

        [EventSubscribe("DoManagement")]
        private void DoDailyCalculations(object sender, EventArgs e)
        {
            // Called once per day
            if (crop.IsReadyForHarvesting && harvestWhenRipe)
            {  
               	Summary.WriteMessage(this, "Debug** IsReadyForHarvesting:Harvest Crop", MessageType.Diagnostic);
               	crop.Harvest();
            }
        }
    }
}
```
          Operations Sowing
            2015-05-22  [IntermediateWheatgrass].Sow(population: 50, cultivar: "Kernza", depth: 20, rowSpacing: 150)
            2015-05-18  [Fertiliser].Apply(amount: 200, type: "DAP", depth: 10)
            2016-05-18  [Fertiliser].Apply(amount: 200, type: "DAP", depth: 10)
            2017-05-18  [Fertiliser].Apply(amount: 200, type: "DAP", depth: 10)
          Manager PhenologyRulesDAS: same as Parameterisation.Innes2024a.Field.PhenologyRulesDAS
          Manager BiomassRemovalRule: same as Parameterisation.Innes2024a.Field.BiomassRemovalRule
          Report: same as SensibilityFertiliser.Fertiliser50kg.CowraIWGFertiliser50kg.Field.Report
          Manager Irrigate on fixed dates
            IrrigateDates = 24-jan, 24-feb, 24-mar, 24-apr, 24-may, 24-jun, 24-jul, 24-aug, 24-sep, 24-oct, 24-nov, 24-dec
            Amount = 50
            Depth = 20
            Efficiency = 1
            WillRunoff = False
            script: same as in SensibilityIrrigation.IrrigationLow.CowraIWGIrrigationLow.Field.Irrigate on fixed dates
          Soil Black Vertosol (Emerald No911): ASCOrder=Vertosol; ASCSubOrder=Black; SoilType=Clay; Site=Emerald; NearestTown=Emerald; Region=Central Highlands; State=Queensland; Country=Australia; ApsoilNumber=911; Latitude=-23.5211; Longitude=148.123; YearOfSampling=0; DataSource=Collected by Brett Cocks (CES) for NVT.; Comments=Clay -
            Physical
              Thickness  ParticleSizeSand  ParticleSizeSilt  ParticleSizeClay  Rocks  BD     AirDry  LL15   DUL    SAT
              150        5                 65                30                0      1.422  0.062   0.124  0.384  0.434
              150        5                 65                30                0      1.431  0.118   0.148  0.379  0.429
              300        5                 65                30                0      1.46   0.153   0.153  0.353  0.403
              300        5                 65                30                0      1.44   0.153   0.153  0.365  0.415
              300        5                 65                30                0      1.416  0.153   0.153  0.387  0.437
              300        5                 65                30                0      1.394  0.153   0.153  0.401  0.451
              300        5                 65                30                0      1.407  0.153   0.153  0.396  0.446
              BD, DUL source: Field measured and checked for sensibility
              AirDry, LL15, SAT source: Unknown source or quality of data
              Rocks, ParticleSizeSand, ParticleSizeSilt, ParticleSizeClay source: Calculated
              SoilCrop wheatSoil: LL=[0.124, 0.148, 0.153, 0.165, 0.232, 0.291, 0.349]; KL=[0.06, 0.06, 0.06, 0.04, 0.04, 0.02, 0.01]; XF=[1, 1, 1, 1, 1, 1, 1]
                LL source: Field measured and checked for sensibility
              SoilCrop IntermediateWheatgrassSoil: LL=[0.124, 0.148, 0.153, 0.165, 0.232, 0.291, 0.349]; KL=[0.12, 0.11, 0.08, 0.05, 0.02, 0.005, 0]; XF=[1, 1, 1, 1, 1, 1, 1]
            WaterBalance SoilWater: SummerDate=1-Nov; SummerU=6; SummerCona=3.5; WinterDate=1-Apr; WinterU=2; WinterCona=2; DiffusConst=40; DiffusSlope=16; Salb=0.12; CN2Bare=73; CNRed=20; CNCov=0.8; PSIDul=-100; Thickness=[150, 150, 300, 300, 300, 300, 300]; SWCON=[0.3, 0.3, 0.3, 0.3, 0.3, 0.3, 0.3]
            Organic: FOMCNRatio=40; CarbonUnits=Total
              Thickness  Carbon  SoilCNRatio  FBiom  FInert  FOM
              150        2.5     12           0.04   0.4     347.129
              150        2.5     12           0.02   0.5     270.344
              300        2.5     12           0.02   0.7     163.972
              300        2       12           0.02   1       99.4541
              300        2       12           0.01   1       60.322
              300        2       12           0.01   1       36.5871
              300        2       12           0.01   1       22.1912
            Chemical: PHUnits=Water
              Thickness  PH   EC
              150        7.7  0.2
              150        8.3  0.3
              300        8.5  0.5
              300        8.6  0.8
              300        8.2  1
              300        7.6  1.3
              300        7.7  1.3
              EC, CL, PH source: Unknown source or quality of data
            Nutrient
            Solute NO3: InitialValuesUnits=ppm; WaterTableConcentration=0; D0=0; DepthConstant=0; MaxDepthSoluteAccessible=0; RunoffEffectivenessAtMovingSolute=0; MaxEffectiveRunoff=0
            Solute NH4: InitialValuesUnits=ppm; WaterTableConcentration=0; D0=0; DepthConstant=0; MaxDepthSoluteAccessible=0; RunoffEffectivenessAtMovingSolute=0; MaxEffectiveRunoff=0
            Solute Urea: Thickness=[150, 150, 300, 300, 300, 300, 300]; InitialValues=[0, 0, 0, 0, 0, 0, 0]; InitialValuesUnits=kg/ha; WaterTableConcentration=0; D0=0; DepthConstant=0; MaxDepthSoluteAccessible=0; RunoffEffectivenessAtMovingSolute=0; MaxEffectiveRunoff=0
            Water: Thickness=[150, 150, 300, 300, 300, 300, 300]; InitialValues=[0.384, 0.379, 0.353, 0.365, 0.387, 0.401, 0.396]; FilledFromTop=false
            SoilTemperature Temperature
    Folder Dalby
      Simulation Dalby
        Clock: Start=2015-01-01; End=2018-05-28
        Weather: FileName=Dalby.met
        Summary summaryfile
        SoilArbitrator Soil Arbitrator
        Zone Field: Area=1; Slope=0; AspectAngle=0; Altitude=50
          MicroClimate: a_interception=0; b_interception=1; c_interception=0; d_interception=0; SoilHeatFluxFraction=0.4; MinimumHeightDiffForNewLayer=0; NightInterceptionFraction=0.5; ReferenceHeight=2
          Fertiliser
          SurfaceOrganicMatter: InitialResidueName=grass; InitialResidueType=grass; InitialResidueMass=1000; InitialStandingFraction=0; InitialCPR=0; InitialCNR=30
          Plant IntermediateWheatgrass
          Manager HarvestingRule: same as SensibilityLatitudeLocalSoil.Emerald.Emerald.Field.HarvestingRule
          Operations Sowing: same as SensibilityLatitudeLocalSoil.Emerald.Emerald.Field.Sowing
          Manager PhenologyRulesDAS: same as Parameterisation.Innes2024a.Field.PhenologyRulesDAS
          Irrigation
          Manager BiomassRemovalRule: same as Parameterisation.Innes2024a.Field.BiomassRemovalRule
          Report: same as SensibilityFertiliser.Fertiliser50kg.CowraIWGFertiliser50kg.Field.Report
          Soil Black Vertosol-Bongeen (Dalby No027): ASCOrder=Vertosol; ASCSubOrder=Black; SoilType=Clay; Site=Dalby; NearestTown=Dalby, Q 4405; Region=Darling Downs and Granite Belt; State=Queensland; Country=Australia; ApsoilNumber=27; Latitude=-27.123; Longitude=151.305; LocationAccuracy=+/- 20m; YearOfSampling=0; DataSource=CSIRO Sustainable Ecosystems, Toowoomba
            Comments=Clay - Toowoomba - Wheat ll,xf copied from sorghum. Wheat kl is just default apsim kl values for wheat.
            Physical
              Thickness  ParticleSizeSand  ParticleSizeSilt  ParticleSizeClay  Rocks  BD    AirDry  LL15  DUL   SAT
              150        5                 65                30                0      1.25  0.115   0.23  0.45  0.5
              150        5                 65                30                0      1.31  0.184   0.23  0.43  0.48
              300        5                 65                30                0      1.23  0.23    0.23  0.46  0.51
              300        5                 65                30                0      1.24  0.23    0.23  0.45  0.5
              300        5                 65                30                0      1.25  0.23    0.23  0.45  0.5
              300        5                 65                30                0      1.26  0.23    0.23  0.44  0.49
              300        5                 65                30                0      1.29  0.23    0.23  0.43  0.48
              BD, DUL source: Field measured and checked for sensibility
              AirDry, LL15 source: Estimated based on local knowledge
              SAT source: Calculated from measured, estimated or calculated BD
              Rocks, ParticleSizeSand, ParticleSizeSilt, ParticleSizeClay source: Calculated
              SoilCrop wheatSoil: LL=[0.23, 0.24, 0.29, 0.34, 0.37, 0.38, 0.39]; KL=[0.06, 0.06, 0.06, 0.04, 0.04, 0.02, 0.01]; XF=[1, 1, 1, 1, 1, 1, 1]
                LL source: Estimated based on local knowledge
              SoilCrop cottonSoil: LL=[0.23, 0.23, 0.23, 0.26, 0.3, 0.33, 0.37]; KL=[0.1, 0.1, 0.1, 0.1, 0.09, 0.07, 0.05]; XF=[1, 1, 1, 1, 1, 1, 1]
                LL source: Field measured and checked for sensibility
              SoilCrop sorghumSoil: LL=[0.23, 0.24, 0.29, 0.34, 0.37, 0.38, 0.39]; KL=[0.07, 0.07, 0.07, 0.05, 0.05, 0.04, 0.03]; XF=[1, 1, 1, 1, 1, 1, 1]
                LL source: Field measured and checked for sensibility
              SoilCrop SCRUMSoil: same as SensibilityLatitudeLocalSoil.Dalby.Dalby.Field.Black Vertosol-Bongeen (Dalby No027).Physical.wheatSoil
              SoilCrop IntermediateWheatgrassSoil: LL=[0.23, 0.24, 0.29, 0.34, 0.37, 0.38, 0.39]; KL=[0.12, 0.11, 0.08, 0.05, 0.02, 0.005, 0]; XF=[1, 1, 1, 1, 1, 1, 1]
            WaterBalance SoilWater: SummerDate=1-Nov; SummerU=6; SummerCona=3.5; WinterDate=1-Apr; WinterU=4; WinterCona=2.5; DiffusConst=40; DiffusSlope=16; Salb=0.12; CN2Bare=73; CNRed=20; CNCov=0.8; PSIDul=-100; Thickness=[150, 150, 300, 300, 300, 300, 300]; SWCON=[0.3, 0.3, 0.3, 0.3, 0.3, 0.3, 0.3]
            Organic: FOMCNRatio=40; CarbonUnits=WalkleyBlack
              Thickness  Carbon  SoilCNRatio  FBiom  FInert  FOM
              150        2.5     12           0.04   0.4     347.129
              150        2.5     12           0.02   0.6     270.344
              300        2.5     12           0.02   0.8     163.972
              300        2       12           0.02   1       99.4541
              300        2       12           0.01   1       60.322
              300        2       12           0.01   1       36.5871
              300        2       12           0.01   1       22.1912
            Chemical: Thickness=[150, 150, 300, 300, 300, 300, 300]; PH=[8.2, 8.5, 8.6, 8.6, 7.4, 5.3, 5.3]; PHUnits=Water
              PH source: Estimated based on local knowledge
            Nutrient
            Solute NO3: InitialValuesUnits=ppm; WaterTableConcentration=0; D0=0; DepthConstant=0; MaxDepthSoluteAccessible=0; RunoffEffectivenessAtMovingSolute=0; MaxEffectiveRunoff=0
            Solute NH4: InitialValuesUnits=ppm; WaterTableConcentration=0; D0=0; DepthConstant=0; MaxDepthSoluteAccessible=0; RunoffEffectivenessAtMovingSolute=0; MaxEffectiveRunoff=0
            Solute Urea: same as SensibilityLatitudeLocalSoil.Emerald.Emerald.Field.Black Vertosol (Emerald No911).Urea
            Water: Thickness=[150, 150, 300, 300, 300, 300, 300]; InitialValues=[0.45, 0.43, 0.46, 0.45, 0.45, 0.44, 0.43]; FilledFromTop=false
            SoilTemperature Temperature
          Manager Irrigate on fixed dates1: same as SensibilityLatitudeLocalSoil.Emerald.Emerald.Field.Irrigate on fixed dates
    Folder Tamworth
      Simulation Tamworth
        Clock: Start=2015-01-01; End=2018-05-28
        Weather: FileName=Tamworth.met
        Summary summaryfile
        SoilArbitrator Soil Arbitrator
        Zone Field: Area=1; Slope=0; AspectAngle=0; Altitude=50
          MicroClimate: a_interception=0; b_interception=1; c_interception=0; d_interception=0; SoilHeatFluxFraction=0.4; MinimumHeightDiffForNewLayer=0; NightInterceptionFraction=0.5; ReferenceHeight=2
          Irrigation
          Fertiliser
          SurfaceOrganicMatter: InitialResidueName=grass; InitialResidueType=grass; InitialResidueMass=1000; InitialStandingFraction=0; InitialCPR=0; InitialCNR=30
          Plant IntermediateWheatgrass
          Manager HarvestingRule: same as SensibilityLatitudeLocalSoil.Emerald.Emerald.Field.HarvestingRule
          Operations Sowing: same as SensibilityLatitudeLocalSoil.Emerald.Emerald.Field.Sowing
          Manager PhenologyRulesDAS: same as Parameterisation.Innes2024a.Field.PhenologyRulesDAS
          Manager BiomassRemovalRule: same as Parameterisation.Innes2024a.Field.BiomassRemovalRule
          Report: same as SensibilityFertiliser.Fertiliser50kg.CowraIWGFertiliser50kg.Field.Report
          Soil Synthetic Soil Derived from the SLGA: ASCOrder=NA; ASCSubOrder=NA; SoilType=Silty Clay Loam; Site=25307_45516; NearestTown=TAMWORTH; Region=Nandewar; State=New South Wales; NaturalVegetation=Eucalyptus woodlands with a shrubby understorey; ApsoilNumber=9999; Latitude=-31.09; Longitude=150.93; LocationAccuracy=+- 90m; YearOfSampling=2025; Comments=Landuse is Urban residential
            DataSource=Soil and Landscape Grid of Australia. This soil parameter file was automatically generated from the GSM National Surfaces using pedotransfer functions.
            Water: Thickness=[150, 150, 150, 150, 200, 200, 200, 200]; FilledFromTop=false
              InitialValues=[0.371264, 0.367727, 0.372374, 0.370628, 0.367873, 0.364581, 0.361159, 0.35765]
            Physical
              Thickness  ParticleSizeSand  ParticleSizeSilt  ParticleSizeClay  Rocks  BD       AirDry     LL15      DUL       SAT       KS
              150        5                 65                30                0      1.25752  0.0749264  0.224779  0.371264  0.477771  7.38242
              150        5                 65                30                0      1.30332  0.0778037  0.233411  0.367727  0.468533  4.17248
              150        5                 65                30                0      1.28353  0.0788944  0.236683  0.372374  0.476956  3.64999
              150        5                 65                30                0      1.27193  0.0777968  0.23339   0.370628  0.480116  3.94096
              200        5                 65                30                0      1.28545  0.0778105  0.233432  0.367873  0.476197  3.67823
              200        5                 65                30                0      1.30714  0.0780417  0.234125  0.364581  0.469722  3.33981
              200        5                 65                30                0      1.31911  0.0775122  0.232536  0.361159  0.465475  3.35783
              200        5                 65                30                0      1.32333  0.0763955  0.229187  0.35765   0.463068  3.64929
              Rocks, ParticleSizeSand, ParticleSizeSilt, ParticleSizeClay source: Calculated
              SoilCrop WheatSoil
                LL=[0.233568, 0.24147, 0.24478, 0.240941, 0.239887, 0.239346, 0.236655, 0.232272]
                KL=[0.06, 0.06, 0.0596733, 0.05502, 0.04802, 0.04002, 0.03202, 0.02402]
                XF=[1, 1, 1, 1, 1, 1, 1, 1]
              SoilCrop IntermediateWheatgrassSoil: LL=[0.234, 0.241, 0.245, 0.241, 0.24, 0.239, 0.237, 0.232]; KL=[0.12, 0.11, 0.08, 0.05, 0.02, 0.005, 0, 0]; XF=[1, 1, 1, 1, 1, 1, 1, 1]
            WaterBalance SoilWater: SummerDate=1-nov; SummerU=6; SummerCona=6; WinterDate=1-apr; WinterU=2; WinterCona=2; DiffusConst=66.3301; DiffusSlope=31.5025; Salb=0.12; CN2Bare=78; CNRed=20; CNCov=0; DischargeWidth=10; CatchmentArea=88993.6; PSIDul=-100; Thickness=[150, 150, 150, 150, 200, 200, 200, 200]
              SWCON=[0.265001, 0.195436, 0.173715, 0.177156, 0.135626, 0.129032, 0.130412, 0.137818]
            Organic: FOMCNRatio=40; CarbonUnits=Total
              Thickness  Carbon  SoilCNRatio  FBiom    FInert    FOM
              150        2.5     14           0.04     0.411255  373.091
              150        2.5     14           0.03106  0.693029  270.533
              150        2.5     14           0.01404  0.833318  196.167
              150        2       14           0.01     0.889653  142.243
              200        2       14           0.01     0.992774  92.6626
              200        2       14           0.01     1         60.364
              200        2       14           0.01     1         39.3235
              200        2       14           0.01     1         25.6168
            Chemical: Thickness=[150, 150, 150, 150, 200, 200, 200, 200]; PHUnits=Water
              PH=[7.96711, 8.11789, 8.26555, 8.37493, 8.4808, 8.56814, 8.619, 8.64481]
            Solute NO3: Thickness=[150, 150, 150, 150, 200, 200, 200, 200]; InitialValues=[0, 0, 0, 0, 0, 0, 0, 0]; InitialValuesUnits=ppm; WaterTableConcentration=0; D0=0; DepthConstant=0; MaxDepthSoluteAccessible=0; RunoffEffectivenessAtMovingSolute=0; MaxEffectiveRunoff=0
            Solute NH4: same as SensibilityLatitudeLocalSoil.Tamworth.Tamworth.Field.Synthetic Soil Derived from the SLGA.NO3
            Solute Urea: same as SensibilityLatitudeLocalSoil.Tamworth.Tamworth.Field.Synthetic Soil Derived from the SLGA.NO3
            Nutrient
            SoilTemperature Temperature
          Manager Irrigate on fixed dates: same as SensibilityLatitudeLocalSoil.Emerald.Emerald.Field.Irrigate on fixed dates
    Folder Bathurst
      Simulation Bathurst
        Clock: Start=2015-01-01; End=2018-05-28
        Weather: FileName=Bathurst.met
        Summary summaryfile
        SoilArbitrator Soil Arbitrator
        Zone Field: Area=1; Slope=0; AspectAngle=0; Altitude=50
          MicroClimate: a_interception=0; b_interception=1; c_interception=0; d_interception=0; SoilHeatFluxFraction=0.4; MinimumHeightDiffForNewLayer=0; NightInterceptionFraction=0.5; ReferenceHeight=2
          Irrigation
          Fertiliser
          SurfaceOrganicMatter: InitialResidueName=grass; InitialResidueType=grass; InitialResidueMass=1000; InitialStandingFraction=0; InitialCPR=0; InitialCNR=30
          Plant IntermediateWheatgrass
          Manager HarvestingRule: same as SensibilityLatitudeLocalSoil.Emerald.Emerald.Field.HarvestingRule
          Operations Sowing: same as SensibilityLatitudeLocalSoil.Emerald.Emerald.Field.Sowing
          Manager PhenologyRulesDAS: same as Parameterisation.Innes2024a.Field.PhenologyRulesDAS
          Manager BiomassRemovalRule: same as Parameterisation.Innes2024a.Field.BiomassRemovalRule
          Report: same as SensibilityFertiliser.Fertiliser50kg.CowraIWGFertiliser50kg.Field.Report
          Manager Irrigate on fixed dates
            IrrigateDates = 24-jan, 24-mar, 24-apr, 24-may, 24-jun, 24-jul, 24-aug, 24-sep, 24-nov, 24-dec
            Amount = 50
            Depth = 20
            Efficiency = 1
            WillRunoff = False
            script: same as in SensibilityIrrigation.IrrigationLow.CowraIWGIrrigationLow.Field.Irrigate on fixed dates
          Soil Synthetic Soil Derived from the SLGA: ASCOrder=NA; ASCSubOrder=NA; SoilType=Loam over Clay Loam; Site=28091_43896; NearestTown=BATHURST; Region=South Eastern Highlands; State=New South Wales; NaturalVegetation=Eucalyptus woodlands with a shrubby understorey; ApsoilNumber=9999; Latitude=-33.41; Longitude=149.58; LocationAccuracy=+- 90m; YearOfSampling=2025; Comments=Landuse is Urban residential
            DataSource=Soil and Landscape Grid of Australia. This soil parameter file was automatically generated from the GSM National Surfaces using pedotransfer functions.
            Water: Thickness=[150, 150, 150, 150, 200, 200]; InitialValues=[0.250223, 0.228959, 0.26358, 0.28868, 0.293718, 0.289278]; FilledFromTop=false
            Physical
              Thickness  ParticleSizeSand  ParticleSizeSilt  ParticleSizeClay  Rocks  BD       AirDry     LL15      DUL       SAT       KS
              150        5                 65                30                0      1.41666  0.0435589  0.130677  0.250223  0.399857  69.5844
              150        5                 65                30                0      1.53702  0.0435185  0.130556  0.228959  0.3663    38.8515
              150        5                 65                30                0      1.5215   0.0537879  0.161364  0.26358   0.378905  17.6595
              150        5                 65                30                0      1.48922  0.0610076  0.183023  0.28868   0.395116  10.1971
              200        5                 65                30                0      1.50472  0.0629751  0.188925  0.293718  0.391656  8.44523
              200        5                 65                30                0      1.53764  0.0624598  0.187379  0.289278  0.380513  8.34264
              Rocks, ParticleSizeSand, ParticleSizeSilt, ParticleSizeClay source: Calculated
              SoilCrop WheatSoil: LL=[0.137849, 0.13646, 0.167453, 0.188836, 0.19387, 0.191006]; KL=[0.06, 0.06, 0.0595774, 0.05502, 0.0471879, 0.0355891]; XF=[1, 0.94654, 0.954584, 1, 0.973631, 0.891894]
              SoilCrop IntermediateWheatgrassSoil: LL=[0.151, 0.146, 0.129, 0.111, 0.08, 0.077]; KL=[0.12, 0.11, 0.08, 0.05, 0.02, 0.005]; XF=[1, 1, 1, 1, 1, 1]
            WaterBalance SoilWater: SummerDate=1-nov; SummerU=6; SummerCona=6; WinterDate=1-apr; WinterU=2; WinterCona=2; DiffusConst=117.739; DiffusSlope=40.2243; Salb=0.13; CN2Bare=78; CNRed=20; CNCov=0; DischargeWidth=10; CatchmentArea=123085; PSIDul=-100; Thickness=[150, 150, 150, 150, 200, 200]
              SWCON=[0.516148, 0.463564, 0.381568, 0.314323, 0.252252, 0.261386]
            Organic: FOMCNRatio=40; Carbon=[2.5, 2.5, 2.5, 2, 2, 2, -, -]; CarbonUnits=Total
              Thickness  SoilCNRatio  FBiom    FInert    FOM
              150        14           0.04     0.288139  475.475
              150        14           0.03106  0.687781  303.176
              150        14           0.01404  0.787323  193.314
              150        14           0.01     0.882407  123.262
              200        14           0.01     0.992456  67.6477
              200        14           0.01     1         37.1259
            Chemical: Thickness=[150, 150, 150, 150, 200, 200]; PH=[5.79028, 5.87447, 6.07701, 6.23525, 6.34005, 6.40933]; PHUnits=Water
            Solute NO3: Thickness=[150, 150, 150, 150, 200, 200]; InitialValues=[0, 0, 0, 0, 0, 0]; InitialValuesUnits=ppm; WaterTableConcentration=0; D0=0; DepthConstant=0; MaxDepthSoluteAccessible=0; RunoffEffectivenessAtMovingSolute=0; MaxEffectiveRunoff=0
            Solute NH4: same as SensibilityLatitudeLocalSoil.Bathurst.Bathurst.Field.Synthetic Soil Derived from the SLGA.NO3
            Solute Urea: same as SensibilityLatitudeLocalSoil.Bathurst.Bathurst.Field.Synthetic Soil Derived from the SLGA.NO3
            Nutrient
            SoilTemperature Temperature
    Folder Hamilton
      Simulation Hamilton
        Clock: Start=2015-01-01; End=2018-05-28
        Weather: FileName=Hamilton.met
        Summary summaryfile
        SoilArbitrator Soil Arbitrator
        Zone Field: Area=1; Slope=0; AspectAngle=0; Altitude=50
          MicroClimate: a_interception=0; b_interception=1; c_interception=0; d_interception=0; SoilHeatFluxFraction=0.4; MinimumHeightDiffForNewLayer=0; NightInterceptionFraction=0.5; ReferenceHeight=2
          Irrigation
          Fertiliser
          SurfaceOrganicMatter: InitialResidueName=grass; InitialResidueType=grass; InitialResidueMass=1000; InitialStandingFraction=0; InitialCPR=0; InitialCNR=30
          Plant IntermediateWheatgrass
          Manager HarvestingRule: same as SensibilityLatitudeLocalSoil.Emerald.Emerald.Field.HarvestingRule
          Operations Sowing: same as SensibilityLatitudeLocalSoil.Emerald.Emerald.Field.Sowing
          Manager PhenologyRulesDAS: same as Parameterisation.Innes2024a.Field.PhenologyRulesDAS
          Manager BiomassRemovalRule: same as Parameterisation.Innes2024a.Field.BiomassRemovalRule
          Report: same as SensibilityFertiliser.Fertiliser50kg.CowraIWGFertiliser50kg.Field.Report
          Soil Synthetic Soil Derived from the SLGA: ASCOrder=NA; ASCSubOrder=NA; SoilType=Clay Loam over Clay; Site=33287_34824; NearestTown=HAMILTON; Region=Victorian Volcanic Plain; State=Victoria; NaturalVegetation=Mixed chenopod, samphire +/- forbs; ApsoilNumber=9999; Latitude=-37.74; Longitude=142.02; LocationAccuracy=+- 90m; YearOfSampling=2025; Comments=Landuse is Urban residential
            DataSource=Soil and Landscape Grid of Australia. This soil parameter file was automatically generated from the GSM National Surfaces using pedotransfer functions.
            Water: Thickness=[150, 150, 150, 150, 200, 200]; FilledFromTop=false
              InitialValues=[0.376868, 0.357983, 0.377645, 0.390059, 0.390848, 0.385811]
            Physical
              Thickness  ParticleSizeSand  ParticleSizeSilt  ParticleSizeClay  Rocks  BD       AirDry     LL15      DUL       SAT       KS
              150        5                 65                30                0      1.25773  0.0744218  0.223265  0.376868  0.472109  11.8902
              150        5                 65                30                0      1.32271  0.0764276  0.229283  0.357983  0.460076  4.86221
              150        5                 65                30                0      1.33062  0.0842259  0.252678  0.377645  0.466179  2.19383
              150        5                 65                30                0      1.32697  0.0886129  0.265839  0.390059  0.472202  1.43475
              200        5                 65                30                0      1.34235  0.0895476  0.268643  0.390848  0.468098  1.26522
              200        5                 65                30                0      1.36419  0.0887793  0.266338  0.385811  0.460056  1.29171
              Rocks, ParticleSizeSand, ParticleSizeSilt, ParticleSizeClay source: Calculated
              SoilCrop WheatSoil
                LL=[0.232481, 0.237005, 0.260135, 0.272673, 0.274511, 0.271119]
                KL=[0.06, 0.06, 0.0596733, 0.05502, 0.04802, 0.04002]
                XF=[1, 1, 1, 1, 1, 1]
              SoilCrop IntermediateWheatgrassSoil: LL=[0.232, 0.237, 0.26, 0.273, 0.275, 0.271]; KL=[0.12, 0.11, 0.08, 0.05, 0.02, 0.005]; XF=[1, 1, 1, 1, 1, 1]
            WaterBalance SoilWater: SummerDate=1-nov; SummerU=6; SummerCona=6; WinterDate=1-apr; WinterU=2; WinterCona=2; DiffusConst=77.6955; DiffusSlope=34.0629; Salb=0.13; CN2Bare=90; CNRed=20; CNCov=0; DischargeWidth=10; CatchmentArea=3802.07; PSIDul=-100; Thickness=[150, 150, 150, 150, 200, 200]
              SWCON=[0.35076, 0.213898, 0.135809, 0.10255, 0.0749737, 0.0791644]
            Organic: FOMCNRatio=40; Carbon=[2.5, 2.5, 2.5, 2, 2, 2, -, -]; CarbonUnits=Total
              Thickness  SoilCNRatio  FBiom    FInert    FOM
              150        10.1911      0.04     0.173681  475.475
              150        10.1911      0.03106  0.370132  303.176
              150        10.1911      0.01404  0.59085   193.314
              150        10.1911      0.01     0.835163  123.262
              200        10.1911      0.01     0.993203  67.6477
              200        10.1911      0.01     1         37.1259
            Chemical: Thickness=[150, 150, 150, 150, 200, 200]; PH=[5.91674, 6.03015, 6.24005, 6.43862, 6.58625, 6.70363]; PHUnits=Water
            Solute NO3: same as SensibilityLatitudeLocalSoil.Bathurst.Bathurst.Field.Synthetic Soil Derived from the SLGA.NO3
            Solute NH4: same as SensibilityLatitudeLocalSoil.Bathurst.Bathurst.Field.Synthetic Soil Derived from the SLGA.NO3
            Solute Urea: same as SensibilityLatitudeLocalSoil.Bathurst.Bathurst.Field.Synthetic Soil Derived from the SLGA.NO3
            Nutrient
            SoilTemperature Temperature
          Manager Irrigate on fixed dates: same as SensibilityLatitudeLocalSoil.Emerald.Emerald.Field.Irrigate on fixed dates
    Folder Ross
      Simulation Ross
        Clock: Start=2015-01-01; End=2018-05-28
        Weather: FileName=Ross.met
        Summary summaryfile
        SoilArbitrator Soil Arbitrator
        Zone Field: Area=1; Slope=0; AspectAngle=0; Altitude=50
          MicroClimate: a_interception=0; b_interception=1; c_interception=0; d_interception=0; SoilHeatFluxFraction=0.4; MinimumHeightDiffForNewLayer=0; NightInterceptionFraction=0.5; ReferenceHeight=2
          Irrigation
          Fertiliser
          SurfaceOrganicMatter: InitialResidueName=grass; InitialResidueType=grass; InitialResidueMass=1000; InitialStandingFraction=0; InitialCPR=0; InitialCNR=30
          Plant IntermediateWheatgrass
          Manager HarvestingRule: same as SensibilityLatitudeLocalSoil.Emerald.Emerald.Field.HarvestingRule
          Operations Sowing: same as SensibilityLatitudeLocalSoil.Emerald.Emerald.Field.Sowing
          Manager PhenologyRulesDAS: same as Parameterisation.Innes2024a.Field.PhenologyRulesDAS
          Manager BiomassRemovalRule: same as Parameterisation.Innes2024a.Field.BiomassRemovalRule
          Report: same as SensibilityFertiliser.Fertiliser50kg.CowraIWGFertiliser50kg.Field.Report
          Soil Synthetic Soil Derived from the SLGA: ASCOrder=NA; ASCSubOrder=NA; SoilType=Loam over Clay; Site=38435_41388; NearestTown=ROSS; Region=Tasmanian Northern Midlands; State=Tasmania; NaturalVegetation=Unknown; ApsoilNumber=9999; Latitude=-42.03; Longitude=147.49; LocationAccuracy=+- 90m; YearOfSampling=2025; Comments=Landuse is Grazing modified pastures
            DataSource=Soil and Landscape Grid of Australia. This soil parameter file was automatically generated from the GSM National Surfaces using pedotransfer functions.
            Water: Thickness=[150, 150, 150, 150, 200, 200]; FilledFromTop=false
              InitialValues=[0.363554, 0.337139, 0.369282, 0.389397, 0.393407, 0.388964]
            Physical
              Thickness  ParticleSizeSand  ParticleSizeSilt  ParticleSizeClay  Rocks  BD       AirDry     LL15      DUL       SAT       KS
              150        5                 65                30                0      1.30463  0.0687474  0.206242  0.363554  0.447707  25.1619
              150        5                 65                30                0      1.35916  0.0700396  0.210119  0.337139  0.44055   9.15967
              150        5                 65                30                0      1.36354  0.0825879  0.247764  0.369282  0.452208  2.72216
              150        5                 65                30                0      1.35992  0.0901485  0.270446  0.389397  0.461647  1.28416
              200        5                 65                30                0      1.37466  0.0912617  0.273785  0.393407  0.457874  1.1169
              200        5                 65                30                0      1.39529  0.0894561  0.268368  0.388964  0.449075  1.27399
              Rocks, ParticleSizeSand, ParticleSizeSilt, ParticleSizeClay source: Calculated
              SoilCrop WheatSoil: LL=[0.215681, 0.21774, 0.255015, 0.27699, 0.279529, 0.273194]; KL=[0.06, 0.06, 0.0596733, 0.05502, 0.04802, 0.04002]; XF=[1, 1, 1, 1, 1, 1]
              SoilCrop IntermediateWheatgrassSoil: LL=[0.216, 0.218, 0.255, 0.277, 0.28, 0.273]; KL=[0.12, 0.11, 0.08, 0.05, 0.02, 0.005]; XF=[1, 1, 1, 1, 1, 1]
            WaterBalance SoilWater: SummerDate=1-nov; SummerU=6; SummerCona=6; WinterDate=1-apr; WinterU=2; WinterCona=2; DiffusConst=88.7348; DiffusSlope=34.5927; Salb=0.13; CN2Bare=78; CNRed=20; CNCov=0; DischargeWidth=10; CatchmentArea=1698.96; PSIDul=-100; Thickness=[150, 150, 150, 150, 200, 200]
              SWCON=[0.470142, 0.301464, 0.168128, 0.104538, 0.0791821, 0.0945446]
            Organic: FOMCNRatio=40; Carbon=[2.5, 2.5, 2.5, 2, 2, 2, -, -]; CarbonUnits=Total
              Thickness  SoilCNRatio  FBiom    FInert    FOM
              150        14           0.04     0.160111  475.475
              150        14           0.03106  0.31883   303.176
              150        14           0.01404  0.490933  193.314
              150        14           0.01     0.793381  123.262
              200        14           0.01     0.994329  67.6477
              200        14           0.01     1         37.1259
            Chemical: Thickness=[150, 150, 150, 150, 200, 200]; PH=[6.27553, 6.481, 6.77771, 6.9841, 7.11215, 7.2077]; PHUnits=Water
            Solute NO3: same as SensibilityLatitudeLocalSoil.Bathurst.Bathurst.Field.Synthetic Soil Derived from the SLGA.NO3
            Solute NH4: same as SensibilityLatitudeLocalSoil.Bathurst.Bathurst.Field.Synthetic Soil Derived from the SLGA.NO3
            Solute Urea: same as SensibilityLatitudeLocalSoil.Bathurst.Bathurst.Field.Synthetic Soil Derived from the SLGA.NO3
            Nutrient
            SoilTemperature Temperature
          Manager Irrigate on fixed dates: same as SensibilityLatitudeLocalSoil.Emerald.Emerald.Field.Irrigate on fixed dates
  Folder SensibilityLatitudeSameSoil (disabled)
    Folder Emerald
      Simulation EmeraldES
        Clock: Start=2015-01-01; End=2018-05-28
        Weather: FileName=Emerald.met
        Summary summaryfile
        SoilArbitrator Soil Arbitrator
        Zone Field: Area=1; Slope=0; AspectAngle=0; Altitude=50
          MicroClimate: a_interception=0; b_interception=1; c_interception=0; d_interception=0; SoilHeatFluxFraction=0.4; MinimumHeightDiffForNewLayer=0; NightInterceptionFraction=0.5; ReferenceHeight=2
          Irrigation
          Fertiliser
          SurfaceOrganicMatter: InitialResidueName=grass; InitialResidueType=grass; InitialResidueMass=1000; InitialStandingFraction=0; InitialCPR=0; InitialCNR=30
          Plant IntermediateWheatgrass
          Manager HarvestingRule
            script: same as in SensibilityLatitudeLocalSoil.Emerald.Emerald.Field.HarvestingRule
          Operations Sowing
            2015-05-22  [IntermediateWheatgrass].Sow(population: 50, cultivar: "Kernza", depth: 20, rowSpacing: 150)
            2015-05-18  [Fertiliser].Apply(amount: 100, type: "DAP", depth: 10)
            2016-05-18  [Fertiliser].Apply(amount: 100, type: "DAP", depth: 10)
            2017-05-18  [Fertiliser].Apply(amount: 100, type: "DAP", depth: 10)
          Manager PhenologyRulesDAS
            script: same as in Parameterisation.Innes2024a.Field.PhenologyRulesDAS
          Manager BiomassRemovalRule
            leafFracToRemove = 0.7
            leafDeadToRemove = 0.7
            leafFracToResidue = 0
            leafDeadToResidue = 0
            stemFracToRemove = 0.7
            stemDeadToRemove = 0.7
            stemFracToResidue = 0
            stemDeadToResidue = 0
            grainFracToRemove = 1
            grainDeadToRemove = 1
            grainFracToResidue = 0
            grainDeadToResidue = 0
            spikeFracToRemove = 1
            spikeDeadToRemove = 1
            spikeFracToResidue = 0
            spikeDeadToResidue = 0
            rootFracToRemove = 0
            rootDeadToRemove = 0
            rootFracToResidue = 0
            rootDeadToResidue = 0
            script: same as in Parameterisation.Innes2024a.Field.BiomassRemovalRule
          Report: EventNames=[Clock].EndOfDay
            VariableNames:
              [Clock].Today as Date
              [IntermediateWheatgrass].Population
              [IntermediateWheatgrass].PlantType
              [IntermediateWheatgrass].Leaf.RadiationIntercepted as InterceptedRadiation
              [IntermediateWheatgrass].AboveGround.Wt*10 as totalBiomass
              [IntermediateWheatgrass].BelowGround.Wt*10 as Roots
              [IntermediateWheatgrass].Leaf.Live.NConc
              [IntermediateWheatgrass].Leaf.LAI*100
              [IntermediateWheatgrass].Leaf.Live.Wt*10 as LeavesWeight
              [IntermediateWheatgrass].Stem.Live.Wt*10 as StemsWeight
              [IntermediateWheatgrass].Spike.Live.Wt*10 as SpikesWeight
              [IntermediateWheatgrass].Grain.Live.Wt*10 as GrainWeight
              [IntermediateWheatgrass].Root.Live.Wt*10 as RootsWeight
              [IntermediateWheatgrass].Leaf.Senesced.Wt*10 as LeavesDeadWeight
              [IntermediateWheatgrass].Stem.Senesced.Wt*10 as StemsDeadWeight
              [IntermediateWheatgrass].Spike.Senesced.Wt*10 as SpikesDeadWeight
              [IntermediateWheatgrass].Phenology.CurrentStageName
              [IntermediateWheatgrass].Phenology.CurrentPhaseName
              [IntermediateWheatgrass].Phenology.Stage
              [Phenology].Vernalisation.TodaysVernalisation*100
              LeavesWeight+LeavesDeadWeight+StemsWeight+StemsDeadWeight+SpikesWeight+SpikesDeadWeight+GrainWeight as AboveGndBiomass
              [Phenology].StageToZadok
              [IntermediateWheatgrass].Phenology.AccumulatedTT
              [IntermediateWheatgrass].Phenology.ThermalStress
              [Leaf].FW
              [Leaf].Photosynthesis.FW
              [Leaf].Fn
              [Phenology].Reproductive.Progression
              [Phenology].ThermalTime
              [Leaf].WaterAllocation as WaterAllocation
              [Leaf].WaterDemand as WaterDemand
              [Leaf].WaterAllocation / ([Leaf].WaterDemand + 1) as WaterDeficit
          Manager Irrigate on fixed dates
            IrrigateDates = 24-jan, 24-mar, 24-apr, 24-may, 24-jun, 24-jul, 24-aug, 24-sep, 24-nov, 24-dec
            Amount = 50
            Depth = 20
            Efficiency = 1
            WillRunoff = False
            script: same as in SensibilityIrrigation.IrrigationLow.CowraIWGIrrigationLow.Field.Irrigate on fixed dates
          Soil Black Vertosol (Emerald No911): ASCOrder=Vertosol; ASCSubOrder=Black; SoilType=Clay; Site=Emerald; NearestTown=Emerald; Region=Central Highlands; State=Queensland; Country=Australia; ApsoilNumber=911; Latitude=-23.5211; Longitude=148.123; YearOfSampling=0; DataSource=Collected by Brett Cocks (CES) for NVT.; Comments=Clay -
            Physical
              Thickness  ParticleSizeSand  ParticleSizeSilt  ParticleSizeClay  Rocks  BD     AirDry  LL15   DUL    SAT
              150        5                 65                30                0      1.422  0.062   0.124  0.384  0.434
              150        5                 65                30                0      1.431  0.118   0.148  0.379  0.429
              300        5                 65                30                0      1.46   0.153   0.153  0.353  0.403
              300        5                 65                30                0      1.44   0.153   0.153  0.365  0.415
              300        5                 65                30                0      1.416  0.153   0.153  0.387  0.437
              300        5                 65                30                0      1.394  0.153   0.153  0.401  0.451
              300        5                 65                30                0      1.407  0.153   0.153  0.396  0.446
              BD, DUL source: Field measured and checked for sensibility
              AirDry, LL15, SAT source: Unknown source or quality of data
              Rocks, ParticleSizeSand, ParticleSizeSilt, ParticleSizeClay source: Calculated
              SoilCrop wheatSoil: LL=[0.124, 0.148, 0.153, 0.165, 0.232, 0.291, 0.349]; KL=[0.06, 0.06, 0.06, 0.04, 0.04, 0.02, 0.01]; XF=[1, 1, 1, 1, 1, 1, 1]
                LL source: Field measured and checked for sensibility
              SoilCrop IntermediateWheatgrassSoil: LL=[0.124, 0.148, 0.153, 0.165, 0.232, 0.291, 0.349]; KL=[0.12, 0.11, 0.08, 0.05, 0.02, 0.005, 0]; XF=[1, 1, 1, 1, 1, 1, 1]
            WaterBalance SoilWater: SummerDate=1-Nov; SummerU=6; SummerCona=3.5; WinterDate=1-Apr; WinterU=2; WinterCona=2; DiffusConst=40; DiffusSlope=16; Salb=0.12; CN2Bare=73; CNRed=20; CNCov=0.8; PSIDul=-100; Thickness=[150, 150, 300, 300, 300, 300, 300]; SWCON=[0.3, 0.3, 0.3, 0.3, 0.3, 0.3, 0.3]
            Organic: FOMCNRatio=40; CarbonUnits=Total
              Thickness  Carbon  SoilCNRatio  FBiom  FInert  FOM
              150        1.24    12           0.04   0.4     347.129
              150        1.24    12           0.02   0.5     270.344
              300        1.25    12           0.02   0.7     163.972
              300        1.1     12           0.02   1       99.4541
              300        0.71    12           0.01   1       60.322
              300        0.34    12           0.01   1       36.5871
              300        0.34    12           0.01   1       22.1912
            Chemical: PHUnits=Water
              Thickness  PH   EC
              150        7.7  0.2
              150        8.3  0.3
              300        8.5  0.5
              300        8.6  0.8
              300        8.2  1
              300        7.6  1.3
              300        7.7  1.3
              EC, CL, PH source: Unknown source or quality of data
            Nutrient
            Solute NO3: InitialValuesUnits=ppm; WaterTableConcentration=0; D0=0; DepthConstant=0; MaxDepthSoluteAccessible=0; RunoffEffectivenessAtMovingSolute=0; MaxEffectiveRunoff=0
            Solute NH4: InitialValuesUnits=ppm; WaterTableConcentration=0; D0=0; DepthConstant=0; MaxDepthSoluteAccessible=0; RunoffEffectivenessAtMovingSolute=0; MaxEffectiveRunoff=0
            Solute Urea: Thickness=[150, 150, 300, 300, 300, 300, 300]; InitialValues=[0, 0, 0, 0, 0, 0, 0]; InitialValuesUnits=kg/ha; WaterTableConcentration=0; D0=0; DepthConstant=0; MaxDepthSoluteAccessible=0; RunoffEffectivenessAtMovingSolute=0; MaxEffectiveRunoff=0
            Water: Thickness=[150, 150, 300, 300, 300, 300, 300]; InitialValues=[0.384, 0.379, 0.353, 0.365, 0.387, 0.401, 0.396]; FilledFromTop=false
            SoilTemperature Temperature
    Folder Dalby
      Simulation DalbyES
        Clock: Start=2015-01-01; End=2018-05-28
        Weather: FileName=Dalby.met
        Summary summaryfile
        SoilArbitrator Soil Arbitrator
        Zone Field: Area=1; Slope=0; AspectAngle=0; Altitude=50
          MicroClimate: a_interception=0; b_interception=1; c_interception=0; d_interception=0; SoilHeatFluxFraction=0.4; MinimumHeightDiffForNewLayer=0; NightInterceptionFraction=0.5; ReferenceHeight=2
          Irrigation
          Fertiliser
          SurfaceOrganicMatter: InitialResidueName=grass; InitialResidueType=grass; InitialResidueMass=1000; InitialStandingFraction=0; InitialCPR=0; InitialCNR=30
          Plant IntermediateWheatgrass
          Manager HarvestingRule: same as SensibilityLatitudeSameSoil.Emerald.EmeraldES.Field.HarvestingRule
          Operations Sowing: same as SensibilityLatitudeSameSoil.Emerald.EmeraldES.Field.Sowing
          Manager PhenologyRulesDAS: same as SensibilityLatitudeSameSoil.Emerald.EmeraldES.Field.PhenologyRulesDAS
          Manager BiomassRemovalRule: same as SensibilityLatitudeSameSoil.Emerald.EmeraldES.Field.BiomassRemovalRule
          Report: same as SensibilityLatitudeSameSoil.Emerald.EmeraldES.Field.Report
          Manager Irrigate on fixed dates: same as SensibilityLatitudeSameSoil.Emerald.EmeraldES.Field.Irrigate on fixed dates
          Soil Black Vertosol (Emerald No911): ASCOrder=Vertosol; ASCSubOrder=Black; SoilType=Clay; Site=Emerald; NearestTown=Emerald; Region=Central Highlands; State=Queensland; Country=Australia; ApsoilNumber=911; Latitude=-23.5211; Longitude=148.123; YearOfSampling=0; DataSource=Collected by Brett Cocks (CES) for NVT.; Comments=Clay -
            Physical: same as SensibilityLatitudeSameSoil.Emerald.EmeraldES.Field.Black Vertosol (Emerald No911).Physical
            WaterBalance SoilWater: same as SensibilityLatitudeSameSoil.Emerald.EmeraldES.Field.Black Vertosol (Emerald No911).SoilWater
            Organic: FOMCNRatio=40; Carbon=[2.5, 2.5, 2.5, 2, 2, 2, 2, -, -, -]; CarbonUnits=Total
              Thickness  SoilCNRatio  FBiom  FInert  FOM
              150        12           0.04   0.4     347.129
              150        12           0.02   0.5     270.344
              300        12           0.02   0.7     163.972
              300        12           0.02   1       99.4541
              300        12           0.01   1       60.322
              300        12           0.01   1       36.5871
              300        12           0.01   1       22.1912
            Chemical: same as SensibilityLatitudeSameSoil.Emerald.EmeraldES.Field.Black Vertosol (Emerald No911).Chemical
            Nutrient
            Solute NO3: InitialValuesUnits=ppm; WaterTableConcentration=0; D0=0; DepthConstant=0; MaxDepthSoluteAccessible=0; RunoffEffectivenessAtMovingSolute=0; MaxEffectiveRunoff=0
            Solute NH4: InitialValuesUnits=ppm; WaterTableConcentration=0; D0=0; DepthConstant=0; MaxDepthSoluteAccessible=0; RunoffEffectivenessAtMovingSolute=0; MaxEffectiveRunoff=0
            Solute Urea: same as SensibilityLatitudeSameSoil.Emerald.EmeraldES.Field.Black Vertosol (Emerald No911).Urea
            Water: Thickness=[150, 150, 300, 300, 300, 300, 300]; InitialValues=[0.384, 0.379, 0.353, 0.365, 0.387, 0.401, 0.396]; FilledFromTop=false
            SoilTemperature Temperature
    Folder Tamworth
      Simulation TamworthES
        Clock: Start=2015-01-01; End=2018-05-28
        Weather: FileName=Tamworth.met
        Summary summaryfile
        SoilArbitrator Soil Arbitrator
        Zone Field: same as SensibilityLatitudeSameSoil.Dalby.DalbyES.Field
    Folder Bathurst
      Simulation BathurstES
        Clock: Start=2015-01-01; End=2018-05-28
        Weather: FileName=Bathurst.met
        Summary summaryfile
        SoilArbitrator Soil Arbitrator
        Zone Field: Area=1; Slope=0; AspectAngle=0; Altitude=50
          MicroClimate: a_interception=0; b_interception=1; c_interception=0; d_interception=0; SoilHeatFluxFraction=0.4; MinimumHeightDiffForNewLayer=0; NightInterceptionFraction=0.5; ReferenceHeight=2
          Irrigation
          Fertiliser
          SurfaceOrganicMatter: InitialResidueName=grass; InitialResidueType=grass; InitialResidueMass=1000; InitialStandingFraction=0; InitialCPR=0; InitialCNR=30
          Plant IntermediateWheatgrass
          Manager HarvestingRule: same as SensibilityLatitudeSameSoil.Emerald.EmeraldES.Field.HarvestingRule
          Operations Sowing: same as SensibilityLatitudeSameSoil.Emerald.EmeraldES.Field.Sowing
          Manager PhenologyRulesDAS: same as SensibilityLatitudeSameSoil.Emerald.EmeraldES.Field.PhenologyRulesDAS
          Manager BiomassRemovalRule: same as SensibilityLatitudeSameSoil.Emerald.EmeraldES.Field.BiomassRemovalRule
          Report: same as SensibilityLatitudeSameSoil.Emerald.EmeraldES.Field.Report
          Manager Irrigate on fixed dates: same as SensibilityLatitudeSameSoil.Emerald.EmeraldES.Field.Irrigate on fixed dates
          Soil Black Vertosol (Emerald No911): ASCOrder=Vertosol; ASCSubOrder=Black; SoilType=Clay; Site=Emerald; NearestTown=Emerald; Region=Central Highlands; State=Queensland; Country=Australia; ApsoilNumber=911; Latitude=-23.5211; Longitude=148.123; YearOfSampling=0; DataSource=Collected by Brett Cocks (CES) for NVT.; Comments=Clay -
            Physical: same as SensibilityLatitudeSameSoil.Emerald.EmeraldES.Field.Black Vertosol (Emerald No911).Physical
            WaterBalance SoilWater: same as SensibilityLatitudeSameSoil.Emerald.EmeraldES.Field.Black Vertosol (Emerald No911).SoilWater
            Organic: FOMCNRatio=40; CarbonUnits=Total
              Thickness  Carbon  SoilCNRatio  FBiom  FInert  FOM
              150        2.5     12           0.04   0.4     347.129
              150        2.5     12           0.02   0.5     270.344
              300        2.5     12           0.02   0.7     163.972
              300        2       12           0.02   1       99.4541
              300        2       12           0.01   1       60.322
              300        2       12           0.01   1       36.5871
              300        2       12           0.01   1       22.1912
            Chemical: same as SensibilityLatitudeSameSoil.Emerald.EmeraldES.Field.Black Vertosol (Emerald No911).Chemical
            Nutrient
            Solute NO3: InitialValuesUnits=ppm; WaterTableConcentration=0; D0=0; DepthConstant=0; MaxDepthSoluteAccessible=0; RunoffEffectivenessAtMovingSolute=0; MaxEffectiveRunoff=0
            Solute NH4: InitialValuesUnits=ppm; WaterTableConcentration=0; D0=0; DepthConstant=0; MaxDepthSoluteAccessible=0; RunoffEffectivenessAtMovingSolute=0; MaxEffectiveRunoff=0
            Solute Urea: same as SensibilityLatitudeSameSoil.Emerald.EmeraldES.Field.Black Vertosol (Emerald No911).Urea
            Water: Thickness=[150, 150, 300, 300, 300, 300, 300]; InitialValues=[0.384, 0.379, 0.353, 0.365, 0.387, 0.401, 0.396]; FilledFromTop=false
            SoilTemperature Temperature
    Folder Hamilton
      Simulation HamiltonES
        Clock: Start=2015-01-01; End=2018-05-28
        Weather: FileName=Hamilton.met
        Summary summaryfile
        SoilArbitrator Soil Arbitrator
        Zone Field: same as SensibilityLatitudeSameSoil.Bathurst.BathurstES.Field
    Folder Ross
      Simulation RossES
        Clock: Start=2015-01-01; End=2018-05-28
        Weather: FileName=Ross.met
        Summary summaryfile
        SoilArbitrator Soil Arbitrator
        Zone Field: same as SensibilityLatitudeSameSoil.Bathurst.BathurstES.Field
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