Simulations: Version=205
  Folder Replacements
    Plant IntermediateWheatgrass: PlantType=IntermediateWheatgrass
      Memo GeneralDescription
        _Peter Innes, University of Southern Queensland_

        ## Introduction

        Perennial cropping potentially brings a wide range of environmental and economic benefits. Land sown to perennial pastures have been shown to have higher soil organic carbon levels than land regularly cultivated for cropping (Badgery et al. 2014). A comparison of an annual wheat variety with a wild perennial relative, Intermediate Wheat Grass, illustrated that the wheat grass is deeper rooted than annual wheat and thus can access deeper layers of nutrients and soil water, lessening the risk of nutrient leaching and water table rise (Crews, Carton & Olsson 2018; Culman et al. 2013; DeHaan & Ismail 2017; Duchene et al. 2020; Glover et al. 2010; Soto-Gómez & Pérez-Rodríguez 2022). Another of the perceived benefits of perennial crops is the ability to capture precipitation year-round, unlike annuals which have a relatively short growing season and often leave the soil bare and susceptible to water and wind erosion. Maintaining a perennial crop requires less tillage and spraying than annual cropping, resulting in less machinery operational costs and reduced soil compaction.  .

        ## Presentation

        This model has been built using the Plant Modelling Framework (PMF) of [brown_plant_2014] to simulate the growth of perennial grains as a grain and forage crop.  The perennial grain model simulates the above ground plant structure, including the photosynthesis process, using the SimpleLeaf procedure of PMF, which does not consider explicitly leaf age or placement in the canopy.  The model describes a perennial crop, with phenology rewinding to the vegetative stage at the end of the reproductive phase.

        ## Inclusion in APSIM simulations
         It is recommended that new Intemediate Wheatgrass simulations are based on the example simulation in the APSIM "open an example" tab;
         To become active and grow, the perennial grain crop needs to be sown using a manager script with a sowing rule. e.g.:
        <pre><code class='language-cs'>
         2022-05-22 IntermediateWheatgrass.Sow(population: 50, cultivar: IntermediateWheatgrass, depth: 20, rowSpacing: 150);
        </code></pre>
        If a specified cultivar is not available, a fatal error will be thrown.

        ### Harvest and biomass removal
        Perennial grain biomass can be removed by scheduling a biomass removal event, such as harvesting or cutting.  The proportion of the biomass of each organ that is removed from the system and/or added to the residue pools may be specified in a manager script. All parameters are optional, defaults are used whenever any value is not specified.

        ### Crop termination
        To fully terminate a crop the EndCrop event should be raised:
        <pre><code class='language-cs'> IntermediateWheatgrass.EndCrop();
        </code></pre>
        Once a crop has been ended the field is open to be used by another APSIM plant model, or another perennial grain crop.
      Phenology
        AddFunction StageToZadok
          LinearInterpolationFunction Zadoks
            XYPairs: X=[1, 2, 3, 4, 4.2, 4.9, 5, 6, 7, 8]; Y=[0, 5, 5, 25, 27, 29, 35, 50, 70, 92]
            VariableReference XValue: VariableName=[Phenology].Stage
        Memo Description
          The phenology includes nine phases from Germinating to Harvest, with each phase starting and ending at one of nine stages. The transition between the Germination to Emerging, Emerging to Vernalisation, Reproductive to Grainfilling, and Grainfilling to HarvestRipe phases are governed by thermal time. Like many other cool climate grasses, intermediate wheatgrass requires dual-induction by vernalisation and photoperiod (increasing daylength) before proceeding to reproduction (Heide, 1994). This entails a period of cool temperatures (<5°C) and short days (<11 hours), i.e. vernalisation, followed by long days (>13 hours), i.e. secondary induction (Duchene et al., 2021; Heide, 1994; Ivancic et al., 2021; Locatelli et al., 2022). The transition from Vernalising to Inducing is controlled by a vernalisation days factor (accounting for low temperature duration). The transition from Inducing to Reproductive is controlled primarily by daylength (photoperiod). The transition from Reproductive to GrainFilling is slowed by both high temperature (Cicchino et al., 2010), and leaf moisture stress ([Leaf].FW) (Chauhan et al., 2019).
        SubDailyInterpolation ThermalTime: agregationMethod=0
          Memo Description
            The thermal time is used to control many of the phenological changes in perennial grain.  It is calculated using the daily average temperature and three parameters, or cardinal temperatures: minimum, maximum, and optimum.  Plant development accelerates as temperature increases from minimum to optimum and slows down after that, ceasing completely at maximum temperature.
          XYPairs Response: X=[0, 25, 35, 40]; Y=[0, 30, 25, 0]
          ThreeHourAirTemperature InterpolationMethod
        SubDailyInterpolation ThermalStress: agregationMethod=0
          Memo Description: same as Replacements.IntermediateWheatgrass.Phenology.ThermalTime.Description
          XYPairs Response: X=[0, 24, 30, 40]; Y=[0, 0, 3, 10]
          ThreeHourAirTemperature InterpolationMethod
          Constant ThermalStressThreshold: FixedValue=68
        Constant FWThreshold: FixedValue=0.35
        Constant FWProgress: FixedValue=1
        PhotoperiodFunction Photoperiod: Twilight=-6; DayLength=0
        PhotoperiodDeltaFunction PhotoperiodVariation: Twilight=-6
        Vernalisation: StartStage=Emergence; EndStage=Induction; ResetStage=Induction
          SubDailyInterpolation VernalisingDays: agregationMethod=0
            XYPairs Response: X=[0, 6, 8]; Y=[3, 3, 0]
            ThreeHourAirTemperature InterpolationMethod
          SubDailyInterpolation DevernalisingDays: agregationMethod=0
            XYPairs Response: X=[0, 15, 35, 40]; Y=[0, 0, 0, 1]
            ThreeHourAirTemperature InterpolationMethod
          Constant DaysToStabilise: FixedValue=35; Units=days
        GerminatingPhase Germinating: Start=Sowing; End=Germination; IsEmerged=false
          Memo Description
            Following default PMF behaviour, perennial grain germination will occur one day after sowing, provided that the amount of soil extractable water is greater than zero.
          Constant MinSoilTemperature: FixedValue=-2
          PhotoperiodDeltaFunction PhotoperiodVariation: Twilight=-6
        EmergingPhase Emerging: Start=Germination; End=Emergence; IsEmerged=false; TTForTimeStep=0
          Memo Description
            Both temperature and depth of seed are important factors.
          VariableReference ThermalTime: VariableName=[Phenology].ThermalTime
          AddFunction Target
            Constant ShootLag: FixedValue=100
            MultiplyFunction DepthxRate
              VariableReference SowingDepth: VariableName=[Plant].SowingData.Depth
              Constant ShootRate: FixedValue=1.5
          SubDailyInterpolation ThermalStress (disabled): agregationMethod=0
            Memo Description
              The thermal time is used to control many of the phenological changes in perennial grain.  It is calculated using the daily average temperature and three parameters, or cardinal temperatures: minimum, maximum, and optimum.  Plant development accelerates as temperature increases from minimum to optimum and slows down after that, ceasing completely at maximum temperature.
            XYPairs Response: X=[0, 24, 30, 40]; Y=[0, 0, 3, 10]
            ThreeHourAirTemperature InterpolationMethod
            Constant ThermalStressThreshold: FixedValue=68
        GenericPhase Vernalising: Start=Emergence; End=Induction; IsEmerged=true
          Memo Description
            During this phase, perennial grain plants allocates new biomass to only leaf+petiole, stems, and root organs. Initially, this phase starts when plants emerge, but it is also triggered as phenology resets after the end of the reproductive phase.  The vegetative phase ends when the inductive phase starts.
            perennial grain is a long day species, with flowering starting in spring when day light is increasing
          Constant Target: FixedValue=49; Units=days
          VariableReference Progression: VariableName=[Phenology].Vernalisation.TodaysVernalisation
        GenericPhase Inducing: Start=Induction; End=StemElongation; IsEmerged=true
          Memo Description
            During this phase the perennial grain plants await for the environmental cue to start the reproductive growth.  Physiologic and metabolic processes remain the same as for the vegetative phase with plants allocating biomass to leaf+petiole, stems, and root organs.  As perennial grain requires long days for flowering, the trigger to end this phase is defined by the length of day, or more specifically by the increase in daily photoperiod.  The plants need a few days under favourable conditions, photoperiod increasing and greater than a threshold, to start the reproductive phase.
          Constant Target: FixedValue=10; Units=days
          LessThanFunction Progression
            VariableReference PhotoperiodVariation: VariableName=[Phenology].PhotoperiodVariation
            Constant Zero: FixedValue=0
            Constant NoProgression: FixedValue=0
            LinearInterpolationFunction SomeProgression
              XYPairs: X=[10, 11, 12, 13, 14]; Y=[0, 0, 0, 0, 1]
              VariableReference XValue: VariableName=[Phenology].Photoperiod
        GenericPhase Reproductive: Start=StemElongation; End=Flowering; IsEmerged=true
          Memo Description
            During this phase the plant is partitioning biomass to all organs, including reproductive organs.
          Constant Target: FixedValue=800; Units=oCd
          MultiplyFunction Progression
            VariableReference ThermalTime: VariableName=[Phenology].ThermalTime
            SubDailyInterpolation FT: agregationMethod=0
              XYPairs Response: X=[0, 30, 33, 40]; Y=[1, 1, 1, 0]
              ThreeHourAirTemperature InterpolationMethod
            VariableReference FWPhen: VariableName=[Leaf].FW
            Constant ProgressionFactor: FixedValue=1
        GenericPhase GrainFilling: Start=Flowering; End=Ripening; IsEmerged=true
          Memo Description
            During this phase the plant is partitioning biomass to all organs, including reproductive organs.
          Constant Target: FixedValue=400; Units=oCd
          VariableReference Progression: VariableName=[Phenology].ThermalTime
        GenericPhase Maturing: Start=Ripening; End=Mature; IsEmerged=true
          Memo Description
            During this phase the plant is partitioning biomass to all organs, including reproductive organs.
          Constant Target: FixedValue=400; Units=oCd
          VariableReference Progression: VariableName=[Phenology].ThermalTime
        EndPhase Harvest: Start=Mature; End=Rewind; IsEmerged=true
        GotoPhase: Start=Rewind; IsEmerged=true; PhaseNameToGoto=Vernalising; RemovalType=2
          Memo Description
            At the end of reproductive phase, phenology is reset to 'Vegetative'.
      OrganArbitrator Arbitrator
        BiomassTypeArbitrator DMArbitration
          Folder PotentialPartitioningMethods
            ReallocationMethod
            AllocateFixationMethod
            RetranslocationMethod
            SendPotentialDMAllocationsMethod
          Folder AllocationMethods
            NutrientConstrainedAllocationMethod
            DryMatterAllocationsMethod
          RelativeAllocation ArbitrationMethod
            Memo Description
              Controls the allocation of biomass to each of the plant's organs. Partition is based on:
        BiomassTypeArbitrator NArbitration
          Folder PotentialPartitioningMethods
            ReallocationMethod
          Folder ActualPartitioningMethods
            AllocateFixationMethod
            RetranslocationMethod
          Folder AllocationMethods
            NitrogenAllocationsMethod
          RelativeAllocation ArbitrationMethod
            Memo Description
              Controls the allocation of N to each of the plant's organs. Partition is based on:
          AllocateUptakesMethod
        WaterUptakeMethod
        NitrogenUptakeMethod
      SimpleLeaf Leaf: Albedo=0.18; Gsmax350=0.015; R50=150; LeafInitialisationStage=Emergence; Height=0; BaseHeight=0; Width=0; FRGR=0; PotentialEP=0; WaterDemand=0; KDead=0; LAIDead=0
        Memo Description
          __Note:__ this organ represents all the leaves in the plant, it has only a basic representation of canopy structure and does not distinguish leaves for ages or placement in the canopy.
        MultiplyFunction InitialWt
          Memo Description
            It is assumed that approximately 1/3 of the seed biomass is allocated to shoot upon emergence.  The weight of perennial grain seeds varies.
          Constant InitialOrganWt: FixedValue=0.015; Units=g/plant
          VariableReference Population: VariableName=[Plant].Population
        Constant CarbonConcentration: FixedValue=0.4
          Memo Description
            This is the default value for PMF.
        Constant MinimumNConc: FixedValue=0.0275; Units=gN/gDM
          Memo Description
            This is the lowest N concentration that leaves can have and still be able to grow.  It represents the N content for structural tissues and is the concentration of dead material.
        Constant CriticalNConc: FixedValue=0.05; Units=gN/gDM
          Memo Description
            This is the N concentration that the organ must have to perform its functions without limitations; a growth penalty will occurr if N level fall below this threshold.  No values have been clearly identifyied for this parameter in perennial grain, thus typical values for non-stressed plants are used instead.
        Constant MaximumNConc: FixedValue=0.06; Units=gN/gDM
          Memo Description
            This represents the maximum limit for N concentration in leaves.  The N content above CriticalNConc is not essential for growth and can be remobilised for new growth when uptake is insuficient.
        Constant NitrogenDemandSwitch: FixedValue=1
        RUEModel Photosynthesis
          Memo Description
            It is assumed the photosynthetesis rate of perennial grain is similar to wheat
          Constant RUE: FixedValue=1.5; Units=g/MJ
          RUECO2Function FCO2: PhotosyntheticPathway=C3
          LinearInterpolationFunction FN
            XYPairs: X=[0, 1, 1.5]; Y=[0, 1, 1]
            VariableReference XValue: VariableName=[Leaf].FNmetabolic
          WeightedTemperatureFunction FT: MaximumTemperatureWeighting=0.75
            XYPairs: X=[-5, 0, 25, 35, 40]; Y=[0, 1, 1, 1, 0.5]
          LinearInterpolationFunction FW
            XYPairs: X=[0, 0.5, 1]; Y=[0, 1, 1]
            VariableReference XValue: VariableName=[Leaf].Fw
          LinearInterpolationFunction FVPD
            XYPairs: X=[0, 10, 40]; Y=[1, 1, 0]
            VariableReference XValue: VariableName=[Leaf].Photosynthesis.VPD
          VariableReference RadnInt: VariableName=[Leaf].RadiationIntercepted
        DivideFunction FRGR
          Memo Description
            This parameter represents the Fractional Growth Rate.  It is needed by the MicroClimate model, where it is used to compute the effect of growth rate on transpiration.
          VariableReference Photosynthesis: VariableName=[Leaf].Photosynthesis
          MultiplyFunction PotentialPhotosynthesis
            VariableReference RUE: VariableName=[Leaf].Photosynthesis.RUE
            MaximumFunction Radiation
              VariableReference RadnInt: VariableName=[Leaf].RadiationIntercepted
              Constant MinRadn: FixedValue=1e-05
        Constant StomatalConductanceCO2Modifier: FixedValue=1
        PhaseLookup TargetBiomassProportion
          Memo note
            This is the 'ideal' proportion of biomass for this organ within the above ground biomass (not total).
          PhaseLookupValue VegetativeInductive: Start=Emergence; End=Flowering
            Constant TargetProportion: FixedValue=0.8; Units=g/g
          PhaseLookupValue Reproductive: Start=Flowering; End=Ripening
            Constant TargetProportion: FixedValue=0.3
        NutrientDemandFunctions DMDemands
          MultiplyFunction Structural
            Constant StructuralFraction: FixedValue=0.95; Units=g/g
              Memo Description
                This is the default value for PMF.
            MaximumFunction DMDemandFunction
              Memo Description
                The DM demand as defined here is a weighting factor, actual values are computed by the OrganArbitrator. The value is computed as the sum of a base demand, simply based on the potential partition according to the target proportions, and a deficit demand, which diverts more biomass to organs that deviate from their targeted proportions. This ensures faster regrowth of above ground organs after defoliation. The target proportion may vary with growth stage and environmental conditions.
              Constant Zero: FixedValue=0
              AddFunction OrganDMDemand
                Memo Description: same as Replacements.IntermediateWheatgrass.Leaf.DMDemands.Structural.DMDemandFunction.Description
                PartitionFractionDemandFunction BaseBiomassDemand
                  MultiplyFunction PartitionFraction
                    VariableReference TargetAboveGroundProp: VariableName=[TargetAboveGroundFraction]
                    VariableReference TargetOrganProp: VariableName=[Leaf].TargetBiomassProportion
                SubtractFunction DeficitBiomassDemand
                  MultiplyFunction TargetBiomass
                    VariableReference TargetAboveGroundProp: VariableName=[TargetAboveGroundFraction]
                    VariableReference TargetOrganProp: VariableName=[Leaf].TargetBiomassProportion
                    VariableReference TotalBiomass: VariableName=[TotalLive].Wt
                  VariableReference CurrentBiomass: VariableName=[Leaf].Live.Wt
          Constant Metabolic: FixedValue=0
          StorageDMDemandFunction Storage
            SubtractFunction StorageFraction
              Constant One: FixedValue=1
              VariableReference StructuralFraction: VariableName=[Leaf].DMDemands.Structural.StructuralFraction
          Constant QStructuralPriority: FixedValue=1
          Constant QMetabolicPriority: FixedValue=1
          Constant QStoragePriority: FixedValue=1
        NutrientDemandFunctions NDemands
          MultiplyFunction Structural
            VariableReference MinNconc: VariableName=[Leaf].MinimumNConc
            VariableReference PotentialDMAllocation: VariableName=[Leaf].potentialDMAllocation.Structural
          MultiplyFunction Metabolic
            SubtractFunction MetabolicNconc
              VariableReference CritNconc: VariableName=[Leaf].CriticalNConc
              VariableReference MinNconc: VariableName=[Leaf].MinimumNConc
            VariableReference PotentialDMAllocation: VariableName=[Leaf].potentialDMAllocation.Structural
          StorageNDemandFunction Storage
            VariableReference NitrogenDemandSwitch: VariableName=[Leaf].NitrogenDemandSwitch
            VariableReference MaxNconc: VariableName=[Leaf].MaximumNConc
          Constant QStructuralPriority: FixedValue=1
          Constant QMetabolicPriority: FixedValue=1
          Constant QStoragePriority: FixedValue=1
        Constant DMConversionEfficiency: FixedValue=1; Units=0-1
          Memo Description
            This is the default value for PMF.
        Constant MaintenanceRespiration: FixedValue=0; Units=0-1
          Memo Description
            This is the default value for PMF.
        MultiplyFunction Area
          Memo Description
            The leaf area index (LAI) for green leaves of perennial grain is defined based on their biomass and specific leaf area (SLA). The value for SLA is currently assumed to be constant, although factors such as age and environmental conditions (shading and nutrient status) should have an effect on this value.  Variations due to age can ignored because the model simulates a generic population, and thus it represents leaves of varing ages at the same time.
          Constant SpecificLeafArea: FixedValue=0.03; Units=m^2/g
          VariableReference LiveLeafWeight: VariableName=[Leaf].Live.Wt
        MultiplyFunction LaiDead
          Memo Description
            No specific data for area of dead leaves were found for perennial grain. The value of SLA is thus assumed to be the same as that of live leaves (this is consistent for the model as very little biomass reallocation of biomass occurs during senescence).
          VariableReference SpecificLeafArea: VariableName=[Leaf].Area.SpecificLeafArea
          VariableReference DeadLeafWeight: VariableName=[Leaf].Dead.Wt
        MultiplyFunction ExtinctionCoefficient
          Constant VegetativePhase: FixedValue=0.5
          LinearInterpolationFunction DevelopmentFactor
            XYPairs: X=[5, 5.7, 6, 7, 8]; Y=[1, 1, 1.2, 1.4, 1.4]
            Memo
              Exntiction coefficient increases at stem extension as leaves become more prostrate
            VariableReference XValue: VariableName=[Phenology].Stage
        Constant ExtinctionCoefficientDead: FixedValue=0.1; Units=0-1
        LinearInterpolationFunction HeightFunction
          XYPairs: X=[3, 4, 5, 6]; Y=[10, 200, 200, 1500]
          VariableReference XValue: VariableName=[Phenology].Stage
        MultiplyFunction SenescenceRate
          Memo Description
            Perennial grain has similar senescence to wheat and other grains
          Constant ReferenceRate: FixedValue=0.05; Units=/day
          LinearInterpolationFunction StageFactor
            XYPairs: X=[3, 4, 5, 5.7, 6, 9]; Y=[1, 1, 1, 1.1, 1.2, 1.3]
            VariableReference XValue: VariableName=[Phenology].Stage
          LinearInterpolationFunction CoverFactor
            XYPairs: X=[3, 4, 5, 6]; Y=[0.1, 0.1, 0.1, 0.1]
            VariableReference XValue: VariableName=[Leaf].LAI
          WeightedTemperatureFunction TemperatureFactor: MaximumTemperatureWeighting=0.5
            XYPairs: X=[-20, -5, 0, 5, 17, 28, 37.5]; Y=[1.5, 0.25, 0.1, 0.1, 1, 1, 1.5]
          LinearInterpolationFunction SoilMoistureFactor
            XYPairs: X=[0, 0.5, 1]; Y=[2, 1, 1]
            VariableReference XValue: VariableName=[Leaf].Fw
        MultiplyFunction DetachmentRate
          Memo Description
            A generic relationship between detachment and soil moisture is assumed.  It implies that under dry conditions the detachment rate decreases due to the lower level of activity of decomposing microorganisms.
          Constant ReferenceRate: FixedValue=0.1; Units=/day
          LinearInterpolationFunction SoilMoistureFactor
            XYPairs: X=[0, 0.5, 1]; Y=[0.5, 0.5, 1]
            VariableReference XValue: VariableName=[Leaf].Fw
        Constant DMRetranslocationFactor: FixedValue=0; Units=/day
        Constant DMReallocationFactor: FixedValue=1
          Memo Description
            This is the default value for PMF.
        Constant NReallocationFactor: FixedValue=1; Units=/day
          Memo Description
            This is the default value for PMF.
        MultiplyFunction NRetranslocationFactor
          Memo Description
            A generic relationship between retranslocation and environmental factors is assumed, this is done so that retranslocation is enhanced when conditions are good for growth. Retranslocation from leaves is enable any time.
          Constant ReferenceRate: FixedValue=0.1; Units=/day
          WeightedTemperatureFunction TemperatureFactor: MaximumTemperatureWeighting=0.5
            XYPairs: X=[0, 2, 7.5, 15, 18, 26, 33, 35]; Y=[0, 0, 0.15, 0.7, 1, 1, 0.1, 0]
          LinearInterpolationFunction SoilMoistureFactor
            XYPairs: X=[0, 0.5, 1]; Y=[0, 1, 1]
            VariableReference XValue: VariableName=[Leaf].Fw
        Constant RemobilisationCost: FixedValue=0
          Memo Description
            This is the default value for PMF.
        BiomassRemoval BiomassRemovalDefaults: HarvestFractionLiveToRemove=0.6; HarvestFractionDeadToRemove=0.7; HarvestFractionLiveToResidue=0.2; HarvestFractionDeadToResidue=0.2
      GenericOrgan Stem: IsAboveGround=true
        LinearInterpolationFunction SenescenceRate
          XYPairs: X=[3, 4, 5, 6, 7, 8, 9]; Y=[0, 0, 0, 0, 0, 0.1, 0.2]
          VariableReference XValue: VariableName=[Phenology].Stage
        Constant RemobilisationCost: FixedValue=0
        LinearInterpolationFunction MaximumNConc
          XYPairs: X=[3, 4, 5, 6, 7, 8, 9]; Y=[0.07, 0.04, 0.04, 0.015, 0.012, 0.012, 0.012]
          VariableReference XValue: VariableName=[Phenology].Stage
        Constant MinimumNConc: FixedValue=0.0025
        PhaseLookupValue NitrogenDemandSwitch: Start=Emergence; End=Ripening
          Constant: FixedValue=1
        Constant NReallocationFactor: FixedValue=0
        PhaseLookup NRetranslocationFactor
          PhaseLookupValue VegetativeGrowth: Start=Emergence; End=StemElongation
            Constant Fraction: FixedValue=0
          PhaseLookupValue ReproductiveGrowth: Start=StemElongation; End=Mature
            Constant Fraction: FixedValue=0.5
        PhaseLookup DMRetranslocationFactor
          PhaseLookupValue VegetativeGrowth: Start=Emergence; End=Induction
            Constant DMRetranslocationFactor: FixedValue=0
          PhaseLookupValue ReproductiveGrowth: Start=StemElongation; End=Mature
            Constant DMRetranslocationFactor: FixedValue=0.5
        BiomassRemoval BiomassRemovalDefaults: HarvestFractionLiveToRemove=0.7; HarvestFractionDeadToRemove=0.7; HarvestFractionLiveToResidue=0.3; HarvestFractionDeadToResidue=0.3
        DivideFunction PercentWSC
          VariableReference WSC: VariableName=[Stem].Live.StorageWt
          VariableReference StemWt: VariableName=[Stem].Live.Wt
        Constant DetachmentRateFunction: FixedValue=0; Units=/d
        Constant MaintenanceRespirationFunction: FixedValue=0; Units=0-1
        Constant DMConversionEfficiency: FixedValue=1; Units=0-1
        Constant DMReallocationFactor: FixedValue=0
        AddFunction CriticalNConc
          VariableReference MinimumNConc: VariableName=[Stem].MinimumNConc
          MultiplyFunction MetabolicNconc
            SubtractFunction NonStructuralN
              VariableReference MaximumNConc: VariableName=[Stem].MaximumNConc
              VariableReference MinimumNConc: VariableName=[Stem].MinimumNConc
            Constant Proportion: FixedValue=0.5
        Constant CarbonConcentration: FixedValue=0.4
        NutrientDemandFunctions DMDemands
          MultiplyFunction Structural
            PartitionFractionDemandFunction DMDemandFunction
              PhaseLookup PartitionFraction
                PhaseLookupValue PreStemElongation: Start=Emergence; End=Induction
                  Constant StemFraction: FixedValue=0.2
                PhaseLookupValue StemElongation: Start=StemElongation; End=Flowering
                  Constant StemFraction: FixedValue=0.7; Units=0
                PhaseLookupValue EarEmergence: Start=Ripening; End=Mature
                  Constant StemFraction: FixedValue=0
            PhaseLookup StructuralFraction
              PhaseLookupValue VegetativeGrowth: Start=Emergence; End=StemElongation
                Constant Fraction: FixedValue=0.3
              PhaseLookupValue ReproductiveGrowth: Start=StemElongation; End=Ripening
                Constant Fraction: FixedValue=0.04
          Constant Metabolic: FixedValue=0
          StorageDMDemandFunction Storage
            SubtractFunction StorageFraction
              Constant One: FixedValue=1
              VariableReference StructuralFraction: VariableName=[Stem].DMDemands.Structural.StructuralFraction
          Constant QStructuralPriority: FixedValue=1
          Constant QMetabolicPriority: FixedValue=1
          Constant QStoragePriority: FixedValue=1
        NutrientDemandFunctions NDemands
          MultiplyFunction Structural
            VariableReference MinNconc: VariableName=[Stem].minimumNconc
            VariableReference PotentialDMAllocation: VariableName=[Stem].potentialDMAllocation.Structural
          MultiplyFunction Metabolic
            SubtractFunction MetabolicNconc
              VariableReference CritNconc: VariableName=[Stem].criticalNConc
              VariableReference MinNconc: VariableName=[Stem].minimumNconc
            VariableReference PotentialDMAllocation: VariableName=[Stem].potentialDMAllocation.Structural
          StorageNDemandFunction Storage
            VariableReference NitrogenDemandSwitch: VariableName=[Stem].nitrogenDemandSwitch
            VariableReference MaxNconc: VariableName=[Stem].maximumNconc
          Constant QStructuralPriority: FixedValue=1
          Constant QMetabolicPriority: FixedValue=1
          Constant QStoragePriority: FixedValue=1
        RetranslocateNonStructural RetranslocateNitrogen
        NutrientPoolFunctions InitialWt
          Constant Structural: FixedValue=0; Units=g/m^2
          Constant Metabolic: FixedValue=0
          Constant Storage: FixedValue=0
        Constant Photosynthesis: FixedValue=0
        VariableReference initialNConcFunction: VariableName=[Stem].MinimumNConc
      ReproductiveOrgan Grain: GrowthRespiration=0; MaintenanceRespiration=0; RipeStage=Ripe
        Biomass Live
        Biomass Dead
        HoldFunction NumberFunction: WhenToHold=Flowering
          MultiplyFunction GrainNumber
            Constant GrainsPerGramOfStem: FixedValue=20; Units=grains
            VariableReference StemMass: VariableName=[StemPlusSpike].Wt
        Constant DMConversionEfficiency: FixedValue=1
        Constant RemobilisationCost: FixedValue=0
        Constant InitialGrainProportion: FixedValue=0.1
        Constant MaximumPotentialGrainSize: FixedValue=0.025; Units=g
        PhaseLookup DMDemandFunction
          PhaseLookupValue PreFlowering: Start=Sowing; End=Induction
            Constant Demand: FixedValue=0
          PhaseLookupValue GrainGrowthPhase: Start=Flowering; End=Mature
            MinimumFunction Rate
              MultiplyFunction Actual
                PhaseLookup PotentialRate
                  PhaseLookupValue InitialPhase: Start=Flowering; End=Ripening
                    DivideFunction Rate
                      MultiplyFunction PotentialSizeIncrease
                        VariableReference InitialProportion: VariableName=[Grain].InitialGrainProportion
                        VariableReference MaximumSize: VariableName=[Grain].MaximumPotentialGrainSize
                      VariableReference FillingDuration: VariableName=[Phenology].Maturing.Target
                  PhaseLookupValue LinearPhase: Start=Ripening; End=Mature
                    DivideFunction Rate
                      MultiplyFunction PotentialSizeIncrease
                        SubtractFunction ProportionLinearPhase
                          Constant One: FixedValue=1
                          VariableReference InitialProportion: VariableName=[Grain].InitialGrainProportion
                        VariableReference MaximumSize: VariableName=[Grain].MaximumPotentialGrainSize
                      VariableReference FillingDuration: VariableName=[Phenology].Maturing.Target
                VariableReference ThermalTime: VariableName=[Phenology].ThermalTime
                VariableReference NumberFunction: VariableName=[Grain].NumberFunction
              MultiplyFunction Maximum
                MaximumFunction RemainingGrowth
                  Constant Zero: FixedValue=0
                  SubtractFunction Difference
                    VariableReference MaxSize: VariableName=[Grain].MaximumPotentialGrainSize
                    VariableReference CurrentSize: VariableName=[Grain].Size
                VariableReference NumberFunction: VariableName=[Grain].NumberFunction
        PhaseLookup NFillingRate
          PhaseLookupValue PreFlowering: Start=Sowing; End=Flowering
            Constant Demand: FixedValue=0
          PhaseLookupValue GrainGrowthPhase: Start=Flowering; End=Mature
            MultiplyFunction Demand
              DivideFunction Rate
                Constant PotentialKernalN: FixedValue=0.0011; Units=g
                AddFunction FillingDuration
                  VariableReference EarlyFillingDuration: VariableName=[Phenology].GrainFilling.Target
                  VariableReference GrainFillingDuration: VariableName=[Phenology].Maturing.Target
              VariableReference ThermalTime: VariableName=[Phenology].ThermalTime
              VariableReference NumberFunction: VariableName=[Grain].NumberFunction
        Constant MinimumNConc: FixedValue=0.0123
        Constant MaxNConcDailyGrowth: FixedValue=0.035
        Constant MaximumNConc: FixedValue=0.0463
        Constant WaterContent: FixedValue=0.12
        AccumulateFunction AccumThermalTime: StartStageName=Flowering; EndStageName=Mature; ResetStageName=Emergence; FractionRemovedOnCut=0; FractionRemovedOnHarvest=0; FractionRemovedOnGraze=0; FractionRemovedOnPrune=0
          VariableReference DailyThermalTimeValue: VariableName=[Phenology].ThermalTime
        ExpressionFunction Protein
          Expression=divide(([Grain].Live.N + [Grain].Dead.N),([Grain].Live.Wt + [Grain].Dead.Wt)) * 100 * 5.71
        BiomassRemoval BiomassRemovalDefaults: HarvestFractionLiveToRemove=1; HarvestFractionDeadToRemove=1; HarvestFractionLiveToResidue=0; HarvestFractionDeadToResidue=0
        Constant CarbonConcentration: FixedValue=0.4
        NutrientPoolFunctions DMDemandPriorityFactors
          Constant Structural: FixedValue=1
          Constant Metabolic: FixedValue=1
          Constant Storage: FixedValue=1
        NutrientPoolFunctions NDemandPriorityFactors: same as Replacements.IntermediateWheatgrass.Grain.DMDemandPriorityFactors
        DivideFunction NperKernal
          VariableReference GrainN: VariableName=[Grain].N
          VariableReference GrainNumber: VariableName=[Grain].NumberFunction
      GenericOrgan Spike: IsAboveGround=true
        Constant NReallocationFactor: FixedValue=0
        Constant RemobilisationCost: FixedValue=0
        PhaseLookup NRetranslocationFactor
          PhaseLookupValue EarlyGrowth: Start=Emergence; End=Flowering
            Constant ValueDuringEarlyGrowth: FixedValue=0
          PhaseLookupValue ReproductiveGrowth: Start=Ripening; End=Mature
            Constant ValueDuringGrainFill: FixedValue=0.5
        LinearInterpolationFunction MaximumNConc
          XYPairs: X=[3, 4, 5, 5.5, 6.5, 7, 8]; Y=[0.01, 0.01, 0.01, 0.01, 0.025, 0.025, 0.025]
          VariableReference XValue: VariableName=[Phenology].Stage
        Constant MinimumNConc: FixedValue=0.004
        BiomassRemoval BiomassRemovalDefaults: HarvestFractionLiveToRemove=0.9; HarvestFractionDeadToRemove=0.8; HarvestFractionLiveToResidue=0.1; HarvestFractionDeadToResidue=0.2
        PhaseLookupValue NitrogenDemandSwitch: Start=Emergence; End=Flowering
          Constant: FixedValue=1
        PhaseLookup DMRetranslocationFactor
          PhaseLookupValue VegetativeGrowth: Start=Emergence; End=Flowering
            Constant DMRetranslocationFactor: FixedValue=0
          PhaseLookupValue ReproductiveGrowth: Start=Ripening; End=Mature
            Constant DMRetranslocationFactor: FixedValue=0.5
        Constant DetachmentRateFunction: FixedValue=0; Units=/d
        Constant MaintenanceRespirationFunction: FixedValue=0; Units=0-1
        Constant DMConversionEfficiency: FixedValue=1; Units=0-1
        Constant DMReallocationFactor: FixedValue=0
        AddFunction CriticalNConc
          VariableReference MinimumNConc: VariableName=[Spike].MinimumNConc
          MultiplyFunction MetabolicNconc
            SubtractFunction NonStructuralN
              VariableReference MaximumNConc: VariableName=[Spike].MaximumNConc
              VariableReference MinimumNConc: VariableName=[Spike].MinimumNConc
            Constant Proportion: FixedValue=0.8
        LinearInterpolationFunction SenescenceRate
          XYPairs: X=[3, 4, 5, 6, 7, 8]; Y=[0.07, 0.04, 0.04, 0.015, 0.012, 0.012]
          VariableReference XValue: VariableName=[Phenology].Stage
        Constant CarbonConcentration: FixedValue=0.4
        NutrientDemandFunctions DMDemands
          MultiplyFunction Structural
            PartitionFractionDemandFunction DMDemandFunction
              LinearInterpolationFunction PartitionFraction
                XYPairs: X=[5, 6, 6.01, 8, 9]; Y=[0, 0.01, 0.9, 0, 0]
                VariableReference XValue: VariableName=[Phenology].Stage
            PhaseLookup StructuralFraction
              PhaseLookupValue VegetativeGrowth: Start=Emergence; End=StemElongation
                Constant StructuralFractionEG: FixedValue=0
              PhaseLookupValue ReproductiveGrowth: Start=Flowering; End=Mature
                Constant StructuralFractionGF: FixedValue=0.5
          Constant Metabolic: FixedValue=0
          StorageDMDemandFunction Storage
            SubtractFunction StorageFraction
              Constant One: FixedValue=1
              VariableReference StructuralFraction: VariableName=[Spike].DMDemands.Structural.StructuralFraction
          Constant QStructuralPriority: FixedValue=1
          Constant QMetabolicPriority: FixedValue=1
          Constant QStoragePriority: FixedValue=1
        NutrientDemandFunctions NDemands
          MultiplyFunction Structural
            VariableReference MinNconc: VariableName=[Spike].minimumNconc
            VariableReference PotentialDMAllocation: VariableName=[Spike].potentialDMAllocation.Structural
          MultiplyFunction Metabolic
            SubtractFunction MetabolicNconc
              VariableReference CritNconc: VariableName=[Spike].criticalNConc
              VariableReference MinNconc: VariableName=[Spike].minimumNconc
            VariableReference PotentialDMAllocation: VariableName=[Spike].potentialDMAllocation.Structural
          StorageNDemandFunction Storage
            VariableReference NitrogenDemandSwitch: VariableName=[Spike].nitrogenDemandSwitch
            VariableReference MaxNconc: VariableName=[Spike].maximumNconc
          Constant QStructuralPriority: FixedValue=1
          Constant QMetabolicPriority: FixedValue=1
          Constant QStoragePriority: FixedValue=1
        RetranslocateNonStructural RetranslocateNitrogen
        NutrientPoolFunctions InitialWt: same as Replacements.IntermediateWheatgrass.Stem.InitialWt
        Constant Photosynthesis: FixedValue=0
        VariableReference initialNConcFunction: VariableName=[Spike].MinimumNConc
      Root: GrowthRespiration=0; MaintenanceRespiration=0
        RootShapeCylinder RootShape
        Constant DMConversionEfficiency: FixedValue=1
        Constant RemobilisationCost: FixedValue=0
        Constant KLModifier: FixedValue=1
        Constant SoilWaterEffect: FixedValue=1
        Constant MaxDailyNUptake: FixedValue=20
        Constant SenescenceRate: FixedValue=0.005
        Constant MaximumRootDepth: FixedValue=3000000
        Constant MaximumNConc: FixedValue=0.01
        Constant MinimumNConc: FixedValue=0.01
        PhaseLookupValue NitrogenDemandSwitch: Start=Germination; End=Mature
          Constant: FixedValue=1
        BiomassRemoval BiomassRemovalDefaults: HarvestFractionLiveToRemove=0; HarvestFractionDeadToRemove=0; HarvestFractionLiveToResidue=0.2; HarvestFractionDeadToResidue=0
        Constant KNO3: FixedValue=0.02
        Constant KNH4: FixedValue=0.01
        Constant SpecificRootLength: FixedValue=140000; Units=mm/g
        MultiplyFunction RootFrontVelocity
          PhaseLookup PotentialRootFrontVelocity
            PhaseLookupValue PreEmergence: Start=Germination; End=Emergence
              Constant Value: FixedValue=8; Units=mm/d
            PhaseLookupValue PostEmergence: Start=Emergence; End=Ripening
              Constant Value: FixedValue=30; Units=mm/d
          WeightedTemperatureFunction TemperatureFactor: MaximumTemperatureWeighting=0.5
            XYPairs: X=[0, 10, 20, 30]; Y=[0, 1, 1, 0]
          LinearInterpolationFunction WaterFactor
            SoilWaterScale XValue: LLModel=0
            XYPairs: X=[0, 0.25, 1]; Y=[0, 1, 1]
        MinimumFunction NUptakeSWFactor
          SoilWaterScale: LLModel=1
          Constant One: FixedValue=1
        Constant CarbonConcentration: FixedValue=0.4
        Constant MaintenanceRespirationFunction: FixedValue=0
        NutrientDemandFunctions DMDemands
          MultiplyFunction Structural
            PartitionFractionDemandFunction DMDemandFunction
              PhaseLookup PartitionFraction
                PhaseLookupValue PreEmergence: Start=Germination; End=Emergence
                  Constant Value: FixedValue=0
                PhaseLookupValue PreFlowering: Start=Emergence; End=Flowering
                  LinearInterpolationFunction AgeFactor
                    XYPairs: X=[3, 5, 6]; Y=[0.5, 0.2, 0.2]
                    VariableReference XValue: VariableName=[Phenology].Stage
                PhaseLookupValue PostFlowering: Start=Flowering; End=Mature
                  Constant Value: FixedValue=0.2
            Constant StructuralFraction: FixedValue=1
          Constant Metabolic: FixedValue=0
          StorageDMDemandFunction Storage
            SubtractFunction StorageFraction
              Constant One: FixedValue=1
              VariableReference StructuralFraction: VariableName=[Root].DMDemands.Structural.StructuralFraction
          Constant QStructuralPriority: FixedValue=1
          Constant QMetabolicPriority: FixedValue=1
          Constant QStoragePriority: FixedValue=1
        NutrientDemandFunctions NDemands
          MultiplyFunction Structural
            VariableReference MinNconc: VariableName=[Root].minimumNconc
            VariableReference PotentialDMAllocation: VariableName=[Root].potentialDMAllocation.Structural
          MultiplyFunction Metabolic
            SubtractFunction MetabolicNconc
              VariableReference CritNconc: VariableName=[Root].criticalNConc
              VariableReference MinNconc: VariableName=[Root].minimumNconc
            VariableReference PotentialDMAllocation: VariableName=[Root].potentialDMAllocation.Structural
          StorageNDemandFunction Storage
            VariableReference NitrogenDemandSwitch: VariableName=[Root].nitrogenDemandSwitch
            VariableReference MaxNconc: VariableName=[Root].maximumNconc
          Constant QStructuralPriority: FixedValue=1
          Constant QMetabolicPriority: FixedValue=1
          Constant QStoragePriority: FixedValue=1
        VariableReference CriticalNConc: VariableName=[Root].MinimumNConc
        NutrientPoolFunctions InitialWt
          Constant Structural: FixedValue=0.005; Units=g/plant
          Constant Metabolic: FixedValue=0
          Constant Storage: FixedValue=0
      CompositeBiomass AboveGround: OrganNames=[Leaf, Stem, Spike, Grain]; IncludeLive=true; IncludeDead=true
      CompositeBiomass StemPlusSpike: OrganNames=[Stem, Spike]; IncludeLive=true; IncludeDead=true
      CompositeBiomass AboveGroundLive: OrganNames=[Leaf, Stem, Spike, Grain]; IncludeLive=true; IncludeDead=false
      CompositeBiomass AboveGroundDead: OrganNames=[Leaf, Stem, Spike, Grain]; IncludeLive=false; IncludeDead=true
      CompositeBiomass BelowGround: OrganNames=[Root]; IncludeLive=true; IncludeDead=true
      CompositeBiomass TotalLive: OrganNames=[Leaf, Stem, Spike, Grain, Root]; IncludeLive=true; IncludeDead=false
      CompositeBiomass Total: OrganNames=[Leaf, Stem, Spike, Grain, Root]; IncludeLive=true; IncludeDead=true
      LinearInterpolationFunction DeltaAnnualDayLength
        XYPairs
          X=[-60.561, -60, -58, -56, -53, -50, -45, -40, -35, -30, -20, -10, 0, 10, 20, 30, 35, 40, 45, 50, 53, 56, 58, 60, 60.561]
          Y=[8.16263, 7.22844, 6.23534, 5.57804, 4.82687, 4.2383, 3.47239, 2.87562, 2.37888, 1.94128, 1.21059, 0.58553637, 0, 0.58553637, 1.21059, 1.94128, 2.37888, 2.87562, 3.47239, 4.2383, 4.82687, 5.57804, 6.23534, 7.22844, 8.16263]
        Memo
          This is the variation in day length within a year (i.e. the length of longest day minus that of the shortest).  It could, or should, be computed functions in 'Weather' as it is a function of latitude, but due to the lack of an accessor, a fitted function is used instead.  The value is used to generalise the computations of the target partitioning of new growth to above ground organs.
        VariableReference XValue: VariableName=[Weather].Latitude
      Constant SeedMortalityRate: FixedValue=0
      Constant MortalityRate: FixedValue=0
      PhaseLookup TargetAboveGroundFraction
        Memo Description
          The model attempts to keep the proportion of the plant biomass above and below ground at a given value.  The 'target' value is the 'ideal' relative proportion of biomass above and below ground for the plant at a given growth phase.  The approach used here mimics the allocation pattern in strongly taprooted forages (e.g. [Teixeira2008DMPartition]).  In spring, nearly all biomass is allocated to above ground organs, with the proportion reducing as the length of day increases.  In summer-autumn the allocation evenly distributed amoung all organs, favouring the replenishment of below ground reserves ([Evans1973RootShoot]; [HeichelEtAl1985]).
          The approach used in the IntermediateWheatgrass model is based on that used for describing biomass partitioning in lucerne ([Teixeira2008DMPartition]), which was parameterised for Lincoln, NZ, only.  This was generalised by assuming that miminum and maximum allocations are a function of the annual variation in day length (which is a function of latitude).  Thus, the variation in allocation to above ground organs is small in the tropics and reaches a maximum near the polar circle.  This function allows for smooth transition between seasons and describe the general pattern sensibly, but it should be revised when more data becomes available.
        PhaseLookupValue AllPhases: Start=Emergence; End=Ripening
          LessThanFunction TargetAboveGroundAllocation
            VariableReference PhotoperiodVariation: VariableName=[Phenology].PhotoperiodVariation
            Constant Zero: FixedValue=0
            VariableReference BaseAllocationFraction: VariableName=[LowerAllocationFractionAboveG]
            AddFunction VariableAllocationFraction
              VariableReference BaseAllocationFraction: VariableName=[LowerAllocationFractionAboveG]
              MultiplyFunction AdditionalAllocation
                SubtractFunction DeltaAllocation
                  VariableReference MaximumAllocationFraction: VariableName=[UpperAllocationFractionAboveG]
                  VariableReference MinimumAllocationFraction: VariableName=[LowerAllocationFractionAboveG]
                SubtractFunction DayLengthFactor
                  Constant One: FixedValue=1
                  PowerFunction PowerFactor: Exponent=2.5
                    DivideFunction BaseFactor
                      MaximumFunction Nominator
                        Constant Zero: FixedValue=0
                        SubtractFunction PhotoDev
                          PhotoperiodFunction PhotoPeriod: Twilight=0; DayLength=0
                          SubtractFunction Deviation
                            Constant Noon: FixedValue=12; Units=hours
                            VariableReference DeltaDayLength: VariableName=[DeltaAnnualDayLength]
                      MultiplyFunction Denominator
                        Constant Two: FixedValue=2
                        VariableReference DeltaDayLength: VariableName=[DeltaAnnualDayLength]
      MaximumFunction LowerAllocationFractionAboveG
        Memo
          This is the lower limit for biomass allocation in above ground organs, assumed to be a function of latitude.
        Constant MinimumAllocation: FixedValue=0.4; Units=g/g
        SubtractFunction EstimatedAllocation
          Constant MedianAllocation: FixedValue=0.75; Units=g/g
          MultiplyFunction LatitudeFactor
            LessThanFunction AbsLatitude
              VariableReference Latitude: VariableName=[Weather].Latitude
              Constant Zero: FixedValue=0
              MultiplyFunction SouthLatitude
                Constant MinusOne: FixedValue=-1
                VariableReference Latitude: VariableName=[Weather].Latitude
              VariableReference NorthLatitude: VariableName=[Weather].Latitude
            DivideFunction Variation
              SubtractFunction DeltaAllocation
                VariableReference MedianAllocation
                  VariableName=[LowerAllocationFractionAboveG].EstimatedAllocation.MedianAllocation
                VariableReference MinimumAllocation: VariableName=[LowerAllocationFractionAboveG].MinimumAllocation
              Constant ReferenceLatitude: FixedValue=65; Units=degrees
      MinimumFunction UpperAllocationFractionAboveG
        Memo
          This is the upper limit for biomass allocation in above ground organs, assumed to be a function of latitude.  It is the values used for partitioning growth in early spring.
        Constant MaximumAllocation: FixedValue=0.99; Units=g/g
        AddFunction EstimatedAllocation
          VariableReference MedianAllocation
            VariableName=[LowerAllocationFractionAboveG].EstimatedAllocation.MedianAllocation
          MultiplyFunction LatitudeFactor
            LessThanFunction AbsLatitude: same as Replacements.IntermediateWheatgrass.LowerAllocationFractionAboveG.EstimatedAllocation.LatitudeFactor.AbsLatitude
            DivideFunction Variation
              SubtractFunction DeltaAllocation
                VariableReference MaximumAllocation: VariableName=[UpperAllocationFractionAboveG].MaximumAllocation
                VariableReference MedianAllocation
                  VariableName=[LowerAllocationFractionAboveG].EstimatedAllocation.MedianAllocation
              Constant ReferenceLatitude: FixedValue=50; Units=degrees
      Folder Cultivars
        Cultivar IntermediateWheatgrass
          Memo Description
            IntermediateWheatgrass cultivar for initial perennial grains model
  DataStore
    ExcelInput Observed: FileNames=[Observed.xlsx]; SheetNames=[Observed-IWG]
    PredictedObserved: PredictedTableName=Report; ObservedTableName=Observed-IWG; FieldNameUsedForMatch=Date; FieldName2UsedForMatch=SimulationName; AllColumns=false
      Tests: POName=PredictedObserved
        AcceptedStatsName=Name n Slope Intercept SEslope SEintercept R2 RMSE NSE ME MAE RSR
  Simulation ExampleSimulation
    Clock: Start=2020-03-01; End=2024-05-28
    Weather: FileName=Cowra.met
    Summary summaryfile
    SoilArbitrator Soil Arbitrator
    Zone Field: Area=1; Slope=0; AspectAngle=0; Altitude=50
      MicroClimate: a_interception=0; b_interception=1; c_interception=0; d_interception=0; SoilHeatFluxFraction=0.4; MinimumHeightDiffForNewLayer=0; NightInterceptionFraction=0.5; ReferenceHeight=2
      Irrigation
      Fertiliser
      SurfaceOrganicMatter: InitialResidueName=grass; InitialResidueType=grass; InitialResidueMass=1000; InitialStandingFraction=0; InitialCPR=0; InitialCNR=30
      Plant IntermediateWheatgrass
      Operations Sowing
        2020-05-22  [IntermediateWheatgrass].Sow(population: 50, cultivar: "IntermediateWheatgrass", depth: 20, rowSpacing: 150)
      Manager AutomaticIrrigation
        allowIrrigation = True
        seasonStart = 1-may
        seasonEnd = 30-mar
        seasonsAllocation = 10000
        triggerDeficit = 50
        targetDeficit = 95
        returndays = 3
        maximumAmount = 30
        depthPAWC = 650
```csharp
using Newtonsoft.Json;
using APSIM.Shared.Utilities;
using System.Xml.Serialization;
using Models.Soils;
using Models.PMF;
using Models.Core;
using System;
using System.Linq;
using Models.Interfaces;



        
namespace Models
{
    [Serializable] 
    [System.Xml.Serialization.XmlInclude(typeof(Model))]
    public class Script : Model
    {
        [Link] private ISummary summary;
        [Link] private Irrigation Irrigation;
        [Link] private Clock Clock;
        [Link] private Soil Soil;
        [Link(IsOptional = true)] private IPlant existingCrop;
        private DateTime StartDate;
        private DateTime EndDate;
        private double TopDUL;
        private double TopLL;
        private int nLayers;
        [Link]
        private IPhysical soilPhysical;
        [Link]
        private ISoilWater waterBalance;
        //Communication to other modules
       
        //User inputs from properties tab
        [Description("Turn irrigation on?")]
        public bool allowIrrigation { get; set; }
        [Description("Start of irrigation season (dd-MMM)")]
        public string seasonStart { get; set; }
        [Description("End of irrigation season (dd-MMM)")]
        public string seasonEnd { get; set; }
        [Description("Season allocation (mm)")]
        public double seasonsAllocation { get; set; }
        [Description("Deficit to trigger irrigation (% PAWC)")]
        public double triggerDeficit { get; set; }
        [Description("Deficit to stop irrigaton (% PAWC)")]
        public double targetDeficit { get; set; }
        [Description("Minimum days for irrigation to return")]
        public double returndays { get; set; }
        [Description("Maximum irrigation application (mm/day)")]
        public double maximumAmount { get; set; }
        [Description("Depth to calculate PAWC (mm)")]
        public double depthPAWC { get; set; }

        //Class members
        [JsonIgnore] public double TopSWdeficit { get; set; }
        [JsonIgnore] public double TopSWC { get; set; }
        [JsonIgnore] public double DaysSinceIrrigation { get; set; }
        [JsonIgnore] public double AmountToApply { get; set; }
        [JsonIgnore] public double SeasonAppliedAmount { get; set; }
        
        private bool IrrigationIsAllowed { get; set; }
        private bool SeasonIsOpen { get; set; }
        private bool CropIsActive { get; set; }
        private bool IrrigatorIsAvailable { get; set; }
        private bool SoilIsDry { get; set; }

    
        //Calculate static soil variables
        [EventSubscribe("StartOfSimulation")]
        private void OnStartOfSimulation(object sender, EventArgs e)
        {   
            //Set the season dates
            StartDate = DateTime.Parse(seasonStart + "-" + Clock.Today.Year.ToString());
            EndDate = DateTime.Parse(seasonEnd + "-" + Clock.Today.Year.ToString());
            
            //Can we irrigate at all?
            IrrigationIsAllowed = false; 
            if (allowIrrigation)
                IrrigationIsAllowed = true; 

            //Calculate soil water variables
            double depthFromSurface = 0.0;
            double fracLayer = 0.0;
            nLayers = soilPhysical.Thickness.Length;
            for (int layer = 0; layer < nLayers; layer++)
            {
                fracLayer = Math.Min(1.0, (depthPAWC - depthFromSurface) / soilPhysical.Thickness[layer]);
                TopLL += soilPhysical.LL15mm[layer] * fracLayer;
                TopDUL += soilPhysical.DULmm[layer] * fracLayer;
                depthFromSurface += soilPhysical.Thickness[layer];
                if (depthFromSurface >= depthPAWC)
                    layer = nLayers;
            }
        }
             
        //Determine daily requirement for irrigation
        [EventSubscribe("StartOfDay")]
        private void OnStartOfDay(object sender, EventArgs e)
        {
            //Can we irrigate today?          
            SeasonIsOpen = isBetween(Clock.Today, StartDate, EndDate);
            if (!SeasonIsOpen)
                SeasonAppliedAmount = 0;

            //Is there a crop in the ground that needs irrigation?
            CropIsActive = false;
            if ((existingCrop != null) && (existingCrop.IsAlive))
                CropIsActive = true;
            //if ((existingCrop.Phenology.Stage >= 3.0) && (existingCrop.Phenology.Stage < 6.0))
          
            //Is the irrigator available?
            IrrigatorIsAvailable = false;
            DaysSinceIrrigation += 1;
            if (DaysSinceIrrigation >= returndays)
                IrrigatorIsAvailable = true;
          
            //Is the soil dry enough to require irrigation?
            SoilIsDry = false;
            double depthFromSurface = 0.0;
            double fracLayer = 0.0;
            TopSWC = 0.0;
            for (int layer = 0; layer < nLayers; layer++)
            //for (int layer = 0; depthFromSurface < depthPAWC + soilPhysical.Thickness[layer]; layer++)
            {
                fracLayer = Math.Min(1.0, (depthPAWC - depthFromSurface) / soilPhysical.Thickness[layer]);
                TopSWC += waterBalance.SWmm[layer] * fracLayer;
                depthFromSurface += soilPhysical.Thickness[layer];
                if (depthFromSurface >= depthPAWC)
                    layer = nLayers;
            }
            
            TopSWdeficit = TopSWC - TopDUL;
            if (Math.Max(0.0, -TopSWdeficit) >= (TopDUL - TopLL) * (100 - triggerDeficit) / 100)
                SoilIsDry = true;
                
            //Are all the conditions ratifying irrigation
            if (IrrigationIsAllowed && SeasonIsOpen && CropIsActive && IrrigatorIsAvailable && SoilIsDry)
            {
                //Lets bloody well irrigate then!!!!
                AmountToApply = TopDUL * targetDeficit / 100 - TopSWC;
                AmountToApply = Math.Max(0.0, Math.Min(AmountToApply, seasonsAllocation - SeasonAppliedAmount));
                AmountToApply = Math.Min(AmountToApply,maximumAmount);
                Irrigation.Apply(AmountToApply);
                DaysSinceIrrigation = 0;
                SeasonAppliedAmount += AmountToApply;
            }
        }
        
        ///Checks whether theDate is between iniDate and endDate (non-year specific)
        private bool isBetween(DateTime theDay, DateTime iniDate, DateTime endDate)
        {
            bool result = false;
            if (iniDate.DayOfYear < endDate.DayOfYear)
            {
                // period is within one year, ex: summer in the northern hemisphere
                if ((theDay.DayOfYear >= iniDate.DayOfYear) && (theDay.DayOfYear <= endDate.DayOfYear))
                    result = true;
            }
            else
            {
                // period goes over the end of the year, ex: summer in the southern hemisphere
                if ((theDay.DayOfYear >= iniDate.DayOfYear) || (theDay.DayOfYear <= endDate.DayOfYear))
                    result = true;
            }
            
            return result;
        }
    }
}
```
      Manager Fertilise on fixed dates
        FertiliserType = DAP
        FertiliserDates = 24-May, 24-Oct
        FertiliseDepth = 0
        Amount = 100
        AmountType = True
```csharp
using Models.Soils;
using System;
using System.Linq;
using Models.Core;
using Models.PMF;
using APSIM.Shared.Utilities;
namespace Models
{
    [Serializable]
    public class Script : Model
    {
        [Link] Clock Clock;
        [Link] Fertiliser Fertiliser;
        
        [Separator("A component to apply fertiliser on one or more dates on every year of the simulation")]

        [Description("Type of fertiliser to apply? ")] 
        [Display(Type = DisplayType.FertiliserType)]public string FertiliserType { get; set; }

        [Description("Enter the fertilisation dates as dd-mmm with comma separation (any year information entered will be ignored): ")] 
        public string[] FertiliserDates { get; set; } 
        
        [Description("Fertilise depth (mm)")]
        public double FertiliseDepth { get; set; }

        [Description("Amount of fertiliser to be applied (kg/ha)")] 
        public double Amount { get; set; }

        [Description("Is the above amount to be applied each time? (yes/ticked)? Or is it the total annual amount across all dates (no/unticked)")] 
        public bool AmountType { get; set; }

        
        [EventSubscribe("DoManagement")]
        private void OnDoManagement(object sender, EventArgs e)
        {
            foreach (string ddMMM in FertiliserDates)
            {
                if (DateUtilities.DatesEqual(ddMMM, Clock.Today))
                {
                    if (AmountType)
                        Fertiliser.Apply(amount: Amount, type: FertiliserType);
                    else
                        Fertiliser.Apply(amount: Amount / FertiliserDates.Length, type: FertiliserType, depth: FertiliseDepth);
                }
            }
        }
    }
}
```
      Manager Harvest on a fixed date
        Crop = [IntermediateWheatgrass]
        HarvestDate = 15-Feb
```csharp
using APSIM.Shared.Utilities;
using Models.Utilities;
using Models.Soils;
using Models.PMF;
using Models.Core;
using System;
using System.Linq;

namespace Models
{
    [Serializable]
    public class Script : Model
    {
        [Link] Clock Clock;
        [Link] Fertiliser Fertiliser;
        [Link] Summary Summary;
        [Link] Soil Soil;
        
        [Description("Crop")]
        public IPlant Crop { get; set; }

        [Description("Harvest date (dd-mmm)")]
        public string HarvestDate { get; set; }

        [EventSubscribe("DoManagement")]
        private void OnDoManagement(object sender, EventArgs e)
        {
            if (DateUtilities.WithinDates(HarvestDate, Clock.Today, HarvestDate))
            {
                Crop.Harvest();    
            }
        }
    }
}
```
      Manager BiomassRemovalRule
        leafFracToRemove = 0.8
        leafDeadToRemove = 0.8
        leafFracToResidue = 0
        leafDeadToResidue = 0
        stemFracToRemove = 0.8
        stemDeadToRemove = 0.8
        stemFracToResidue = 0
        stemDeadToResidue = 0
        grainFracToRemove = 1
        grainDeadToRemove = 1
        grainFracToResidue = 0
        grainDeadToResidue = 0
        spikeFracToRemove = 1
        spikeDeadToRemove = 1
        spikeFracToResidue = 0
        spikeDeadToResidue = 0
        rootFracToRemove = 0
        rootDeadToRemove = 0
        rootFracToResidue = 0
        rootDeadToResidue = 0
```csharp
using APSIM.Core;
using Newtonsoft.Json;
using Models.PMF.Phen;
using Models.PMF.Library;
using Models.PMF.Organs;
using Models.Interfaces;
using Models.Soils.Nutrients;
using Models.Utilities;
using Models.Surface;
using APSIM.Shared.Utilities;
using Models.PMF.Interfaces;
using Models.PMF;
using Models.Core;
using System.Linq;
using System;
using Models.Soils;


namespace Models
{
    [Serializable]

    public class Script : Model, IStructureDependency
    {
        [Link] private Clock clock;
        [Link] private IPlant crop;
        [Link] private Summary summary;
        [Link] private SimpleLeaf leaf;
        [Link] private BiomassRemoval biomassRemoval;
        [Link] private Phenology phenology;
        [Link] private Plant IntermediateWheatgrass;
        
        public IStructure Structure { private get; set; }
                
        [Description("    Live leaf fraction to remove from the field     ")]
        public double leafFracToRemove { get; set; } = 1.0;
        [Description("    Dead leaf fraction to remove from the field     ")]
        public double leafDeadToRemove { get; set; } = 1.0;
        [Description("    Live leaf fraction to residue     ")]
        public double leafFracToResidue { get; set; } = 0;
        [Description("    Dead leaf fraction to residue     ")]
        public double leafDeadToResidue { get; set; } = 0;        
    
         [Description("    Live stem fraction to remove from the field     ")]
        public double stemFracToRemove { get; set; } = 1.0;
        [Description("    Dead stem fraction to remove from the field     ")]
        public double stemDeadToRemove { get; set; } = 1.0;
        [Description("    Live stem fraction to residue     ")]
        public double stemFracToResidue { get; set; } = 0;
        [Description("    Dead stem fraction to residue     ")]
        public double stemDeadToResidue { get; set; } = 0;        
    
         [Description("    Live grain fraction to remove from the field     ")]
        public double grainFracToRemove { get; set; } = 1.0;
        [Description("    Dead grain fraction to remove from the field     ")]
        public double grainDeadToRemove { get; set; } = 1.0;
        [Description("    Live grain fraction to residue     ")]
        public double grainFracToResidue { get; set; } = 0;
        [Description("    Dead grain fraction to residue     ")]
        public double grainDeadToResidue { get; set; } = 0;        
    
         [Description("    Live spike fraction to remove from the field     ")]
        public double spikeFracToRemove { get; set; } = 1.0;
        [Description("    Dead spike fraction to remove from the field     ")]
        public double spikeDeadToRemove { get; set; } = 1.0;
        [Description("    Live spike fraction to residue     ")]
        public double spikeFracToResidue { get; set; } = 0;
        [Description("    Dead spike fraction to residue     ")]
        public double spikeDeadToResidue { get; set; } = 0;        
    
          [Description("    Live root fraction to remove from the field     ")]
        public double rootFracToRemove { get; set; } = 0;
        [Description("    Dead root fraction to remove from the field     ")]
        public double rootDeadToRemove { get; set; } = 0;
        [Description("    Live root fraction to residue     ")]
        public double rootFracToResidue { get; set; } = 0;
        [Description("    Dead root fraction to residue     ")]
        public double rootDeadToResidue { get; set; } = 0;        
     
        private bool writeToSummary = true;
        
          private enum Stage { Sowing, Germination, Emergence, Induction, StemElongation, Flowering, 
          Ripening, Mature, Rewind }
        
 
        [EventSubscribe("Cutting")]      
        private void OnDoCutting(object sender, EventArgs e)
        {
                             
               // set removal fractions (these override the default removals in the plant)
            // Actually do the biomass removal
               var Leaf =   Structure.FindChild<IHasDamageableBiomass>("Leaf", relativeTo: (INodeModel)IntermediateWheatgrass);
            var Stem =   Structure.FindChild<IHasDamageableBiomass>("Stem", relativeTo: (INodeModel)IntermediateWheatgrass);
               var Grain =   Structure.FindChild<IHasDamageableBiomass>("Grain", relativeTo: (INodeModel)IntermediateWheatgrass);
               var Root =   Structure.FindChild<IHasDamageableBiomass>("Root", relativeTo: (INodeModel)IntermediateWheatgrass);
            var Spike =   Structure.FindChild<IHasDamageableBiomass>("Spike", relativeTo: (INodeModel)IntermediateWheatgrass);
               
               Leaf.RemoveBiomass(leafFracToRemove, leafDeadToRemove, leafFracToResidue, leafDeadToResidue);
               Stem.RemoveBiomass(stemFracToRemove, stemDeadToRemove, stemFracToResidue, stemDeadToResidue);
               Grain.RemoveBiomass(grainFracToRemove, grainDeadToRemove, grainFracToResidue, grainDeadToResidue);
               Root.RemoveBiomass(rootFracToRemove, rootDeadToRemove, rootFracToResidue, rootDeadToResidue);
               Spike.RemoveBiomass(spikeFracToRemove, spikeDeadToRemove, spikeFracToResidue, spikeDeadToResidue);
                                   
            summary.WriteMessage(this, "Debug** Cutting", MessageType.Diagnostic);                              
        }
        
        [EventSubscribe("Harvesting")]      
        private void OnDoHarvesting(object sender, EventArgs e)
        {                 
               // set removal fractions (these override the default removals in the plant)
            // Actually do the biomass removal
               var Leaf =   Structure.FindChild<IHasDamageableBiomass>("Leaf", relativeTo: (INodeModel)IntermediateWheatgrass);
            var Stem =   Structure.FindChild<IHasDamageableBiomass>("Stem", relativeTo: (INodeModel)IntermediateWheatgrass);
               var Grain =   Structure.FindChild<IHasDamageableBiomass>("Grain", relativeTo: (INodeModel)IntermediateWheatgrass);
               var Root =   Structure.FindChild<IHasDamageableBiomass>("Root", relativeTo: (INodeModel)IntermediateWheatgrass);
            var Spike =   Structure.FindChild<IHasDamageableBiomass>("Spike", relativeTo: (INodeModel)IntermediateWheatgrass);
               
               Leaf.RemoveBiomass(leafFracToRemove, leafDeadToRemove, leafFracToResidue, leafDeadToResidue);
               Stem.RemoveBiomass(stemFracToRemove, stemDeadToRemove, stemFracToResidue, stemDeadToResidue);
               Grain.RemoveBiomass(grainFracToRemove, grainDeadToRemove, grainFracToResidue, grainDeadToResidue);
               Root.RemoveBiomass(rootFracToRemove, rootDeadToRemove, rootFracToResidue, rootDeadToResidue);
               Spike.RemoveBiomass(spikeFracToRemove, spikeDeadToRemove, spikeFracToResidue, spikeDeadToResidue);
                                   
            summary.WriteMessage(this, "Debug** Harvesting", MessageType.Diagnostic);
            phenology.SetToStage((double)Stage.Emergence);                             
        }
    }
}
```
      Manager PhenologyRulesDAS
```csharp
using APSIM.Core;
using Models.Functions;
using Models.DCAPST.Interfaces;
using Newtonsoft.Json;
using Models.PMF.Phen;
using Models.PMF.Library;
using Models.PMF.Organs;
using Models.Interfaces;
using Models.Soils.Nutrients;
using Models.Utilities;
using Models.Surface;
using APSIM.Shared.Utilities;
using Models.PMF.Interfaces;
using Models.PMF;
using Models.Core;
using System.Linq;
using System;
using Models.Soils;

namespace Models
{
    [Serializable]
    public class Script : Model, IStructureDependency
    {
        [Link] private Clock clock;
        [Link] private IPlant crop;
        [Link] private Summary Summary;
        [Link] private SimpleLeaf leaf;
        [Link] private BiomassRemoval biomassRemoval;
        [Link] private Phenology phenology;
        [Link] private Plant IntermediateWheatgrass;
        [Link] private Zone zone;
        [Link(ByName=true)] private SubDailyInterpolation ThermalStress;
        [Link(ByName=true)] private Constant ThermalStressThreshold;
        [Link(ByName=true)] private LinearInterpolationFunction FW;
        [Link(ByName=true)] private Constant FWThreshold;
        [Link(ByName=true)] private VariableReference FWPhen;
        
        public IStructure Structure { private get; set; }
        


        private double leafFracToRemove = 0.05;
        private double leafFracToResidue = 0.05;
        private double leafDeadToRemove = 0.0;
        private double leafDeadToResidue = 0.0;
        private double stemFracToRemove = 0.05;
        private double stemFracToResidue = 0.05;
        private double stemDeadToRemove = 0.0;
        private double stemDeadToResidue = 0.0;
        private double grainFracToRemove = 0.0;
        private double grainFracToResidue = 0.0;
        private double grainDeadToRemove = 0.0;
        private double grainDeadToResidue = 0.0;
        private double rootFracToRemove = 0.0;
        private double rootFracToResidue = 0.0;
        private double rootDeadToRemove = 0.0;
        private double rootDeadToResidue = 0.0;
        private double spikeFracToRemove = 0.0;
        private double spikeFracToResidue = 0.0;
        private double spikeDeadToRemove = 0.0;
        private double spikeDeadToResidue = 0.0;
      
        private double accumulatedTempStress = 0;   
        private bool writeToSummary = true;
        private bool harvestWhenRipe = true;
        
        //Delayed plantings of perennials in the fall can result in stand mortality and subsequent reductions
        //in biomass yields the year following seeding (Hall, 1995)
        private bool delayedGermination = false;
        
          private enum Stage { Sowing, Germinating, Emerging, Vernalising, Inducing, Reproductive, GrainFilling, Maturing, Harvest, GotoPhase }
        
        [EventSubscribe("EndOfDay")]      
        private void OnDoManagementCalculations(object sender, EventArgs e)
        {
            Summary.WriteMessage(this,phenology.CurrentPhaseName, MessageType.Diagnostic);

            // The following code is designed to capture the effects of temperature stress on the early reproductive stages
            // of a perennial grain. If the acummualted temperature are above a designated threshold, and there is water stress,
            // then consider the reproductive organs have suffered ireversable damage and rewind to the inducing/vegetative stage
            //
            if (phenology.CurrentPhaseName == "Reproductive")
            { 
                double tempStress = ThermalStress.Value();
                double stressThreshold = ThermalStressThreshold.Value();
                double waterStress = FWPhen.Value();
                double wsThreshold = FWThreshold.Value();
                   
                   accumulatedTempStress += tempStress;
                 
                Summary.WriteMessage(this, "accumulatedTempStress = "+ accumulatedTempStress, MessageType.Diagnostic);
                Summary.WriteMessage(this, "stressThreshold = "+ stressThreshold, MessageType.Diagnostic);
                Summary.WriteMessage(this, "waterStress = "+ waterStress, MessageType.Diagnostic);
                Summary.WriteMessage(this, "watereStressThreshold = "+ wsThreshold, MessageType.Diagnostic);
                
                if((accumulatedTempStress > stressThreshold)&&(waterStress < wsThreshold))
                {                                 
                    phenology.SetToStage((double)Stage.Inducing);
                       Summary.WriteMessage(this, "Debug** Set to Inducing Stage", MessageType.Diagnostic);
                       accumulatedTempStress = 0;
                       Summary.WriteMessage(this, "accumulatedTempStress = "+accumulatedTempStress+" FW="+waterStress, MessageType.Diagnostic);
                   }
            }
            
            if (phenology.CurrentPhaseName == "GrainRipening")
            {   
                accumulatedTempStress = 0;
                Summary.WriteMessage(this, "Maturing: accumulatedTempStress = "+ accumulatedTempStress, MessageType.Diagnostic); 
            }
        }
        
        [EventSubscribe("EndOfDay")]
        private void OnEndOfDay(object sender, EventArgs e)
        {
            Summary.WriteMessage(this, "PhaseName = "+ phenology.CurrentPhaseName + " population = " + IntermediateWheatgrass.Population, MessageType.Diagnostic);
            if (phenology.CurrentPhaseName == "Emerging")
            {
                if (IntermediateWheatgrass.DaysAfterSowing > 30)
                {  
                    delayedGermination = true;
                }
            }    
                    
            if (delayedGermination)
            {
                // set removal fractions (these override the default removals in the plant)
                // Actually do the biomass removal
                   var Leaf =   Structure.FindChild<IHasDamageableBiomass>("Leaf", relativeTo: (INodeModel)IntermediateWheatgrass);
                var Stem =   Structure.FindChild<IHasDamageableBiomass>("Stem", relativeTo: (INodeModel)IntermediateWheatgrass);
                   var Grain =   Structure.FindChild<IHasDamageableBiomass>("Grain", relativeTo: (INodeModel)IntermediateWheatgrass);
                   var Root =   Structure.FindChild<IHasDamageableBiomass>("Root", relativeTo: (INodeModel)IntermediateWheatgrass);
                var Spike =   Structure.FindChild<IHasDamageableBiomass>("Spike", relativeTo: (INodeModel)IntermediateWheatgrass);
               
                   Leaf.RemoveBiomass(leafFracToRemove, leafDeadToRemove, leafFracToResidue, leafDeadToResidue);
                   Stem.RemoveBiomass(stemFracToRemove, stemDeadToRemove, stemFracToResidue, stemDeadToResidue);
                   Grain.RemoveBiomass(grainFracToRemove, grainDeadToRemove, grainFracToResidue, grainDeadToResidue);
                   Root.RemoveBiomass(rootFracToRemove, rootDeadToRemove, rootFracToResidue, rootDeadToResidue);
                   Spike.RemoveBiomass(spikeFracToRemove, spikeDeadToRemove, spikeFracToResidue, spikeDeadToResidue);
                                   
                Summary.WriteMessage(this, "Debug** RemoveBiomass", MessageType.Diagnostic);      
            }             
        }    
    }
}
```
      Soil Synthetic Soil Derived from ISRIC SoilGrids: ASCOrder=NA; ASCSubOrder=NA; SoilType=Haplic Luvisols; Site=NA; NearestTown=NA; Region=NA; State=NA; Country=Australia; NaturalVegetation=NA; ApsoilNumber=9999; Latitude=-33.875; Longitude=148.625; LocationAccuracy=+- 250 m; YearOfSampling=2019; DataSource=ISRIC SoilGrids
        Water: Thickness=[150, 150, 150, 150, 200, 200, 200, 200, 300, 300]; FilledFromTop=true
          InitialValues=[0.285, 0.29, 0.3, 0.307, 0.31, 0.306375, 0.23, 0.23, 0.23, 0.23]
        Physical
          Thickness  ParticleSizeSand  ParticleSizeSilt  ParticleSizeClay  Rocks  BD     AirDry  LL15   DUL    SAT    KS
          150        58.7              20.7              21.3              0      1.422  0.063   0.19   0.285  0.42   29.571
          150        54.5              19.5              26.5              0      1.49   0.067   0.2    0.29   0.405  16.24
          150        49                18.5              33.2              0      1.529  0.072   0.217  0.3    0.4    7.422
          150        45                17.5              37.8              0      1.543  0.077   0.232  0.307  0.4    4.404
          200        43                17                40                0      1.555  0.079   0.237  0.31   0.4    3.392
          200        43                17                40                0      1.565  0.077   0.233  0.31   0.4    3.392
          200        43                17.1              40                0      1.569  0.077   0.23   0.31   0.4    3.392
          200        43                17.3              40                0      1.567  0.077   0.23   0.31   0.4    3.392
          300        43                17.6              40                0      1.565  0.077   0.23   0.31   0.4    3.392
          300        43                17.8              40                0      1.561  0.077   0.23   0.31   0.4    3.392
          Rocks source: Calculated
          SoilCrop IntermediateWheatgrassSoil
            LL=[0.165785, 0.174594, 0.185089, 0.190906, 0.195265, 0.196943, 0.195426, 0.191978, 0.23, 0.23]
            KL=[0.07, 0.07, 0.07, 0.07, 0.07, 0.07, 0.07, 0.07, 0.06, 0.06]
            XF=[1, 1, 1, 1, 1, 1, 0.99631, 0.971416, 1, 1]
            LL, KL, XF source: Calculated (layer 9, 10)
        WaterBalance SoilWater: SummerDate=1-nov; SummerU=6; SummerCona=6; WinterDate=1-apr; WinterU=2; WinterCona=2; DiffusConst=3656.42; DiffusSlope=9.71; Salb=0.13; CN2Bare=73; CNRed=20; CNCov=0; DischargeWidth=5; CatchmentArea=10; PSIDul=-100; Thickness=[150, 150, 150, 150, 200, 200, 200, 200, 300, 300]
          SWCON=[0.424, 0.368, 0.278, 0.215, 0.148, 0.148, 0.148, 0.148, 0.106, 0.106]
        Organic: FOMCNRatio=40; CarbonUnits=Total
          Thickness  Carbon  SoilCNRatio  FBiom  FInert  FOM
          150        0.86    8.2          0.04   0.194   60.644
          150        0.4     8.2          0.031  0.305   48.4252
          150        0.3     8.2          0.014  0.561   38.6683
          150        0.2     8.2          0.01   0.772   30.8773
          200        0.1     8.2          0.01   0.99    22.8745
          200        0.1     8.2          0.01   0.99    16.9458
          200        0.1     8.2          0.01   0.99    12.5538
          200        0.1     8.2          0.01   0.99    9.30006
          300        0.1     8.2          0.01   0.99    5.92998
          300        0.1     8.2          0.01   0.99    3.78112
        Chemical: PHUnits=Water
          Thickness  PH   CEC
          150        5.1  11.555
          150        5    11.627
          150        5    12.8224
          150        5    13.5576
          200        5    13.786
          200        5    13.786
          200        6    13.786
          200        6    13.786
          300        6    13.786
          300        6    13.786
          CEC source: Calculated
        Nutrient
        Solute NO3: Thickness=[150, 150, 150, 150, 200, 200, 200, 200, 300, 300]; InitialValues=[4, 5, 6, 5, 5, 5, 4, 4, 4, 0]; InitialValuesUnits=ppm; WaterTableConcentration=0; D0=0; DepthConstant=0; MaxDepthSoluteAccessible=0; RunoffEffectivenessAtMovingSolute=0; MaxEffectiveRunoff=0
        Solute NH4: Thickness=[150, 150, 150, 150, 200, 200, 200, 200, 300, 300]; InitialValues=[3, 2, 1, 1, 1, 1, 1, 1, 1, 1]; InitialValuesUnits=ppm; WaterTableConcentration=0; D0=0; DepthConstant=0; MaxDepthSoluteAccessible=0; RunoffEffectivenessAtMovingSolute=0; MaxEffectiveRunoff=0
        Solute Urea: Thickness=[150, 150, 150, 150, 200, 200, 200, 200, 300, 300]; InitialValues=[0, 0, 0, 0, 0, 0, 0, 0, 0, 0]; InitialValuesUnits=kg/ha; WaterTableConcentration=0; D0=0; DepthConstant=0; MaxDepthSoluteAccessible=0; RunoffEffectivenessAtMovingSolute=0; MaxEffectiveRunoff=0
        SoilTemperature Temperature
      Report: EventNames=[Clock].EndOfDay
        VariableNames:
          [Clock].Today as Date
          [IntermediateWheatgrass].Population
          [IntermediateWheatgrass].PlantType
          [IntermediateWheatgrass].Leaf.RadiationIntercepted as InterceptedRadiation
          [IntermediateWheatgrass].AboveGround.Wt*10 as totalBiomass
          [IntermediateWheatgrass].BelowGround.Wt*10 as Roots
          [IntermediateWheatgrass].Leaf.Live.NConc
          [IntermediateWheatgrass].Leaf.LAI*100
          [IntermediateWheatgrass].Leaf.Live.Wt*10 as LeavesWeight
          [IntermediateWheatgrass].Stem.Live.Wt*10 as StemsWeight
          [IntermediateWheatgrass].Spike.Live.Wt*10 as SpikesWeight
          [IntermediateWheatgrass].Grain.Live.Wt*10 as GrainWeight
          [IntermediateWheatgrass].Root.Live.Wt*10 as RootsWeight
          [IntermediateWheatgrass].Leaf.Senesced.Wt*10 as LeavesDeadWeight
          [IntermediateWheatgrass].Stem.Senesced.Wt*10 as StemsDeadWeight
          [IntermediateWheatgrass].Spike.Senesced.Wt*10 as SpikesDeadWeight
          [IntermediateWheatgrass].Phenology.CurrentStageName
          [IntermediateWheatgrass].Phenology.CurrentPhaseName
          [IntermediateWheatgrass].Phenology.Stage
          [IntermediateWheatgrass].Phenology.Photoperiod
          [Phenology].Vernalisation.TodaysVernalisation*100
          [Phenology].Vernalisation.VernalisingDays
          [Phenology].Vernalisation.DaysVernalised
          LeavesWeight+LeavesDeadWeight+StemsWeight+StemsDeadWeight+SpikesWeight+SpikesDeadWeight+GrainWeight as AboveGndBiomass
          [Phenology].StageToZadok
          [IntermediateWheatgrass].Phenology.AccumulatedTT
          [IntermediateWheatgrass].Phenology.ThermalStress
          [Leaf].Fw
          [Leaf].Fn
          [Phenology].Reproductive.Progression
          [Phenology].ThermalTime
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