Simulations: Version=171
  Memo TitlePage
    # The APSIM Sesame Model

    The APSIM Sesame model has been developed using the Plant Modelling Framework (PMF) of ([brown_plant_2014]). This new framework provides a library of plant organ and process submodels that can be coupled, at runtime, to construct a model in much the same way that models can be coupled to construct a simulation. This means that dynamic composition of lower level process and organ classes (e.g. photosynthesis, leaf) into larger constructions (e.g. maize, wheat, sorghum) can be achieved by the model developer without additional coding.

    The model consists of:

    * a phenology model to simulate development between growth phases
    * a structure model to simulate plant morphology
    * a collection of organs to simulate the various plant parts
    * an arbitrator to allocate resources (N, biomass) to the various plant organs
  DataStore
  Folder Simulations
    Experiment ARM
      Factors
        Permutation
          Factor Cultivar: Specification=[Sowing].Script.CultivarName = ARMTestSlow, ARMTestFast
          Factor Population: Specification=[Sowing].Script.Population = 50
          Factor SowDate
            Specification=[Sowing].Script.SowDate = 01-Jan, 01-Feb, 01-Mar, 01-Apr, 01-May, 01-Jun, 01-Jul, 01-Aug, 01-Sep, 01-Oct, 01-Nov, 01-Dec
          Factor NO3N: Specification=[FertiliseSowing].Script.Amount = 200
          Factor AutoIrrigate: Specification=[AutoIrrigate].Script.AutoIrrigationOn = false, true
      Simulation Base
        Clock: Start=1999-01-01; End=2023-12-31
        Summary summaryfile
        Weather
          FileName=C:\Users\U8019357\OneDrive - UniSQ\00_Projects\2023.12.13 Sesame Model Development\04_Data\Field Experiment (Tully)\SILO Weather Data\Tully Experiment.met
        SoilArbitrator Soil Arbitrator
        Zone paddock: Area=1; Slope=0; AspectAngle=0; Altitude=50
          MicroClimate: a_interception=0; b_interception=1; c_interception=0; d_interception=0; SoilHeatFluxFraction=0.4; MinimumHeightDiffForNewLayer=0; NightInterceptionFraction=0.5; ReferenceHeight=2
          Irrigation
          Fertiliser
          SurfaceOrganicMatter: InitialResidueName=fallow; InitialResidueType=Sesame; InitialResidueMass=0; InitialStandingFraction=0; InitialCPR=0; InitialCNR=55
          Soil: ASCOrder=NA; ASCSubOrder=NA; SoilType=Haplic Arenosols; Site=NA; NearestTown=NA; Region=NA; State=NA; Country=Australia; NaturalVegetation=NA; ApsoilNumber=9999; Latitude=-23.125; Longitude=141.875; LocationAccuracy=+- 250 m; DataSource=ISRIC SoilGrids
            Water: Thickness=[150, 150, 150, 150, 200, 200, 200, 200, 300, 300]; InitialPAWmm=0; RelativeTo=LL15; FilledFromTop=true
              InitialValues=[0.213, 0.225, 0.23, 0.23, 0.228, 0.223, 0.22, 0.22, 0.22, 0.22]
            Physical
              Thickness  ParticleSizeClay  ParticleSizeSand  ParticleSizeSilt  BD     AirDry  LL15   DUL    SAT
              150        31.5              57.5              11.7              1.388  0.071   0.213  0.302  0.445
              150        34                55                11                1.371  0.075   0.225  0.315  0.455
              150        35                53.8              11.2              1.364  0.077   0.23   0.318  0.46
              150        35                53.2              11.8              1.365  0.077   0.23   0.323  0.46
              200        34.8              53.2              12                1.367  0.076   0.228  0.323  0.46
              200        34.2              53.8              12                1.371  0.074   0.223  0.318  0.46
              200        33.8              54.1              12.1              1.374  0.073   0.22   0.315  0.459
              200        33.4              54.3              12.3              1.377  0.073   0.22   0.315  0.457
              300        32.9              54.6              12.6              1.38   0.073   0.22   0.315  0.455
              300        32.3              54.9              12.8              1.383  0.073   0.22   0.315  0.452
              SoilCrop SesameSoil
                LL=[0.213, 0.225, 0.23, 0.238, 0.247, 0.254, 0.264, 0.277, 0.293, 0.311]
                KL=[0.06, 0.06, 0.06, 0.055, 0.048, 0.04, 0.032, 0.024, 0.014, 0.003]
                XF=[1, 1, 1, 1, 1, 1, 1, 1, 1, 1]
              SoilCrop RiceSoil
                LL=[0.213, 0.225, 0.23, 0.238, 0.247, 0.254, 0.264, 0.277, 0.293, 0.311]
                KL=[0.06, 0.06, 0.06, 0.055, 0.048, 0.04, 0.032, 0.024, 0.014, 0.003]
                XF=[1, 1, 1, 1, 1, 1, 1, 1, 1, 1]
              SoilCrop WheatSoil
                LL=[0.213, 0.225, 0.23, 0.238, 0.247, 0.254, 0.264, 0.277, 0.293, 0.311]
                KL=[0.06, 0.06, 0.06, 0.055, 0.048, 0.04, 0.032, 0.024, 0.014, 0.003]
                XF=[1, 1, 1, 1, 1, 1, 1, 1, 1, 1]
              SoilCrop TeffSoil
                LL=[0.213, 0.225, 0.23, 0.238, 0.247, 0.254, 0.264, 0.277, 0.293, 0.311]
                KL=[0.06, 0.06, 0.06, 0.055, 0.048, 0.04, 0.032, 0.024, 0.014, 0.003]
                XF=[1, 1, 1, 1, 1, 1, 1, 1, 1, 1]
              SoilCrop SugarcaneSoil
                LL=[0.213, 0.225, 0.23, 0.234, 0.239, 0.241, 0.246, 0.253, 0.262, 0.273]
                KL=[0.06, 0.06, 0.06, 0.057, 0.053, 0.048, 0.044, 0.039, 0.033, 0.027]
                XF=[1, 1, 1, 1, 1, 1, 1, 1, 1, 1]
              SoilCrop MaizeSoil
                LL=[0.213, 0.225, 0.23, 0.238, 0.247, 0.254, 0.264, 0.277, 0.293, 0.311]
                KL=[0.06, 0.06, 0.06, 0.055, 0.048, 0.04, 0.032, 0.024, 0.014, 0.003]
                XF=[1, 1, 1, 1, 1, 1, 1, 1, 1, 1]
              SoilCrop OilPalmSoil
                LL=[0.213, 0.225, 0.23, 0.234, 0.239, 0.241, 0.246, 0.253, 0.262, 0.273]
                KL=[0.06, 0.06, 0.06, 0.057, 0.053, 0.048, 0.044, 0.039, 0.033, 0.027]
                XF=[1, 1, 1, 1, 1, 1, 1, 1, 1, 1]
              SoilCrop CassavaSoil
                LL=[0.213, 0.225, 0.23, 0.238, 0.247, 0.254, 0.264, 0.277, 0.293, 0.311]
                KL=[0.06, 0.06, 0.06, 0.055, 0.048, 0.04, 0.032, 0.024, 0.014, 0.003]
                XF=[1, 1, 1, 1, 1, 1, 1, 1, 1, 1]
              SoilCrop PlantainForageSoil
                LL=[0.213, 0.225, 0.23, 0.234, 0.239, 0.241, 0.246, 0.253, 0.262, 0.273]
                KL=[0.06, 0.06, 0.06, 0.057, 0.053, 0.048, 0.044, 0.039, 0.033, 0.027]
                XF=[1, 1, 1, 1, 1, 1, 1, 1, 1, 1]
              SoilCrop SunflowerSoil
                LL=[0.214, 0.232, 0.244, 0.253, 0.261, 0.267, 0.276, 0.287, 0.301, 0.314]
                KL=[0.1, 0.093, 0.084, 0.075, 0.065, 0.053, 0.041, 0.029, 0.015, 0.001]
                XF=[1, 1, 1, 1, 1, 1, 1, 1, 1, 1]
              SoilCrop CanolaSoil
                LL=[0.213, 0.225, 0.23, 0.238, 0.247, 0.254, 0.264, 0.277, 0.293, 0.311]
                KL=[0.06, 0.06, 0.06, 0.055, 0.048, 0.04, 0.032, 0.024, 0.014, 0.003]
                XF=[1, 1, 1, 1, 1, 1, 1, 1, 1, 1]
              SoilCrop SorghumSoil
                LL=[0.213, 0.225, 0.23, 0.236, 0.242, 0.246, 0.253, 0.263, 0.275, 0.289]
                KL=[0.07, 0.07, 0.07, 0.066, 0.06, 0.053, 0.045, 0.039, 0.03, 0.019]
                XF=[1, 1, 1, 1, 1, 1, 1, 1, 1, 1]
              SoilCrop MilletSoil
                LL=[0.213, 0.225, 0.23, 0.236, 0.242, 0.246, 0.253, 0.263, 0.275, 0.289]
                KL=[0.07, 0.07, 0.07, 0.066, 0.06, 0.053, 0.045, 0.039, 0.03, 0.019]
                XF=[1, 1, 1, 1, 1, 1, 1, 1, 1, 1]
              SoilCrop PeanutSoil
                LL=[0.213, 0.225, 0.23, 0.23, 0.235, 0.246, 0.26, 0.276, 0.295, 0.314]
                KL=[0.06, 0.06, 0.06, 0.06, 0.055, 0.045, 0.035, 0.025, 0.012, 0.001]
                XF=[1, 1, 1, 1, 1, 1, 1, 1, 1, 1]
              SoilCrop BarleySoil
                LL=[0.213, 0.225, 0.23, 0.237, 0.244, 0.251, 0.259, 0.27, 0.284, 0.301]
                KL=[0.07, 0.07, 0.07, 0.065, 0.058, 0.049, 0.041, 0.033, 0.023, 0.01]
                XF=[1, 1, 1, 1, 1, 1, 1, 1, 1, 1]
              SoilCrop CottonSoil
                LL=[0.213, 0.225, 0.23, 0.23, 0.228, 0.228, 0.236, 0.246, 0.26, 0.275]
                KL=[0.1, 0.1, 0.1, 0.1, 0.1, 0.094, 0.083, 0.072, 0.058, 0.042]
                XF=[1, 1, 1, 1, 1, 1, 1, 1, 1, 1]
              SoilCrop OatsSoil
                LL=[0.213, 0.225, 0.23, 0.238, 0.247, 0.254, 0.264, 0.277, 0.293, 0.311]
                KL=[0.06, 0.06, 0.06, 0.055, 0.048, 0.04, 0.032, 0.024, 0.014, 0.003]
                XF=[1, 1, 1, 1, 1, 1, 1, 1, 1, 1]
              SoilCrop ChickpeaSoil
                LL=[0.213, 0.225, 0.23, 0.23, 0.235, 0.245, 0.257, 0.271, 0.289, 0.31]
                KL=[0.06, 0.06, 0.06, 0.06, 0.055, 0.046, 0.037, 0.028, 0.016, 0.003]
                XF=[1, 1, 1, 1, 1, 1, 1, 1, 1, 1]
              SoilCrop MungbeanSoil
                LL=[0.213, 0.225, 0.23, 0.233, 0.247, 0.261, 0.277, 0.296, 0.314, 0.315]
                KL=[0.06, 0.06, 0.06, 0.058, 0.048, 0.036, 0.024, 0.012, 0.001, 0]
                XF=[1, 1, 1, 1, 1, 1, 1, 1, 1, 0]
              SoilCrop Pigeon PeaSoil
                LL=[0.213, 0.225, 0.23, 0.23, 0.235, 0.246, 0.26, 0.276, 0.295, 0.314]
                KL=[0.06, 0.06, 0.06, 0.06, 0.055, 0.045, 0.035, 0.025, 0.012, 0.001]
                XF=[1, 1, 1, 1, 1, 1, 1, 1, 1, 1]
              SoilCrop CowpeaSoil
                LL=[0.213, 0.225, 0.23, 0.238, 0.247, 0.254, 0.264, 0.277, 0.293, 0.311]
                KL=[0.06, 0.06, 0.06, 0.055, 0.048, 0.04, 0.032, 0.024, 0.014, 0.003]
                XF=[1, 1, 1, 1, 1, 1, 1, 1, 1, 1]
              SoilCrop FababeanSoil
                LL=[0.213, 0.225, 0.23, 0.23, 0.229, 0.236, 0.247, 0.261, 0.278, 0.298]
                KL=[0.08, 0.08, 0.08, 0.08, 0.079, 0.069, 0.057, 0.046, 0.031, 0.014]
                XF=[1, 1, 1, 1, 1, 1, 1, 1, 1, 1]
              SoilCrop LucerneSoil
                LL=[0.213, 0.225, 0.23, 0.23, 0.228, 0.223, 0.22, 0.221, 0.231, 0.244]
                KL=[0.1, 0.1, 0.1, 0.1, 0.1, 0.1, 0.1, 0.099, 0.089, 0.075]
                XF=[1, 1, 1, 1, 1, 1, 1, 1, 1, 1]
              SoilCrop LupinSoil
                LL=[0.213, 0.225, 0.23, 0.238, 0.247, 0.254, 0.264, 0.277, 0.293, 0.311]
                KL=[0.06, 0.06, 0.06, 0.055, 0.048, 0.04, 0.032, 0.024, 0.014, 0.003]
                XF=[1, 1, 1, 1, 1, 1, 1, 1, 1, 1]
              SoilCrop LentilSoil
                LL=[0.213, 0.225, 0.23, 0.238, 0.247, 0.254, 0.264, 0.277, 0.293, 0.311]
                KL=[0.06, 0.06, 0.06, 0.055, 0.048, 0.04, 0.032, 0.024, 0.014, 0.003]
                XF=[1, 1, 1, 1, 1, 1, 1, 1, 1, 1]
              SoilCrop TriticaleSoil
                LL=[0.213, 0.225, 0.236, 0.249, 0.262, 0.275, 0.289, 0.307, 0.315, 0.315]
                KL=[0.07, 0.07, 0.065, 0.056, 0.045, 0.032, 0.019, 0.006, 0, 0]
                XF=[1, 1, 1, 1, 1, 1, 1, 1, 0, 0]
              SoilCrop EucalyptusSoil
                LL=[0.213, 0.225, 0.23, 0.231, 0.229, 0.225, 0.223, 0.224, 0.226, 0.227]
                KL=[0.08, 0.08, 0.08, 0.079, 0.079, 0.078, 0.077, 0.076, 0.075, 0.074]
                XF=[1, 1, 1, 1, 1, 1, 1, 1, 1, 1]
              SoilCrop GliricidiaSoil
                LL=[0.213, 0.225, 0.23, 0.231, 0.23, 0.227, 0.227, 0.229, 0.231, 0.234]
                KL=[0.08, 0.08, 0.08, 0.079, 0.077, 0.076, 0.074, 0.072, 0.07, 0.068]
                XF=[1, 1, 1, 1, 1, 1, 1, 1, 1, 1]
            WaterBalance SoilWater: SummerDate=1-nov; SummerU=6; SummerCona=6; WinterDate=1-apr; WinterU=6; WinterCona=6; DiffusConst=16432.57; DiffusSlope=-6.73; Salb=0.13; CN2Bare=73; CNRed=20; CNCov=0; DischargeWidth=5; CatchmentArea=10; PSIDul=-100; Thickness=[150, 150, 150, 150, 200, 200, 200, 200, 300, 300]
              SWCON=[0.252, 0.214, 0.197, 0.202, 0.167, 0.169, 0.174, 0.181, 0.141, 0.15]
            CERESSoilTemperature Temperature
            Solute NO3: Thickness=[150, 150, 150, 150, 200, 200, 200, 200, 300, 300]; InitialValues=[0, 0, 0, 0, 0, 0, 0, 0, 0, 0]; InitialValuesUnits=ppm; WaterTableConcentration=0; D0=0; DepthConstant=0; MaxDepthSoluteAccessible=0; RunoffEffectivenessAtMovingSolute=0; MaxEffectiveRunoff=0
            Solute NH4: same as Simulations.ARM.Base.paddock.Soil.NO3
            Solute Urea: Thickness=[150, 150, 150, 150, 200, 200, 200, 200, 300, 300]; InitialValues=[0, 0, 0, 0, 0, 0, 0, 0, 0, 0]; InitialValuesUnits=kg/ha; WaterTableConcentration=0; D0=0; DepthConstant=0; MaxDepthSoluteAccessible=0; RunoffEffectivenessAtMovingSolute=0; MaxEffectiveRunoff=0
            Organic: FOMCNRatio=40; CarbonUnits=Total
              Thickness  Carbon  SoilCNRatio  FBiom  FInert  FOM
              150        0.27    10.2         0.04   0.99    121.288
              150        0.321   10.2         0.031  0.907   96.8504
              150        0.319   10.2         0.014  0.917   77.3366
              150        0.311   10.2         0.01   0.939   61.7546
              200        0.282   10.2         0.01   0.99    45.7489
              200        0.23    10.2         0.01   0.99    33.8916
              200        0.203   10.2         0.01   0.99    25.1075
              200        0.201   10.2         0.01   0.99    18.6001
              300        0.199   10.2         0.01   0.99    11.86
              300        0.196   10.2         0.01   0.99    7.56224
            Chemical: Thickness=[150, 150, 150, 150, 200, 200, 200, 200, 300, 300]; PH=[8.13, 8.25, 8.35, 8.45, 8.5, 8.5, 8.5, 8.5, 8.5, 8.5]; PHUnits=Water
            Nutrient
          Manager Sowing
            Crop = [Sesame]
            SowDate = 01-Aug
            CultivarName = Test2
            SowingDepth = 30
            RowSpacing = 300
            Population = 25
            OffsetDays = 0
            ResetWater = Yes
            ResetNutrients = Yes
            ResetSOM = Yes
```csharp
using Models.Soils.Nutrients;
using APSIM.Shared.Utilities;
using Models.Surface;
using Models.Utilities;
using Models.Soils.Nutrients;
using Models.Soils;
using Models.PMF;
using Models.Core;
using System;
using System.Linq;
using Models.Interfaces;

namespace Models
{
    [Serializable]
    public class Script : Model
    {       
        [Link] private Clock Clock;
        [Link] private Plant Wheat;
        [Link] private ISoilWater SoilWater;
        [Link] private Nutrient nutrient;
        [Link] private SurfaceOrganicMatter SOM;
        [Link] private Summary Summary;
        
        [Description("Crop")]
        public IPlant Crop { get; set; }

        [Description("Sowing date (d-mmm)")]
        public string SowDate { get; set; }

        [Display(Type = DisplayType.CultivarName)]
        [Description("Cultivar to be sown")]
        public string CultivarName { get; set; }

        [Description("Sowing depth (mm)")]
        public double SowingDepth { get; set; }

        [Description("Row spacing (mm)")]
        public double RowSpacing { get; set; }

        [Description("Plant population (/m2)")]
        public double Population { get; set; }
        
        [Description("Offset by Days (Negative is Days Before, Positive is Days After)")]
        public int OffsetDays {get;set;}

        [Description("Reset Water? (Yes or No)")]
        public string ResetWater {get;set;}

        [Description("Reset Soil Nutrients ? (Yes or No)")]
        public string ResetNutrients {get;set;}

        [Description("Reset Surface Organic Matter? (Yes or No)")]
        public string ResetSOM {get;set;}
        
        public int SowYear {get;set;}
                       

        [EventSubscribe("DoManagement")]
        private void OnDoManagement(object sender, EventArgs e)
        {
            DateTime offsetDate = DateUtilities.GetDate(SowDate, Clock.Today).AddDays(OffsetDays);
            if (offsetDate.Equals(Clock.Today))
            {
                if (ResetWater == "Yes")
                {
                    Summary.WriteMessage(this, "Reset Water", MessageType.Diagnostic);
                    SoilWater.Reset();
                }
                if (ResetNutrients == "Yes")
                {
                    Summary.WriteMessage(this, "Reset Nitrogen", MessageType.Diagnostic);
                    nutrient.Reset();
                }
                if (ResetSOM == "Yes")
                {
                    Summary.WriteMessage(this, "Reset Surface OM", MessageType.Diagnostic);
                    SOM.Reset();
                }
            }
            
            if (DateUtilities.WithinDates(SowDate, Clock.Today, SowDate))
            {
                Crop.Sow(population: Population, cultivar: CultivarName, depth: SowingDepth, rowSpacing: RowSpacing); 
                SowYear = Clock.Today.Year; 
            }
            
            if (!Crop.IsAlive) {
            	SowYear = 0;
            }
        }        
    }
}
```
          Manager AutoIrrigate
            Crop = [Sesame]
            AutoIrrigationOn = True
            FASWThreshold = 0.5
            FASWDepth = 900
            weeks = 1
            afterSowing = 1
```csharp
using Models.Interfaces;
using System;
using System.Linq;
using Models.Core;
using System.Collections.Generic;
using System.Text;
using Models.Soils;
using Models.PMF;
using Models;
using System.Xml.Serialization;
using APSIM.Shared.Utilities;
using Models.Interfaces;
namespace Models
{
    [Serializable] 
    public class Script : Model
    {
        [Link] private Zone zone;
        [Link] private Irrigation irrigation;
        [Link] private ISoilWater waterBalance;
        [Link] private IPhysical soilPhysical;

        public double FASW { get; set; }
        public double WaterDeficit  { get; set; }
    


        [Description("Crop to irrigate")]
        public IPlant Crop { get; set; }
        
        [Description("Auto irrigation on?")]
        public bool AutoIrrigationOn { get; set; }       

        [Description("Threshold fraction available water (0-1)")]
        public double FASWThreshold { get; set; }

        [Description("Soil depth (mm) to which fraction available water is calculated")]
        public double FASWDepth { get; set; }

        [Description("Minimum weeks between irrigations")]
        public double weeks { get; set; }

        [Description("Minimum days after sowing for first irrigation")]
        public int afterSowing { get; set; }

        private double irrigationGap = 0;    // gap between irrigations

        /// <summary>Called at start of simulation. Performs some basic error checking. </summary>
        [EventSubscribe("StartOfSimulation")]
        private void ErrorChecking(object sender, EventArgs args)
        {
            if (Crop == null)
                throw new Exception("No crop was specified in script " + Parent.Name);
        }

        [EventSubscribe("DoManagement")]
        private void OnDoManagement(object sender, EventArgs e)
        {
            if (AutoIrrigationOn && Crop.IsAlive)
            {
                   irrigationGap += 1;                // increment gap between irrigations
                CalculateFASW();                // calc FASW and WaterDeficit
                if ((FASW < FASWThreshold) && (irrigationGap >= weeks * 7))
                {
                    irrigation.Apply(WaterDeficit, depth: 0);
                    irrigationGap = 0;            // reset
                }
            }
            else
            {
                irrigationGap = weeks * 7 - afterSowing - 1;    // allow irrigation a number of days after it becomes alive/sown
            }
        }

        // Calculate the fraction of the potential available sw
        // Calculate the deficit amount from DUL
        private void CalculateFASW()
        {
            double[] LL15 = MathUtilities.Multiply(soilPhysical.LL15, soilPhysical.Thickness);
            double[] DUL = MathUtilities.Multiply(soilPhysical.DUL, soilPhysical.Thickness);
        
            int nlayr = GetLayerIndex(FASWDepth);
            double cumdep = MathUtilities.Sum(soilPhysical.Thickness, 0, nlayr, 0.0);    // tricky function that sums up to before nlayr

            double part_layer = MathUtilities.Divide((FASWDepth - cumdep), soilPhysical.Thickness[nlayr], 0.0);

            // note that results may be strange if swdep < ll15
            double avail_sw = (MathUtilities.Sum(waterBalance.SWmm, 0, nlayr, 0.0) + part_layer * waterBalance.SWmm[nlayr])
                            - (MathUtilities.Sum(LL15, 0, nlayr, 0.0) + part_layer * LL15[nlayr]);

            double pot_avail_sw = (MathUtilities.Sum(DUL, 0, nlayr, 0.0) + part_layer * DUL[nlayr])
                                - (MathUtilities.Sum(LL15, 0, nlayr, 0.0) + part_layer * LL15[nlayr]);
            
            FASW = MathUtilities.Divide(avail_sw, pot_avail_sw, 0.0);
            WaterDeficit = MathUtilities.Constrain(pot_avail_sw - avail_sw, 0.0, 100000);
        }

        // Get index of the layer that has this depth in it 
        private int GetLayerIndex(double pointDepth)
        {
            double[] cumThickness = soilPhysical.ThicknessCumulative;
            int layerIdx = 0;
            while ((layerIdx + 1 < cumThickness.Length) && (pointDepth > cumThickness[layerIdx]))
            {
                layerIdx += 1;
            }          

            return layerIdx;
        }
    }
}
```
          Manager FertiliseSowing
            Amount = 40
            Crop = [Sesame]
            FertiliserType = NO3N
```csharp
using Models.Soils;
using System;
using System.Linq;
using Models.Core;
using Models.PMF;
namespace Models
{
    [Serializable]
    public class Script : Model
    {
        [Link] Clock Clock;
        [Link] Fertiliser Fertiliser;
        
        [Description("Crop to be fertilised")]
        public IPlant Crop { get; set; }

        [Description("Type of fertiliser to apply? ")] 
        public Fertiliser.Types FertiliserType { get; set; }
    
        [Description("Amount of fertiliser to be applied (kg/ha)")]
        public double Amount { get; set; }
        
        [EventSubscribe("Sowing")]
        private void OnSowing(object sender, EventArgs e)
        {
            Model crop = sender as Model;
            if (Crop != null && crop.Name.ToLower() == (Crop as IModel).Name.ToLower())
                Fertiliser.Apply(Amount: Amount, Type: FertiliserType);
        }
    }
}
```
          Manager Harvesting
            Crop = [Sesame]
            BiomCheckDAS = 0
            MinBiom = 0
            MaxDuration = 250
```csharp
using APSIM.Shared.Utilities;
using Models.Utilities;
using Models.Soils;
using Models.PMF;
using Models.Core;
using System;
using System.Linq;

namespace Models
{
    [Serializable] 
    public class Script : Model
    {
        [Description("Crop:")]
        public Plant Crop { get; set; }
        
        [Description("DAS of biomass check (days):")]
        public int BiomCheckDAS { get; set; }
                
        [Description("Minimum aboveground dry bioamss (g/m2):")]
        public double MinBiom { get; set; }
                
        [Description("Maximum duration (days):")]
        public int MaxDuration { get; set; }
        
        [EventSubscribe("DoManagement")]
        private void OnDoManagement(object sender, EventArgs e)
        {
            if (Crop.IsReadyForHarvesting || Crop.DaysAfterSowing >= MaxDuration || (Crop.DaysAfterSowing >= BiomCheckDAS && Crop.AboveGround.Wt < MinBiom))
            {
                Crop.Harvest();
                Crop.EndCrop();
            }
        }
    }
}
```
          Report DailyReport: EventNames=Sesame.IsAlive == true
            VariableNames:
              [Clock].Today
              [Clock].Today.DayOfYear
              [Sowing].Script.SowYear as SowYear
              [Sesame].DaysAfterSowing
              [Sesame].IsAlive
              [Sesame].Phenology.Stage
              [Sesame].Phenology.CurrentPhaseName
              [Sesame].Phenology.AccumulatedTT
              [Sesame].Leaf.LAI
              [Sesame].Leaf.LAITotal
              [Sesame].Leaf.Photosynthesis.FT
              [Sesame].Leaf.Photosynthesis.FT.MeanT
              [Sesame].Leaf.Photosynthesis.FT.MinT
              [Sesame].Leaf.Photosynthesis.FN
              [Sesame].Leaf.Photosynthesis.FW
              [Sesame].Leaf.FW
              [Sesame].Leaf.FRGR
              [Sesame].Root.Depth
              [Sesame].Root.WetRootFractionFactor
              [Sesame].Grain.Wt
              [Sesame].AboveGround.Wt
              [Sesame].AboveGroundLive.Wt
              [Soil].Temperature.Value[1]
              [Weather].MeanT
              [Weather].Radn
              [Weather].MaxT
              [Weather].MinT
          Report HarvestReport: EventNames=[Sesame].Harvesting
            VariableNames:
              [Clock].Today
              [Clock].Today.DayOfYear
              [Sowing].Script.SowYear as SowYear
              [Clock].Today.Year as HarvestYear
              [Sesame].DaysAfterSowing
              [Sesame].Phenology.Stage
              [Sesame].Phenology.AccumulatedTT
              [Sesame].Phenology.EmergenceDAS
              [Sesame].Phenology.StartFloweringDAS
              [Sesame].Phenology.MaturityDAS
              sum of [Irrigation].IrrigationApplied from [Sesame].Sowing to [Sesame].Harvesting as TotalIrrig
              mean of [Sesame].Leaf.Photosynthesis.FT from [Sesame].Sowing to [Sesame].Harvesting as AvePsFT
              mean of [Sesame].Leaf.Photosynthesis.FT.MeanT from [Sesame].Sowing to [Sesame].Harvesting as AvePsFTMeanT
              mean of [Sesame].Leaf.Photosynthesis.FT.MinT from [Sesame].Sowing to [Sesame].Harvesting as AvePsFTMinT
              mean of [Sesame].Leaf.Photosynthesis.FN from [Sesame].Sowing to [Sesame].Harvesting as AvePsFN
              mean of [Sesame].Leaf.Photosynthesis.FW from [Sesame].Sowing to [Sesame].Harvesting as AvePsFW
              mean of [Sesame].Root.WetRootFractionFactor from [Sesame].Sowing to [Sesame].Harvesting as AveWetRootFracFact
              mean of [Sesame].Leaf.FW from [Sesame].Sowing to [Sesame].Harvesting as AveFW
              mean of [Sesame].Leaf.FRGR from [Sesame].Sowing to [Sesame].Harvesting as AveFRGR
              [Sesame].AboveGround.Wt
              [Sesame].Grain.Wt
          Plant Sesame
  Folder Replacements
    Plant Sesame: PlantType=Sesame
      Folder Cultivars
        Folder Australia
          Cultivar ARMTestSlow
            Command:
              [Phenology].Emerging.Target.ShootLag.FixedValue = 12
              [Phenology].Emerging.Target.DepthxRate.ShootRate.FixedValue = 1
              [Phenology].Vegetative.Target.FixedValue = 350
              [Phenology].EarlyFlowering.Target.FixedValue = 80
              [Phenology].EarlyPodDevelopment.Target.FixedValue = 80
              [Phenology].EarlyGrainFilling.Target.FixedValue = 80
              [Phenology].MidGrainFilling.Target.FixedValue = 170
              [Phenology].LateGrainFilling.Target.FixedValue = 130
              [Phenology].Maturing.Target.FixedValue = 60
              [Stem].MaxBranchNumber.Base.FixedValue = 4
              [Leaf].Photosynthesis.RUE.FixedValue = 1.15
              [Grain].MaximumHI.FixedValue = 0.35
          Cultivar ARMTestFast
            Command:
              [Phenology].Emerging.Target.ShootLag.FixedValue = 12
              [Phenology].Emerging.Target.DepthxRate.ShootRate.FixedValue = 1
              [Phenology].Vegetative.Target.FixedValue = 250
              [Phenology].EarlyFlowering.Target.FixedValue = 80
              [Phenology].EarlyPodDevelopment.Target.FixedValue = 80
              [Phenology].EarlyGrainFilling.Target.FixedValue = 80
              [Phenology].MidGrainFilling.Target.FixedValue = 150
              [Phenology].LateGrainFilling.Target.FixedValue = 120
              [Phenology].Maturing.Target.FixedValue = 60
              [Stem].MaxBranchNumber.Base.FixedValue = 4
              [Leaf].Photosynthesis.RUE.FixedValue = 1.15
              [Grain].MaximumHI.FixedValue = 0.35
          Cultivar 6821
            Command:
              [Phenology].Emerging.Target.ShootLag.FixedValue = 15
              [Phenology].Emerging.Target.DepthxRate.ShootRate.FixedValue = 2
              [Phenology].Vegetative.Target.FixedValue = 250
              [Phenology].EarlyFlowering.Target.FixedValue = 50
              [Phenology].EarlyPodDevelopment.Target.FixedValue = 150
              [Phenology].EarlyGrainFilling.Target.FixedValue = 150
              [Phenology].MidGrainFilling.Target.FixedValue = 200
              [Phenology].LateGrainFilling.Target.FixedValue = 150
              [Phenology].Maturing.Target.FixedValue = 30
          Cultivar 6824: same as Replacements.Sesame.Cultivars.Australia.6821
          Cultivar BlackPatch
          Cultivar MoriaBlack
            Command:
              [Phenology].Emerging.Target.ShootLag.FixedValue = 12
              [Phenology].Emerging.Target.DepthxRate.ShootRate.FixedValue = 1
              [Phenology].Vegetative.Target.FixedValue = 550
          Cultivar ES103
            Command:
              [Phenology].Emerging.Target.ShootLag.FixedValue = 12
              [Phenology].Emerging.Target.DepthxRate.ShootRate.FixedValue = 1
              [Phenology].Vegetative.Target.FixedValue = 475
              [Phenology].EarlyFlowering.Target.FixedValue = 80
              [Phenology].EarlyPodDevelopment.Target.FixedValue = 80
              [Phenology].EarlyGrainFilling.Target.FixedValue = 80
              [Phenology].MidGrainFilling.Target.FixedValue = 170
              [Phenology].LateGrainFilling.Target.FixedValue = 130
              [Phenology].Maturing.Target.FixedValue = 60
              [Leaf].Photosynthesis.RUE.FixedValue = 1.4
              [Grain].MaximumHI.FixedValue = 0.32
        Folder Iran
          Cultivar Jahan2015: same as Replacements.Sesame.Cultivars.Australia.ARMTestSlow
        Folder India
          Cultivar RT125
            Command:
              [Phenology].Emerging.Target.ShootLag.FixedValue = 10
              [Phenology].Emerging.Target.DepthxRate.ShootRate.FixedValue = 1
              [Phenology].Vegetative.Target.FixedValue = 300
              [Phenology].EarlyFlowering.Target.FixedValue = 80
              [Phenology].EarlyPodDevelopment.Target.FixedValue = 50
              [Phenology].EarlyGrainFilling.Target.FixedValue = 30
              [Phenology].MidGrainFilling.Target.FixedValue = 80
              [Phenology].LateGrainFilling.Target.FixedValue = 80
              [Phenology].Maturing.Target.FixedValue = 30
              [Leaf].Photosynthesis.RUE.FixedValue = 1.4
              [Grain].MaximumHI.FixedValue = 0.35
      OrganArbitrator Arbitrator
        BiomassTypeArbitrator DMArbitration
          Folder PotentialPartitioningMethods
            ReallocationMethod
            AllocateFixationMethod
            RetranslocationMethod
            SendPotentialDMAllocationsMethod
          Folder AllocationMethods
            NutrientConstrainedAllocationMethod
            DryMatterAllocationsMethod
          RelativeAllocation ArbitrationMethod
        BiomassTypeArbitrator NArbitration
          Folder PotentialPartitioningMethods
            ReallocationMethod
          Folder ActualPartitioningMethods
            AllocateFixationMethod
            RetranslocationMethod
          Folder AllocationMethods
            NitrogenAllocationsMethod
          RelativeAllocation ArbitrationMethod
          AllocateUptakesMethod
        WaterUptakeMethod
        NitrogenUptakeMethod
      Phenology
        SubDailyInterpolation BaseThermalTime: agregationMethod=0
          Memo
            - Baath, G. S., Kakani, V. G., Northup, B. K., Gowda, P. H., Rocateli, A. C., & Singh, H. (2022). Quantifying and Modeling the Influence of Temperature on Growth and Reproductive Development of Sesame. Journal of Plant Growth Regulation, 41(1), 143–152. https://doi.org/10.1007/S00344-020-10278-Y/FIGURES/5.

            - Angus, J. F., Cunningham, R. B., Moncur, M. W., & Mackenzie, D. H. (1980). Phasic development in field crops I. Thermal response in the seedling phase. Field Crops Research, 3(C), 365–378. https://doi.org/10.1016/0378-4290(80)90042-8
          XYPairs Response: X=[15, 29, 45]; Y=[0, 14, 0]
          ThreeHourAirTemperature InterpolationMethod
        PhaseLookup ThermalTime
          PhaseLookupValue PreEmergence: Start=Sowing; End=Emergence
            VariableReference Base: VariableName=[Phenology].BaseThermalTime
          PhaseLookupValue PreFlowering: Start=Emergence; End=StartFlowering
            MultiplyFunction TT
              VariableReference Base: VariableName=[Phenology].BaseThermalTime
              LinearInterpolationFunction PhotoperiodModifier
                Memo
                  The short-day treatment (10h-14h) shortened the duration to the ﬁrst ﬂower and lowered the ﬁrst ﬂowering-node.

                  - Kumazaki, T., Yamada, Y., Karaya, S., Tokumitsu, T., Hirano, T., Yasumoto, S., Katsuta, K., & Michiyama, H. (2008). Effects of Day Length and Air Temperature on Stem Growth and Flowering in Sesame. Plant Production Science, 11(2), 178–183. https://doi.org/10.1626/pps.11.178
                XYPairs: X=[10, 14]; Y=[1, 0.8]
                VariableReference XValue: VariableName=[Phenology].Photoperiod
          PhaseLookupValue PostFlowering: Start=StartFlowering; End=Maturity
            MultiplyFunction TT
              VariableReference Base: VariableName=[Phenology].BaseThermalTime
              LinearInterpolationFunction PhotoperiodModifier
                Memo
                  The short-day treatment (10h-14h) prolonged the ﬂowering period, but decreased the ﬂowering-node number on the main stem resulting from the slower rate of increase in nodes with ﬂowers.

                  - Kumazaki, T., Yamada, Y., Karaya, S., Tokumitsu, T., Hirano, T., Yasumoto, S., Katsuta, K., & Michiyama, H. (2008). Effects of Day Length and Air Temperature on Stem Growth and Flowering in Sesame. Plant Production Science, 11(2), 178–183. https://doi.org/10.1626/pps.11.178
                XYPairs: X=[10, 14]; Y=[0.65, 1]
                VariableReference XValue: VariableName=[Phenology].Photoperiod
          PhaseLookupValue Drydown: Start=Maturity; End=EndDrydown
            VariableReference Base: VariableName=[Phenology].BaseThermalTime
        PhotoperiodFunction Photoperiod: Twilight=0; DayLength=0
        GerminatingPhase Germinating: Start=Sowing; End=Germination; IsEmerged=false
          Constant MinSoilTemperature: FixedValue=21
        EmergingPhase Emerging: Start=Germination; End=Emergence; IsEmerged=true; TTForTimeStep=0
          VariableReference ThermalTime: VariableName=[Phenology].VegetativeThermalTime
          AddFunction Target
            Constant ShootLag: FixedValue=10
            MultiplyFunction DepthxRate
              VariableReference SowingDepth: VariableName=[Plant].SowingData.Depth
              Constant ShootRate: FixedValue=1
        GenericPhase Vegetative: Start=Emergence; End=StartFlowering; IsEmerged=true
          Constant Target: FixedValue=350
          VariableReference Progression: VariableName=[Phenology].ThermalTime
        GenericPhase EarlyFlowering: Start=StartFlowering; End=StartPodDevelopment; IsEmerged=true
          Constant Target: FixedValue=100
          VariableReference Progression: VariableName=[Phenology].ThermalTime
        GenericPhase EarlyPodDevelopment: Start=StartPodDevelopment; End=StartGrainFilling; IsEmerged=true
          Constant Target: FixedValue=50
          VariableReference Progression: VariableName=[Phenology].ThermalTime
        GenericPhase EarlyGrainFilling: Start=StartGrainFilling; End=EndCanopyDevelopment; IsEmerged=true
          Constant Target: FixedValue=50
          VariableReference Progression: VariableName=[Phenology].ThermalTime
        GenericPhase MidGrainFilling: Start=EndCanopyDevelopment; End=EndPodDevelopment; IsEmerged=true
          Constant Target: FixedValue=120
          VariableReference Progression: VariableName=[Phenology].ThermalTime
        GenericPhase LateGrainFilling: Start=EndPodDevelopment; End=EndGrainFilling; IsEmerged=true
          Constant Target: FixedValue=120
          VariableReference Progression: VariableName=[Phenology].ThermalTime
        GenericPhase Maturing: Start=EndGrainFilling; End=Maturity; IsEmerged=true
          Constant Target: FixedValue=50
          VariableReference Progression: VariableName=[Phenology].ThermalTime
        GenericPhase Drydown: Start=Maturity; End=EndDrydown; IsEmerged=true
          Constant Target: FixedValue=30
          MultiplyFunction Progression
            VariableReference ThermalTime: VariableName=[Phenology].ThermalTime
            LinearInterpolationFunction FrostImpact
              Memo
                Sesame will dry down 120-150 days without a frost. It will dry down sooner with a frost or freeze. Although sesame is indeterminate, it will terminate and self-defoliate without a frost. A frost will cause the plants to drydown more rapidly than normal. Just like cotton and sorghum, a frost will terminate the crop and prepare the crop for harvest earlier than when compared to temperatures remaining just above freezing. Rule of thumb is that you need 130 days from the time that the soil temperature is 70ºF (21ºC) and the first frost date. From planting, sesame needs about 110 days of night temperatures above 40ºF (4.5ºC). Sesame needs to reach physiological maturity prior to frost to make optimum yield.

                - SESAME GROWER GUIDE. D. Ray Langham, Jerry Riney, Glenn Smith, and Terry Wiemers. March 2008. www.sesaco.net.
              XYPairs: X=[-4, 0, 4.5, 10]; Y=[1.5, 1.2, 1, 1]
              VariableReference XValue: VariableName=[Weather].MinT
        EndPhase: Start=EndDrydown; End=Unused; IsEmerged=true
          VariableReference ThermalTime: VariableName=[Phenology].ThermalTime
        OnEventFunction EmergenceDAS: SetEvent=Emergence; ReSetEvent=never
          Memo
            A function is used to provide emergence date as days after sowing(DAS).
          Constant PreEventValue: FixedValue=0
          VariableReference PostEventValue: VariableName=[Plant].DaysAfterSowing
        OnEventFunction StartFloweringDAS: SetEvent=StartFlowering; ReSetEvent=never
          Constant PreEventValue: FixedValue=0
          VariableReference PostEventValue: VariableName=[Plant].DaysAfterSowing
        OnEventFunction StartPodDevelopmentDAS: SetEvent=StartPodDevelopment; ReSetEvent=never
          Constant PreEventValue: FixedValue=0
          VariableReference PostEventValue: VariableName=[Plant].DaysAfterSowing
        OnEventFunction StartGrainFillingDAS: SetEvent=StartGrainFilling; ReSetEvent=never
          Constant PreEventValue: FixedValue=0
          VariableReference PostEventValue: VariableName=[Plant].DaysAfterSowing
        OnEventFunction EndCanopyDevelopmentDAS: SetEvent=EndCanopyDevelopment; ReSetEvent=never
          Constant PreEventValue: FixedValue=0
          VariableReference PostEventValue: VariableName=[Plant].DaysAfterSowing
        OnEventFunction EndPodDevelopmentDAS: SetEvent=EndPodDevelopment; ReSetEvent=never
          Constant PreEventValue: FixedValue=0
          VariableReference PostEventValue: VariableName=[Plant].DaysAfterSowing
        OnEventFunction EndGrainFillingDAS: SetEvent=EndGrainFilling; ReSetEvent=never
          Constant PreEventValue: FixedValue=0
          VariableReference PostEventValue: VariableName=[Plant].DaysAfterSowing
        OnEventFunction MaturityDAS: SetEvent=Maturity; ReSetEvent=never
          Constant PreEventValue: FixedValue=0
          VariableReference PostEventValue: VariableName=[Plant].DaysAfterSowing
        OnEventFunction EndDrydownDAS: SetEvent=EndDrydown; ReSetEvent=never
          Constant PreEventValue: FixedValue=0
          VariableReference PostEventValue: VariableName=[Plant].DaysAfterSowing
        AddFunction FillingDuration
          VariableReference EarlyGrainFillingDuration: VariableName=[Phenology].EarlyGrainFilling.Target
          VariableReference MidGrainFillingDuration: VariableName=[Phenology].MidGrainFilling.Target
          VariableReference LateGrainFillingDuration: VariableName=[Phenology].LateGrainFilling.Target
        AddFunction DrydownDuration
          VariableReference Drydown: VariableName=[Phenology].Drydown.Target
      SimpleLeaf Leaf: Albedo=0.25; Gsmax350=0.015; R50=150; LeafInitialisationStage=Emergence; Height=0; BaseHeight=0; Width=0; FRGR=0; PotentialEP=0; WaterDemand=0; KDead=0.2; LAIDead=0
        Constant Phyllochron: FixedValue=55
        RUEModel Photosynthesis
          Constant RUE: FixedValue=1.4
            Memo
              In contrast to Classic, the RUE value in NG refers to the whole plant (above and below ground).

              Koocheki et al. (2016) estimated the aboveground RUE of Sesame to be 1.14 g/MJ. This value was adjusted to include root dry mass. Hamedani et al. (2020) estimate the root-to-shoot ratio of six sesame genotypes to be 0.17 - 0.36, averaged over two seasons and under rainfed and irrigated regimes. Therefore, the RUE of 1.14 g/MJ was multiplied by 1.2 (assuming a root-to-shoot ratio of 0.25), resulting in ~1.4 g/MJ.

              - Koocheki, A., Nassiri Mahallati, M., Solouki, H., & Karbor, S. (2016). Evaluation of Radiation Absorption and use Efficiency in Substitution Intercropping of Sesame (Sesamum Indicum L.) and Mung Bean (Vigna Radiata L.). Advances in Plants & Agriculture Research, 3(5). https://doi.org/10.15406/apar.2016.03.00109.

              - Hamedani, N. G., Gholamhoseini, M., Bazrafshan, F., Amiri, B., & Habibzadeh, F. (2020). Variability of root traits in sesame genotypes under different irrigation regimes. Rhizosphere, 13, 100190. https://doi.org/10.1016/j.rhisph.2020.100190.
          MultiplyFunction FW
            LinearInterpolationFunction LeafFW
              XYPairs: X=[0, 1]; Y=[0, 1]
              VariableReference XValue: VariableName=[Leaf].Fw
            VariableReference WetRootFractionFactor: VariableName=[Root].WetRootFractionFactor
          MultiplyFunction FT
            WeightedTemperatureFunction MeanT: MaximumTemperatureWeighting=0.5
              Memo
                The cardinal temperature limits of 15.7 °C (Tmin), 27.3 °C (Topt), and 44.6 °C (Tmax) were observed for rate of biomass accumulation.

                - Baath, G. S., Kakani, V. G., Northup, B. K., Gowda, P. H., Rocateli, A. C., & Singh, H. (2022). Quantifying and Modeling the Influence of Temperature on Growth and Reproductive Development of Sesame. Journal of Plant Growth Regulation, 41(1), 143–152. https://doi.org/10.1007/s00344-020-10278-y.
              XYPairs: X=[15.7, 27.3, 44.6]; Y=[0, 1, 0]
            LinearInterpolationFunction MinT
              Memo: same as Replacements.Sesame.Phenology.Drydown.Progression.FrostImpact.Memo
              XYPairs: X=[-4, 0, 4.5, 10]; Y=[0, 0, 1, 1]
              VariableReference XValue: VariableName=[Weather].MinT
          PhaseLookup FN
            PhaseLookupValue Pre-Emergence: Start=Sowing; End=Emergence
              Constant One: FixedValue=1
            PhaseLookupValue Post-Emergence: Start=Emergence; End=EndDrydown
              LinearInterpolationFunction FN
                XYPairs: X=[0, 1, 1.5]; Y=[0, 1, 1]
                VariableReference XValue: VariableName=[Leaf].Fn
          LinearInterpolationFunction FVPD
            XYPairs: X=[0, 10, 50]; Y=[1, 1, 1]
            VariableReference XValue: VariableName=[Leaf].Photosynthesis.VPD
          RUECO2Function FCO2: PhotosyntheticPathway=C3
          VariableReference RadnInt: VariableName=[Leaf].RadiationIntercepted
        StomatalConductanceCO2Modifier
          VariableReference PhotosynthesisCO2Modifier: VariableName=[Leaf].Photosynthesis.FCO2
        Constant AreaLargestLeafPair: FixedValue=0.012; Units=m^2
          Memo
            In this model, **AreaLargestLeaf** referes to the total area of the largest leaf pair.
        LinearInterpolationFunction SpecificArea
          XYPairs: X=[0, 2, 6]; Y=[0.06, 0.06, 0.06]
          VariableReference XValue: VariableName=[Leaf].LAI
        MultiplyFunction Area
          VariableReference LeafLiveWt: VariableName=[Leaf].Live.Wt
          VariableReference SLA: VariableName=[Leaf].SpecificArea
        DivideFunction LAR
          Memo
            Leaf appearance rate.
          VariableReference ThermalTime: VariableName=[Phenology].ThermalTime
          VariableReference Phyllochron: VariableName=[Leaf].Phyllochron
        MinimumFunction FRGR
          VariableReference RUE_FT: VariableName=[Leaf].Photosynthesis.FT
          VariableReference RUE_FN: VariableName=[Leaf].Photosynthesis.FN
          VariableReference RUE_FVPD: VariableName=[Leaf].Photosynthesis.FVPD
        LinearInterpolationFunction ExtinctionCoefficient
          Memo
            Koocheki et al. (2016) estimated the light extinction coefficient of sesame to be 0.681, averaged across six genotypes. The plant densities were 40 plants/m2 and inter-row spacing was 0.5m.

            - Koocheki, A., Nassiri Mahallati, M., Solouki, H., & Karbor, S. (2016). Evaluation of Radiation Absorption and use Efficiency in Substitution Intercropping of Sesame (Sesamum Indicum L.) and Mung Bean (Vigna Radiata L.). Advances in Plants & Agriculture Research, 3(5). https://doi.org/10.15406/apar.2016.03.00109.
          XYPairs: X=[200, 1000]; Y=[0.75, 0.6]
          VariableReference XValue: VariableName=[Sesame].SowingData.RowSpacing
        LinearInterpolationFunction HeightFunction
          XYPairs: X=[1, 2, 3, 4, 6, 7]; Y=[0, 0, 50, 700, 1200, 1300]
          VariableReference XValue: VariableName=[Phenology].Stage
        Constant InitialWt: FixedValue=2
        Constant NReallocationFactor: FixedValue=1
          Memo
            This model assumes that all metabolic and storage N is available for reallocation from senescing leaves.
        Constant NRetranslocationFactor: FixedValue=0.5
        PhaseLookup SenescenceRate
          PhaseLookupValue Vegetative: Start=Emergence; End=EndPodDevelopment
            Constant Rate: FixedValue=0
          PhaseLookupValue Reproductive: Start=EndPodDevelopment; End=EndDrydown
            DivideFunction Rate
              VariableReference TT: VariableName=[Phenology].ThermalTime
              SubtractFunction TTRemaining
                ExpressionFunction TTRequired
                  Expression=[Phenology].LateGrainFilling.Target + [Phenology].Maturing.Target + [Phenology].Drydown.Target
                ExpressionFunction TTComplete
                  Expression=[Phenology].LateGrainFilling.ProgressThroughPhase + [Phenology].Maturing.ProgressThroughPhase + [Phenology].Drydown.ProgressThroughPhase
            Memo
              Leaf senescence rate is calculated to ensure that all leaves are senesced by crop maturity.

              There is no data on detachment rates and so a simple value was chosen to ensure that leaves were not retained in the canopy. In the future, with more data available a thermal time basis leaf detachment rate will be explored.
        Constant DetachmentRate: FixedValue=0.05; Units=/d
        LinearInterpolationFunction CriticalNConc
          XYPairs: X=[3, 4, 9]; Y=[0.06, 0.05, 0.03]
          VariableReference XValue: VariableName=[Phenology].Stage
        Constant MinimumNConc: FixedValue=0.02
        Constant MaximumNConc: FixedValue=0.05
        Constant MaintenanceRespiration: FixedValue=0; Units=0-1
        Constant DMConversionEfficiency: FixedValue=1; Units=0-1
        BiomassRemoval BiomassRemovalDefaults: HarvestFractionLiveToRemove=0; HarvestFractionDeadToRemove=0; HarvestFractionLiveToResidue=1; HarvestFractionDeadToResidue=1
        Constant DMReallocationFactor: FixedValue=0
        Constant DMRetranslocationFactor: FixedValue=0
        Constant RemobilisationCost: FixedValue=0
        Constant CarbonConcentration: FixedValue=0.4
        NutrientDemandFunctions DMDemands
          DivideFunction Structural
            Memo
              Growth in leaf area is used to calculate the leaf dry matter demand. Further model development can be taken once new experimental data for metabolic, structural and storage forms are provided.
            PhaseLookup DeltaLAIPotential
              PhaseLookupValue Vegetative: Start=Emergence; End=EndCanopyDevelopment
                LAIncrementWithBranching
                  VariableReference PlantNumber: VariableName=[Plant].SowingData.Population
                  VariableReference NodeNumber: VariableName=[Stem].NodeNumber
                  VariableReference BranchNumber: VariableName=[Stem].BranchNumber
                  VariableReference AreaLargestLeaf: VariableName=[Leaf].AreaLargestLeafPair
                  VariableReference LAR: VariableName=[Leaf].LAR
                  XYPairs RelativeArea: X=[1, 2, 5, 6, 25]; Y=[0, 0.5, 1, 1, 0.4]
              PhaseLookupValue Reproductive: Start=EndCanopyDevelopment; End=Maturity
                Constant: FixedValue=0
            VariableReference SLA: VariableName=[Leaf].SpecificArea
          Constant Storage: FixedValue=0
          Constant Metabolic: FixedValue=0
          Constant QStructuralPriority: FixedValue=1
          Constant QMetabolicPriority: FixedValue=1
          Constant QStoragePriority: FixedValue=1
        NutrientDemandFunctions NDemands
          MultiplyFunction Structural
            VariableReference MinNconc: VariableName=[Leaf].minimumNconc
            VariableReference PotentialDMAllocation: VariableName=[Leaf].potentialDMAllocation.Structural
          MultiplyFunction Metabolic
            SubtractFunction MetabolicNconc
              VariableReference CritNconc: VariableName=[Leaf].criticalNConc
              VariableReference MinNconc: VariableName=[Leaf].minimumNconc
            VariableReference PotentialDMAllocation: VariableName=[Leaf].potentialDMAllocation.Structural
          StorageNDemandFunction Storage
            Constant NitrogenDemandSwitch: FixedValue=1
            VariableReference MaxNconc: VariableName=[Leaf].maximumNconc
          Constant QStructuralPriority: FixedValue=1
          Constant QMetabolicPriority: FixedValue=1
          Constant QStoragePriority: FixedValue=1
        LinearInterpolationFunction FrostFraction
          XYPairs: X=[-4, 4]; Y=[1, 0]
          VariableReference XValue: VariableName=[Weather].MinT
        MultiplyFunction LAIDead
          VariableReference SLA: VariableName=[Leaf].SpecificArea
          VariableReference LeafDeadWt: VariableName=[Leaf].Dead.Wt
      GenericOrgan Stem: IsAboveGround=true
        MultiplyFunction PlantPerLinearMeter
          VariableReference Population: VariableName=[Plant].SowingData.Population
          VariableReference RowSpacing: VariableName=[Plant].SowingData.RowSpacing
          Constant mm2m: FixedValue=0.001
        MultiplyFunction MaxBranchNumber
          Constant Base: FixedValue=6
          LinearInterpolationFunction PopulationEffect
            Memo
              - SMARTER SESAME AGRONOMY GUIDE. Equicon. 2021.
            XYPairs: X=[6, 25]; Y=[1, 0.25]
            VariableReference XValue: VariableName=[Stem].PlantPerLinearMeter
        DivideFunction BAR
          Memo
            Branch appearance rate.
          VariableReference ThermalTime: VariableName=[Phenology].ThermalTime
          LinearInterpolationFunction Target
            XYPairs: X=[2, 6]; Y=[200, 200]
            VariableReference XValue: VariableName=[Stem].NodeNumber
        MinimumFunction BranchNumber
          VariableReference MaxBranchNumber: VariableName=[Stem].MaxBranchNumber
          AccumulateFunction BranchNumberFunction: StartStageName=Emergence; EndStageName=EndCanopyDevelopment; FractionRemovedOnCut=1; FractionRemovedOnHarvest=1; FractionRemovedOnGraze=1; FractionRemovedOnPrune=0
            VariableReference BAR: VariableName=[Stem].BAR
        AddFunction NodeNumber
          Memo
            In this model, **NodeNumber** referes to the number of node pairs. Two leaves grow from each node pairs.
          AccumulateFunction Change: StartStageName=Emergence; EndStageName=EndCanopyDevelopment; FractionRemovedOnCut=1; FractionRemovedOnHarvest=1; FractionRemovedOnGraze=1; FractionRemovedOnPrune=0
            VariableReference LAR: VariableName=[Leaf].LAR
        Constant NReallocationFactor: FixedValue=1
        Constant NRetranslocationFactor: FixedValue=0.5
        PhaseLookup DMRetranslocationFactor
          PhaseLookupValue GrainFilling: Start=EndCanopyDevelopment; End=EndGrainFilling
            Constant RetranslocationFactor: FixedValue=0.2
        LinearInterpolationFunction MaximumNConc
          XYPairs: X=[3, 4, 5]; Y=[0.025, 0.02, 0.015]
          VariableReference XValue: VariableName=[Phenology].Stage
        Constant MinimumNConc: FixedValue=0.006
        PhaseLookupValue NitrogenDemandSwitch: Start=Emergence; End=StartGrainFilling
          Memo
            There is no evidence of stem N storage during grain filling. Also, there is no stem structural growth during this time.
          Constant: FixedValue=1
        BiomassRemoval BiomassRemovalDefaults: HarvestFractionLiveToRemove=0; HarvestFractionDeadToRemove=0; HarvestFractionLiveToResidue=1; HarvestFractionDeadToResidue=1
        PhaseLookup SenescenceRate
          PhaseLookupValue PostCanopyPhase: Start=EndCanopyDevelopment; End=Maturity
            MinimumFunction Rate
              DivideFunction Fraction
                VariableReference TT: VariableName=[Phenology].ThermalTime
                SubtractFunction TTRemaining
                  ExpressionFunction PostCanopyTT
                    Expression=[Phenology].EarlyPodDevelopment.Target+[Phenology].EarlyGrainFilling.Target+[Phenology].MidGrainFilling.Target+[Phenology].LateGrainFilling.Target
                  ExpressionFunction PostCanopyTTComplete
                    Expression=[Phenology].MidGrainFilling.ProgressThroughPhase+[Phenology].LateGrainFilling.ProgressThroughPhase
              Constant One: FixedValue=1
        Constant DetachmentRateFunction: FixedValue=0; Units=/d
        Constant MaintenanceRespirationFunction: FixedValue=0; Units=0-1
        Constant DMConversionEfficiency: FixedValue=1; Units=0-1
        Constant DMReallocationFactor: FixedValue=0
        VariableReference CriticalNConc: VariableName=[Stem].MinimumNConc
        Constant RemobilisationCost: FixedValue=0
        Constant CarbonConcentration: FixedValue=0.4
        NutrientDemandFunctions DMDemands
          MultiplyFunction Structural
            PhaseLookup Fraction
              PhaseLookupValue StemGrowthPhase: Start=Emergence; End=StartPodDevelopment
                Constant Fraction: FixedValue=0.75
              PhaseLookupValue PodAndGrainGrowth: Start=StartPodDevelopment; End=EndGrainFilling
                Constant Fraction: FixedValue=0
            VariableReference DMDemand: VariableName=[Stem].PotentialGrowth
          Constant Metabolic: FixedValue=0
          MultiplyFunction Storage
            VariableReference DMDemand: VariableName=[Stem].PotentialGrowth
            SubtractFunction StorageFraction
              Constant One: FixedValue=1
              VariableReference StructuralFraction: VariableName=[Stem].DMDemands.Structural.Fraction
          Constant QStructuralPriority: FixedValue=1
          Constant QMetabolicPriority: FixedValue=1
          Constant QStoragePriority: FixedValue=1
        NutrientDemandFunctions NDemands
          MultiplyFunction Structural
            VariableReference MinNconc: VariableName=[Stem].minimumNconc
            VariableReference PotentialDMAllocation: VariableName=[Stem].potentialDMAllocation.Structural
          MultiplyFunction Metabolic
            SubtractFunction MetabolicNconc
              VariableReference CritNconc: VariableName=[Stem].criticalNConc
              VariableReference MinNconc: VariableName=[Stem].minimumNconc
            VariableReference PotentialDMAllocation: VariableName=[Stem].potentialDMAllocation.Structural
          StorageNDemandFunction Storage
            VariableReference NitrogenDemandSwitch: VariableName=[Stem].nitrogenDemandSwitch
            VariableReference MaxNconc: VariableName=[Stem].maximumNconc
          Constant QStructuralPriority: FixedValue=1
          Constant QMetabolicPriority: FixedValue=1
          Constant QStoragePriority: FixedValue=1
        PartitionFractionDemandFunction PotentialGrowth
          PhaseLookup PartitionFraction
            PhaseLookupValue StemGrowthPhase: Start=Emergence; End=EndPodDevelopment
              Constant StemFraction: FixedValue=0.4
            PhaseLookupValue GrainFilling: Start=EndPodDevelopment; End=EndGrainFilling
              Constant StemFraction: FixedValue=0
        RetranslocateNonStructural RetranslocateNitrogen
        NutrientPoolFunctions InitialWt
          Constant Structural: FixedValue=0; Units=g/m^2
          Constant Metabolic: FixedValue=0
          Constant Storage: FixedValue=0
        Constant Photosynthesis: FixedValue=0
        VariableReference initialNConcFunction: VariableName=[Stem].MinimumNConc
      GenericOrgan Shell: IsAboveGround=true
        Constant PotentialHarvestIndex: FixedValue=0.25
        Constant NReallocationFactor: FixedValue=1
        Constant NRetranslocationFactor: FixedValue=0.5
        Constant MaximumNConc: FixedValue=0.045
        VariableReference CriticalNConc: VariableName=[Shell].MinimumNConc
        Constant MinimumNConc: FixedValue=0.01
        Constant DMRetranslocationFactor: FixedValue=0.1
        PhaseLookupValue NitrogenDemandSwitch: Start=StartPodDevelopment; End=EndPodDevelopment
          Constant: FixedValue=1
        BiomassRemoval BiomassRemovalDefaults: HarvestFractionLiveToRemove=0; HarvestFractionDeadToRemove=0; HarvestFractionLiveToResidue=1; HarvestFractionDeadToResidue=1
        PhaseLookup SenescenceRate
          PhaseLookupValue ReproductivePhase: Start=StartGrainFilling; End=EndDrydown
            MinimumFunction Rate
              DivideFunction Fraction
                VariableReference TT: VariableName=[Phenology].ThermalTime
                SubtractFunction TTRemaining
                  ExpressionFunction TTRequired
                    Expression=[Phenology].EarlyGrainFilling.Target + [Phenology].MidGrainFilling.Target + [Phenology].LateGrainFilling.Target + [Phenology].Drydown.Target
                  ExpressionFunction TTProgress
                    Expression=[Phenology].EarlyGrainFilling.ProgressThroughPhase + [Phenology].MidGrainFilling.ProgressThroughPhase + [Phenology].LateGrainFilling.ProgressThroughPhase + [Phenology].Drydown.ProgressThroughPhase
              Constant One: FixedValue=1
        Constant DetachmentRateFunction: FixedValue=0; Units=/d
        Constant MaintenanceRespirationFunction: FixedValue=0; Units=0-1
        Constant DMConversionEfficiency: FixedValue=1; Units=0-1
        Constant DMReallocationFactor: FixedValue=0
        Constant RemobilisationCost: FixedValue=0
        Constant CarbonConcentration: FixedValue=0.4
        AddFunction FillingDuration
          VariableReference EarlyPodDevelopmentDuration: VariableName=[Phenology].EarlyPodDevelopment.Target
          VariableReference EarlyGrainFillingDuration: VariableName=[Phenology].EarlyGrainFilling.Target
          VariableReference MidGrainFillingDuration: VariableName=[Phenology].MidGrainFilling.Target
        NutrientDemandFunctions DMDemands
          MultiplyFunction Structural
            PhaseLookup DMDemandFunction
              PhaseLookupValue PodDevelopment: Start=StartPodDevelopment; End=EndPodDevelopment
                MultiplyFunction HIPodDemand
                  VariableReference AboveGroundWt: VariableName=[AboveGround].Wt
                  DivideFunction HarvestIndexIncrease
                    VariableReference PotentialHarvestIndex: VariableName=[Shell].PotentialHarvestIndex
                    VariableReference FillingDuration: VariableName=[Shell].FillingDuration
                  VariableReference ThermalTime: VariableName=[Phenology].ThermalTime
            Constant StructuralFraction: FixedValue=1
            Memo
              Shell harvest index is used to calculate shell biomass demand, which follows the same approach than grain harvest index. It represents the fraction of shell biomass in relation to total aboveground biomass.
          Constant Metabolic: FixedValue=0
          StorageDMDemandFunction Storage
            SubtractFunction StorageFraction
              Constant One: FixedValue=1
              VariableReference StructuralFraction: VariableName=[Shell].DMDemands.Structural.StructuralFraction
          Constant QStructuralPriority: FixedValue=1
          Constant QMetabolicPriority: FixedValue=1
          Constant QStoragePriority: FixedValue=1
        NutrientDemandFunctions NDemands
          MultiplyFunction Structural
            VariableReference MinNconc: VariableName=[Shell].minimumNconc
            VariableReference PotentialDMAllocation: VariableName=[Shell].potentialDMAllocation.Structural
          StorageNDemandFunction Storage
            VariableReference NitrogenDemandSwitch: VariableName=[Shell].nitrogenDemandSwitch
            VariableReference MaxNconc: VariableName=[Shell].maximumNconc
          Constant Metabolic: FixedValue=0
          Constant QStructuralPriority: FixedValue=1
          Constant QMetabolicPriority: FixedValue=1
          Constant QStoragePriority: FixedValue=1
        RetranslocateNonStructural RetranslocateNitrogen
        NutrientPoolFunctions InitialWt: same as Replacements.Sesame.Stem.InitialWt
        Constant Photosynthesis: FixedValue=0
        VariableReference initialNConcFunction: VariableName=[Shell].MinimumNConc
      ReproductiveOrgan Grain: GrowthRespiration=0; MaintenanceRespiration=0
        Biomass Live
        Biomass Dead
        Constant MaximumHI: FixedValue=0.35; Units=0-1
          Memo
            - Nassiri-Mahallati, M., & Jahan, M. (2020). Using the AquaCrop model to simulate sesame performance in response to superabsorbent polymer and humic acid application under limited irrigation conditions. International Journal of Biometeorology, 64(12), 2105–2117. https://doi.org/10.1007/S00484-020-02001-Z/FIGURES/4.
        PhaseLookup PotentialHarvestIndex
          PhaseLookupValue GrainFilling: Start=StartGrainFilling; End=Maturity
            VariableReference MaximumHI: VariableName=[Grain].MaximumHI
        DivideFunction HarvestIndex
          VariableReference GrainWt: VariableName=[Grain].Wt
          VariableReference AboveGroundWt: VariableName=[AboveGround].Wt
        PhaseLookup DMDemandFunction
          PhaseLookupValue GrainFilling: Start=StartGrainFilling; End=EndGrainFilling
            MultiplyFunction HIGrainDemand
              VariableReference AboveGroundWt: VariableName=[AboveGround].Wt
              DivideFunction HarvestIndexIncrease
                VariableReference PotentialHarvestIndex: VariableName=[Grain].PotentialHarvestIndex
                VariableReference FillingDuration: VariableName=[Phenology].FillingDuration
              VariableReference ThermalTime: VariableName=[Phenology].ThermalTime
              VariableReference WetRootFractionFactor: VariableName=[Root].WetRootFractionFactor
        Constant MinimumNConc: FixedValue=0.05
        Constant MaximumNConc: FixedValue=0.058
        Constant WaterContent: FixedValue=0.06
        MultiplyFunction NFillingRate
          VariableReference NConc: VariableName=[Grain].MaximumNConc
          VariableReference DMDemand: VariableName=[Grain].DMDemandFunction
          VariableReference DMConversionEfficiency: VariableName=[Grain].DMConversionEfficiency
        BiomassRemoval BiomassRemovalDefaults: HarvestFractionLiveToRemove=1; HarvestFractionDeadToRemove=1; HarvestFractionLiveToResidue=0; HarvestFractionDeadToResidue=0
        Constant DMConversionEfficiency: FixedValue=0.89
        Constant RemobilisationCost: FixedValue=0
        Constant CarbonConcentration: FixedValue=0.4
        Constant MaximumPotentialGrainSize: FixedValue=0
          Memo
            This parameter is not used.  Grain growth is calculated from harvest index increase.
        Constant NumberFunction: FixedValue=0
          Memo
            Grain number is not estimated by this model.
        NutrientPoolFunctions DMDemandPriorityFactors
          Constant Structural: FixedValue=1
          Constant Metabolic: FixedValue=1
          Constant Storage: FixedValue=1
        NutrientPoolFunctions NDemandPriorityFactors: same as Replacements.Sesame.Grain.DMDemandPriorityFactors
      Root: GrowthRespiration=0; MaintenanceRespiration=0
        PhaseLookup WetRootFractionFactor
          PhaseLookupValue Pre-Emergence: Start=Sowing; End=Emergence
            Constant One: FixedValue=1
          PhaseLookupValue Post-Emergence: Start=Emergence; End=Unused
            LinearInterpolationFunction WetRootFraction
              XYPairs: X=[0, 1]; Y=[1, 0]
              VariableReference XValue: VariableName=[Root].WetRootFraction
        MultiplyFunction RootFrontVelocity
          PhaseLookup PotentialRootFrontVelocity
            PhaseLookupValue PreEmergence: Start=Germination; End=Emergence
              Constant Function: FixedValue=5
            PhaseLookupValue early: Start=Emergence; End=StartGrainFilling
              Constant Function: FixedValue=30
            PhaseLookupValue late: Start=StartGrainFilling; End=Maturity
              Constant Function: FixedValue=5
          VariableReference WetRootFractionFactor: VariableName=[Root].WetRootFractionFactor
          LinearInterpolationFunction RootFrontWetnessFactor
            XYPairs: X=[0, 1, 2]; Y=[1, 1, 0]
            SoilWaterScale XValue
        Constant MaximumRootDepth: FixedValue=1000000
          Memo
            There is no intrinsic limit to maximum rooting depth.  Roots will be limited by the depth of the soil profile, or via values of XF in each layer.
        RootShapeCylinder RootShape
        Constant KLModifier: FixedValue=1; Units=0-1
          Memo
            No modification to water extraction rate is assumed in this model.
        MultiplyFunction NUptakeSWFactor
          LinearInterpolationFunction RWCFactor
            XYPairs: X=[0, 1]; Y=[0, 1]
            VariableReference XValue: VariableName=[Root].RWC
          LinearInterpolationFunction PHFactor
            XYPairs: X=[0, 5, 8, 13]; Y=[0, 1, 1, 0]
            VariableReference XValue: VariableName=[Chemical].PH
          Constant OtherFactors: FixedValue=1
        Constant MaxDailyNUptake: FixedValue=6
        Constant SenescenceRate: FixedValue=0.005; Units=/d
          Memo
            Roots are assumed to simply senesce at a small and constant rate during the entire growth period.
        Constant MaximumNConc: FixedValue=0.01
        Constant MinimumNConc: FixedValue=0.005
        PhaseLookupValue NitrogenDemandSwitch: Start=Emergence; End=EndGrainFilling
          Constant: FixedValue=1
        Constant KNO3: FixedValue=0.02
        Constant KNH4: FixedValue=0
          Memo
            The current model version considers only NO3 uptake but NH4 option can be activated by the user . We do not expect activation of NH4 to change total plant N uptake because the nitrification rate (conversion of NH4 to NO3) is very fast in the model. In the future we will re-valuate this.
        BiomassRemoval BiomassRemovalDefaults: HarvestFractionLiveToRemove=0; HarvestFractionDeadToRemove=0; HarvestFractionLiveToResidue=0.2; HarvestFractionDeadToResidue=0
        Constant SpecificRootLength: FixedValue=40; Units=m/g
        Constant DMConversionEfficiency: FixedValue=1
        Constant MaintenanceRespirationFunction: FixedValue=1
        Constant RemobilisationCost: FixedValue=0
        Constant CarbonConcentration: FixedValue=0.4
        NutrientDemandFunctions DMDemands
          MultiplyFunction Structural
            PartitionFractionDemandFunction DMDemandFunction
              MultiplyFunction PartitionFraction
                PhaseLookup PotentialPartitionFraction
                  PhaseLookupValue Early: Start=Emergence; End=StartFlowering
                    Constant Function: FixedValue=0.25
                  PhaseLookupValue Middle: Start=StartFlowering; End=StartGrainFilling
                    Constant Function: FixedValue=0.25
                  PhaseLookupValue Late: Start=StartGrainFilling; End=Maturity
                    Constant Function: FixedValue=0.05
                VariableReference WetRootFractionFactor: VariableName=[Root].WetRootFractionFactor
            Constant StructuralFraction: FixedValue=1
          Constant Metabolic: FixedValue=0
          StorageDMDemandFunction Storage
            SubtractFunction StorageFraction
              Constant One: FixedValue=1
              VariableReference StructuralFraction: VariableName=[Root].DMDemands.Structural.StructuralFraction
          Constant QStructuralPriority: FixedValue=1
          Constant QMetabolicPriority: FixedValue=1
          Constant QStoragePriority: FixedValue=1
        NutrientDemandFunctions NDemands
          MultiplyFunction Structural
            VariableReference MinNconc: VariableName=[Root].minimumNconc
            VariableReference PotentialDMAllocation: VariableName=[Root].potentialDMAllocation.Structural
          MultiplyFunction Metabolic
            SubtractFunction MetabolicNconc
              VariableReference CritNconc: VariableName=[Root].criticalNConc
              VariableReference MinNconc: VariableName=[Root].minimumNconc
            VariableReference PotentialDMAllocation: VariableName=[Root].potentialDMAllocation.Structural
          StorageNDemandFunction Storage
            VariableReference NitrogenDemandSwitch: VariableName=[Root].nitrogenDemandSwitch
            VariableReference MaxNconc: VariableName=[Root].maximumNconc
          Constant QStructuralPriority: FixedValue=1
          Constant QMetabolicPriority: FixedValue=1
          Constant QStoragePriority: FixedValue=1
        VariableReference CriticalNConc: VariableName=[Root].MinimumNConc
        NutrientPoolFunctions InitialWt
          Constant Structural: FixedValue=0.2; Units=g/plant
          Constant Metabolic: FixedValue=0
          Constant Storage: FixedValue=0
      CompositeBiomass AboveGround: OrganNames=[Leaf, Stem, Grain, Shell]; IncludeLive=true; IncludeDead=true
      CompositeBiomass BelowGround: OrganNames=[Root]; IncludeLive=true; IncludeDead=true
      CompositeBiomass AboveGroundLive: OrganNames=[Leaf, Stem, Grain, Shell]; IncludeLive=true; IncludeDead=false
      CompositeBiomass Total: OrganNames=[Leaf, Stem, Grain, Shell, Root]; IncludeLive=true; IncludeDead=true
      CompositeBiomass TotalLive: OrganNames=[Leaf, Stem, Grain, Shell, Root]; IncludeLive=true; IncludeDead=false
      CompositeBiomass TotalDead: OrganNames=[Leaf, Stem, Grain, Shell, Root]; IncludeLive=false; IncludeDead=true
      CompositeBiomass Pod: OrganNames=[Shell, Grain]; IncludeLive=true; IncludeDead=true
      Constant MortalityRate: FixedValue=0
      Constant SeedMortalityRate: FixedValue=0
