Simulations: Version=205
  Memo Title
    # The APSIM Sesame Model

    The APSIM Sesame model has been developed using the Plant Modelling Framework (PMF) of ([brown_plant_2014]). This new framework provides a library of plant organ and process submodels that can be coupled, at runtime, to construct a model in much the same way that models can be coupled to construct a simulation. This means that dynamic composition of lower level process and organ classes (e.g. photosynthesis, leaf) into larger constructions (e.g. maize, wheat, sorghum) can be achieved by the model developer without additional coding.

    The model consists of:

    * A phenology model to simulate development between growth phases
    * A collection of organs to simulate the various plant parts
    * An arbitrator to allocate resources (N, biomass) to the various plant organs
  Folder Replacements
    Plant Sesame: PlantType=Sesame
      Folder Cultivars
        Folder Australia
          Cultivar ES103
            Command:
              [Phenology].Emerging.Target.ShootLag.FixedValue = 12
              [Phenology].Emerging.Target.DepthxRate.ShootRate.FixedValue = 1
              [Phenology].EarlyVegetative.Target.FixedValue = 300
              [Phenology].LateVegetative.Target.FixedValue = 100
              [Phenology].EarlyFlowering.Target.FixedValue = 75
              [Phenology].EarlyPodDevelopment.Target.FixedValue = 75
              [Phenology].EarlyGrainFilling.Target.FixedValue = 140
              [Phenology].MidGrainFilling.Target.FixedValue = 140
              [Phenology].LateGrainFilling.Target.FixedValue = 140
              [Phenology].Maturing.Target.FixedValue = 70
              [Leaf].Photosynthesis.RUE.FixedValue = 1.5
              [Grain].MaximumHI.FixedValue = 0.31
          Cultivar ES313
            Command:
              [Phenology].Emerging.Target.ShootLag.FixedValue = 12
              [Phenology].Emerging.Target.DepthxRate.ShootRate.FixedValue = 1
              [Phenology].EarlyVegetative.Target.FixedValue = 250
              [Phenology].LateVegetative.Target.FixedValue = 105
              [Phenology].EarlyFlowering.Target.FixedValue = 75
              [Phenology].EarlyPodDevelopment.Target.FixedValue = 75
              [Phenology].EarlyGrainFilling.Target.FixedValue = 140
              [Phenology].MidGrainFilling.Target.FixedValue = 140
              [Phenology].LateGrainFilling.Target.FixedValue = 140
              [Phenology].Maturing.Target.FixedValue = 70
              [Leaf].Photosynthesis.RUE.FixedValue = 1.5
              [Grain].MaximumHI.FixedValue = 0.33
          Cultivar S3301
            Command:
              [Phenology].Emerging.Target.ShootLag.FixedValue = 12
              [Phenology].Emerging.Target.DepthxRate.ShootRate.FixedValue = 1
              [Phenology].EarlyVegetative.Target.FixedValue = 300
              [Phenology].LateVegetative.Target.FixedValue = 100
              [Phenology].EarlyFlowering.Target.FixedValue = 50
              [Phenology].EarlyPodDevelopment.Target.FixedValue = 50
              [Phenology].EarlyGrainFilling.Target.FixedValue = 160
              [Phenology].MidGrainFilling.Target.FixedValue = 160
              [Phenology].LateGrainFilling.Target.FixedValue = 160
              [Phenology].Maturing.Target.FixedValue = 70
              [Leaf].Photosynthesis.RUE.FixedValue = 1.5
              [Grain].MaximumHI.FixedValue = 0.34
          Cultivar S57B
            Command:
              [Phenology].Emerging.Target.ShootLag.FixedValue = 12
              [Phenology].Emerging.Target.DepthxRate.ShootRate.FixedValue = 1
              [Phenology].EarlyVegetative.Target.FixedValue = 320
              [Phenology].LateVegetative.Target.FixedValue = 140
              [Phenology].EarlyFlowering.Target.FixedValue = 75
              [Phenology].EarlyPodDevelopment.Target.FixedValue = 75
              [Phenology].EarlyGrainFilling.Target.FixedValue = 150
              [Phenology].MidGrainFilling.Target.FixedValue = 150
              [Phenology].LateGrainFilling.Target.FixedValue = 150
              [Phenology].Maturing.Target.FixedValue = 70
              [Leaf].Photosynthesis.RUE.FixedValue = 1.5
              [Grain].MaximumHI.FixedValue = 0.31
          Cultivar S57B-103: same as Replacements.Sesame.Cultivars.Australia.ES103
          Cultivar Test1
            Command:
              [Phenology].Emerging.Target.ShootLag.FixedValue = 12
              [Phenology].Emerging.Target.DepthxRate.ShootRate.FixedValue = 1
              [Phenology].EarlyVegetative.Target.FixedValue = 150
              [Phenology].LateVegetative.Target.FixedValue = 200
              [Phenology].EarlyFlowering.Target.FixedValue = 80
              [Phenology].EarlyPodDevelopment.Target.FixedValue = 80
              [Phenology].EarlyGrainFilling.Target.FixedValue = 80
              [Phenology].MidGrainFilling.Target.FixedValue = 170
              [Phenology].LateGrainFilling.Target.FixedValue = 130
              [Phenology].Maturing.Target.FixedValue = 60
              [Stem].MaxBranchNumber.Base.FixedValue = 4
              [Leaf].Photosynthesis.RUE.FixedValue = 1.15
              [Grain].MaximumHI.FixedValue = 0.35
          Cultivar Test2
            Command:
              [Phenology].Emerging.Target.ShootLag.FixedValue = 12
              [Phenology].Emerging.Target.DepthxRate.ShootRate.FixedValue = 1
              [Phenology].EarlyVegetative.Target.FixedValue = 100
              [Phenology].LateVegetative.Target.FixedValue = 150
              [Phenology].EarlyFlowering.Target.FixedValue = 80
              [Phenology].EarlyPodDevelopment.Target.FixedValue = 80
              [Phenology].EarlyGrainFilling.Target.FixedValue = 80
              [Phenology].MidGrainFilling.Target.FixedValue = 150
              [Phenology].LateGrainFilling.Target.FixedValue = 120
              [Phenology].Maturing.Target.FixedValue = 60
              [Stem].MaxBranchNumber.Base.FixedValue = 4
              [Leaf].Photosynthesis.RUE.FixedValue = 1.15
              [Grain].MaximumHI.FixedValue = 0.35
          Cultivar 6821
            Command:
              [Phenology].Emerging.Target.ShootLag.FixedValue = 15
              [Phenology].Emerging.Target.DepthxRate.ShootRate.FixedValue = 2
              [Phenology].EarlyVegetative.Target.FixedValue = 100
              [Phenology].LateVegetative.Target.FixedValue = 150
              [Phenology].EarlyFlowering.Target.FixedValue = 50
              [Phenology].EarlyPodDevelopment.Target.FixedValue = 150
              [Phenology].EarlyGrainFilling.Target.FixedValue = 150
              [Phenology].MidGrainFilling.Target.FixedValue = 200
              [Phenology].LateGrainFilling.Target.FixedValue = 150
              [Phenology].Maturing.Target.FixedValue = 30
          Cultivar 6824: same as Replacements.Sesame.Cultivars.Australia.6821
          Cultivar BlackPatch
          Cultivar MoriaBlack
            Command:
              [Phenology].Emerging.Target.ShootLag.FixedValue = 12
              [Phenology].Emerging.Target.DepthxRate.ShootRate.FixedValue = 1
              [Phenology].EarlyVegetative.Target.FixedValue = 300
              [Phenology].LateVegetative.Target.FixedValue = 250
        Folder Iran
          Cultivar Jahan2015
            Command:
              [Phenology].Emerging.Target.ShootLag.FixedValue = 12
              [Phenology].Emerging.Target.DepthxRate.ShootRate.FixedValue = 1
              [Phenology].EarlyVegetative.Target.FixedValue = 150
              [Phenology].LateVegetative.Target.FixedValue = 200
              [Phenology].EarlyFlowering.Target.FixedValue = 80
              [Phenology].EarlyPodDevelopment.Target.FixedValue = 80
              [Phenology].EarlyGrainFilling.Target.FixedValue = 80
              [Phenology].MidGrainFilling.Target.FixedValue = 170
              [Phenology].LateGrainFilling.Target.FixedValue = 130
              [Phenology].Maturing.Target.FixedValue = 60
              [Phenology].Drydown.Target.FixedValue = 450
              [Stem].MaxBranchNumber.Base.FixedValue = 4
              [Leaf].Photosynthesis.RUE.FixedValue = 1.15
              [Grain].MaximumHI.FixedValue = 0.35
        Folder India
          Cultivar RT125
            Command:
              [Phenology].Emerging.Target.ShootLag.FixedValue = 10
              [Phenology].Emerging.Target.DepthxRate.ShootRate.FixedValue = 1
              [Phenology].EarlyVegetative.Target.FixedValue = 170
              [Phenology].LateVegetative.Target.FixedValue = 130
              [Phenology].EarlyFlowering.Target.FixedValue = 80
              [Phenology].EarlyPodDevelopment.Target.FixedValue = 50
              [Phenology].EarlyGrainFilling.Target.FixedValue = 30
              [Phenology].MidGrainFilling.Target.FixedValue = 80
              [Phenology].LateGrainFilling.Target.FixedValue = 80
              [Phenology].Maturing.Target.FixedValue = 30
              [Leaf].Photosynthesis.RUE.FixedValue = 1.4
              [Grain].MaximumHI.FixedValue = 0.35
      OrganArbitrator Arbitrator
        BiomassTypeArbitrator DMArbitration
          Folder PotentialPartitioningMethods
            ReallocationMethod
            AllocateFixationMethod
            RetranslocationMethod
            SendPotentialDMAllocationsMethod
          Folder AllocationMethods
            NutrientConstrainedAllocationMethod
            DryMatterAllocationsMethod
          RelativeAllocation ArbitrationMethod
        BiomassTypeArbitrator NArbitration
          Folder PotentialPartitioningMethods
            ReallocationMethod
          Folder ActualPartitioningMethods
            AllocateFixationMethod
            RetranslocationMethod
          Folder AllocationMethods
            NitrogenAllocationsMethod
          RelativeAllocation ArbitrationMethod
          AllocateUptakesMethod
        WaterUptakeMethod
        NitrogenUptakeMethod
      Phenology
        SubDailyInterpolation BaseThermalTime: agregationMethod=0
          Memo
            - Baath, G. S., Kakani, V. G., Northup, B. K., Gowda, P. H., Rocateli, A. C., & Singh, H. (2022). Quantifying and Modeling the Influence of Temperature on Growth and Reproductive Development of Sesame. Journal of Plant Growth Regulation, 41(1), 143–152. https://doi.org/10.1007/S00344-020-10278-Y/FIGURES/5.

            - Angus, J. F., Cunningham, R. B., Moncur, M. W., & Mackenzie, D. H. (1980). Phasic development in field crops I. Thermal response in the seedling phase. Field Crops Research, 3(C), 365–378. https://doi.org/10.1016/0378-4290(80)90042-8
          XYPairs Response: X=[15, 29, 45]; Y=[0, 14, 0]
          ThreeHourAirTemperature InterpolationMethod
        PhaseLookup ThermalTime
          PhaseLookupValue PreEmergence: Start=Sowing; End=Emergence
            VariableReference Base: VariableName=[Phenology].BaseThermalTime
          PhaseLookupValue PreFlowering: Start=Emergence; End=StartFlowering
            MultiplyFunction TT
              VariableReference Base: VariableName=[Phenology].BaseThermalTime
              LinearInterpolationFunction PhotoperiodModifier
                Memo
                  The short-day treatment (10h-14h) shortened the duration to the ﬁrst ﬂower and lowered the ﬁrst ﬂowering-node.

                  - Kumazaki, T., Yamada, Y., Karaya, S., Tokumitsu, T., Hirano, T., Yasumoto, S., Katsuta, K., & Michiyama, H. (2008). Effects of Day Length and Air Temperature on Stem Growth and Flowering in Sesame. Plant Production Science, 11(2), 178–183. https://doi.org/10.1626/pps.11.178
                XYPairs: X=[10, 14]; Y=[1, 0.8]
                VariableReference XValue: VariableName=[Phenology].Photoperiod
          PhaseLookupValue PostFlowering: Start=StartFlowering; End=Maturity
            MultiplyFunction TT
              VariableReference Base: VariableName=[Phenology].BaseThermalTime
              LinearInterpolationFunction PhotoperiodModifier
                Memo
                  The short-day treatment (10h-14h) prolonged the ﬂowering period, but decreased the ﬂowering-node number on the main stem resulting from the slower rate of increase in nodes with ﬂowers.

                  - Kumazaki, T., Yamada, Y., Karaya, S., Tokumitsu, T., Hirano, T., Yasumoto, S., Katsuta, K., & Michiyama, H. (2008). Effects of Day Length and Air Temperature on Stem Growth and Flowering in Sesame. Plant Production Science, 11(2), 178–183. https://doi.org/10.1626/pps.11.178
                XYPairs: X=[10, 14]; Y=[0.7, 1]
                VariableReference XValue: VariableName=[Phenology].Photoperiod
          PhaseLookupValue Drydown: Start=Maturity; End=EndDrydown
            VariableReference Base: VariableName=[Phenology].BaseThermalTime
          PhaseLookupValue Harvesting: Start=EndDrydown; End=Harvest
            VariableReference Base: VariableName=[Phenology].BaseThermalTime
        PhotoperiodFunction Photoperiod: Twilight=0; DayLength=0
        GerminatingPhase Germinating: Start=Sowing; End=Germination; IsEmerged=false
          Constant MinSoilTemperature: FixedValue=21
        EmergingPhase Emerging: Start=Germination; End=Emergence; IsEmerged=true; TTForTimeStep=0
          VariableReference ThermalTime: VariableName=[Phenology].VegetativeThermalTime
          AddFunction Target
            Constant ShootLag: FixedValue=10
            MultiplyFunction DepthxRate
              VariableReference SowingDepth: VariableName=[Plant].SowingData.Depth
              Constant ShootRate: FixedValue=1
        GenericPhase EarlyVegetative: Start=Emergence; End=StartBranching; IsEmerged=true
          Constant Target: FixedValue=250
          VariableReference Progression: VariableName=[Phenology].ThermalTime
        GenericPhase LateVegetative: Start=StartBranching; End=StartFlowering; IsEmerged=true
          Constant Target: FixedValue=200
          VariableReference Progression: VariableName=[Phenology].ThermalTime
        GenericPhase EarlyFlowering: Start=StartFlowering; End=StartPodDevelopment; IsEmerged=true
          Constant Target: FixedValue=100
          VariableReference Progression: VariableName=[Phenology].ThermalTime
        GenericPhase EarlyPodDevelopment: Start=StartPodDevelopment; End=StartGrainFilling; IsEmerged=true
          Constant Target: FixedValue=50
          VariableReference Progression: VariableName=[Phenology].ThermalTime
        GenericPhase EarlyGrainFilling: Start=StartGrainFilling; End=EndCanopyDevelopment; IsEmerged=true
          Constant Target: FixedValue=50
          VariableReference Progression: VariableName=[Phenology].ThermalTime
        GenericPhase MidGrainFilling: Start=EndCanopyDevelopment; End=EndPodDevelopment; IsEmerged=true
          Constant Target: FixedValue=120
          VariableReference Progression: VariableName=[Phenology].ThermalTime
        GenericPhase LateGrainFilling: Start=EndPodDevelopment; End=EndGrainFilling; IsEmerged=true
          Constant Target: FixedValue=120
          VariableReference Progression: VariableName=[Phenology].ThermalTime
        GenericPhase Maturing: Start=EndGrainFilling; End=Maturity; IsEmerged=true
          Constant Target: FixedValue=50
          VariableReference Progression: VariableName=[Phenology].ThermalTime
        GenericPhase Drydown: Start=Maturity; End=EndDrydown; IsEmerged=true
          Constant Target: FixedValue=200
          MultiplyFunction Progression
            VariableReference ThermalTime: VariableName=[Phenology].ThermalTime
            LinearInterpolationFunction FrostImpact
              Memo
                Sesame will dry down 120-150 days without a frost. It will dry down sooner with a frost or freeze. Although sesame is indeterminate, it will terminate and self-defoliate without a frost. A frost will cause the plants to drydown more rapidly than normal. Just like cotton and sorghum, a frost will terminate the crop and prepare the crop for harvest earlier than when compared to temperatures remaining just above freezing. Rule of thumb is that you need 130 days from the time that the soil temperature is 70ºF (21ºC) and the first frost date. From planting, sesame needs about 110 days of night temperatures above 40ºF (4.5ºC). Sesame needs to reach physiological maturity prior to frost to make optimum yield.

                - SESAME GROWER GUIDE. D. Ray Langham, Jerry Riney, Glenn Smith, and Terry Wiemers. March 2008. www.sesaco.net.
              XYPairs: X=[-4, 0, 4.5, 10]; Y=[1.5, 1.2, 1, 1]
              VariableReference XValue: VariableName=[Weather].MinT
        GenericPhase Harvesting: Start=EndDrydown; End=Harvest; IsEmerged=true
          Constant Target: FixedValue=50
          VariableReference Progression: VariableName=[Phenology].BaseThermalTime
        EndPhase: Start=Harvest; End=Unused; IsEmerged=true
          VariableReference ThermalTime: VariableName=[Phenology].ThermalTime
        OnEventFunction EmergenceDAS: SetEvent=Emergence; ReSetEvent=never
          Memo
            A function is used to provide emergence date as days after sowing(DAS).
          Constant PreEventValue: FixedValue=0
          VariableReference PostEventValue: VariableName=[Plant].DaysAfterSowing
        OnEventFunction StartBranchingDAS: SetEvent=StartBranching; ReSetEvent=never
          Constant PreEventValue: FixedValue=0
          VariableReference PostEventValue: VariableName=[Plant].DaysAfterSowing
        OnEventFunction StartFloweringDAS: SetEvent=StartFlowering; ReSetEvent=never
          Constant PreEventValue: FixedValue=0
          VariableReference PostEventValue: VariableName=[Plant].DaysAfterSowing
        OnEventFunction StartPodDevelopmentDAS: SetEvent=StartPodDevelopment; ReSetEvent=never
          Constant PreEventValue: FixedValue=0
          VariableReference PostEventValue: VariableName=[Plant].DaysAfterSowing
        OnEventFunction StartGrainFillingDAS: SetEvent=StartGrainFilling; ReSetEvent=never
          Constant PreEventValue: FixedValue=0
          VariableReference PostEventValue: VariableName=[Plant].DaysAfterSowing
        OnEventFunction EndCanopyDevelopmentDAS: SetEvent=EndCanopyDevelopment; ReSetEvent=never
          Constant PreEventValue: FixedValue=0
          VariableReference PostEventValue: VariableName=[Plant].DaysAfterSowing
        OnEventFunction EndPodDevelopmentDAS: SetEvent=EndPodDevelopment; ReSetEvent=never
          Constant PreEventValue: FixedValue=0
          VariableReference PostEventValue: VariableName=[Plant].DaysAfterSowing
        OnEventFunction EndGrainFillingDAS: SetEvent=EndGrainFilling; ReSetEvent=never
          Constant PreEventValue: FixedValue=0
          VariableReference PostEventValue: VariableName=[Plant].DaysAfterSowing
        OnEventFunction MaturityDAS: SetEvent=Maturity; ReSetEvent=never
          Constant PreEventValue: FixedValue=0; Units=DAS
          VariableReference PostEventValue: VariableName=[Plant].DaysAfterSowing
        OnEventFunction EndDrydownDAS: SetEvent=EndDrydown; ReSetEvent=never
          Constant PreEventValue: FixedValue=0
          VariableReference PostEventValue: VariableName=[Plant].DaysAfterSowing
        AddFunction FillingDuration
          VariableReference EarlyGrainFillingDuration: VariableName=[Phenology].EarlyGrainFilling.Target
          VariableReference MidGrainFillingDuration: VariableName=[Phenology].MidGrainFilling.Target
          VariableReference LateGrainFillingDuration: VariableName=[Phenology].LateGrainFilling.Target
        AddFunction DrydownDuration
          VariableReference Drydown: VariableName=[Phenology].Drydown.Target
      SimpleLeaf Leaf: Albedo=0.25; Gsmax350=0.015; R50=150; LeafInitialisationStage=Emergence; Height=0; BaseHeight=0; Width=0; FRGR=0; PotentialEP=0; WaterDemand=0; KDead=0.2; LAIDead=0
        Constant InitialWt: FixedValue=0.25
        MultiplyFunction Phyllochron
          Memo Rational (disabled)
            Taken from wheat model.
          Constant BasePhyllochron: FixedValue=50; Units=oC.d
          LinearInterpolationFunction LeafStageFactor
            XYPairs: X=[0, 3, 4, 6, 7, 12]; Y=[0.7, 0.7, 1, 1, 1.4, 1.4]
            VariableReference XValue: VariableName=[Stem].NodeNumber
        RUEModel Photosynthesis
          Constant RUE: FixedValue=1.4
            Memo
              In contrast to Classic, the RUE value in NG refers to the whole plant (above and below ground).

              Koocheki et al. (2016) estimated the aboveground RUE of Sesame to be 1.14 g/MJ. This value was adjusted to include root dry mass. Hamedani et al. (2020) estimate the root-to-shoot ratio of six sesame genotypes to be 0.17 - 0.36, averaged over two seasons and under rainfed and irrigated regimes. Therefore, the RUE of 1.14 g/MJ was multiplied by 1.2 (assuming a root-to-shoot ratio of 0.25), resulting in ~1.4 g/MJ.

              - Koocheki, A., Nassiri Mahallati, M., Solouki, H., & Karbor, S. (2016). Evaluation of Radiation Absorption and use Efficiency in Substitution Intercropping of Sesame (Sesamum Indicum L.) and Mung Bean (Vigna Radiata L.). Advances in Plants & Agriculture Research, 3(5). https://doi.org/10.15406/apar.2016.03.00109.

              - Hamedani, N. G., Gholamhoseini, M., Bazrafshan, F., Amiri, B., & Habibzadeh, F. (2020). Variability of root traits in sesame genotypes under different irrigation regimes. Rhizosphere, 13, 100190. https://doi.org/10.1016/j.rhisph.2020.100190.
          MultiplyFunction FW
            LinearInterpolationFunction LeafFW
              XYPairs: X=[0, 0.1, 0.9, 1]; Y=[0, 0, 1, 1]
              VariableReference XValue: VariableName=[Leaf].Fw
            VariableReference WetRootFractionFactor: VariableName=[Root].WetRootFractionFactor
          MultiplyFunction FT
            WeightedTemperatureFunction MeanT: MaximumTemperatureWeighting=0.5
              Memo
                The cardinal temperature limits of 15.7 °C (Tmin), 27.3 °C (Topt), and 44.6 °C (Tmax) were observed for rate of biomass accumulation.

                - Baath, G. S., Kakani, V. G., Northup, B. K., Gowda, P. H., Rocateli, A. C., & Singh, H. (2022). Quantifying and Modeling the Influence of Temperature on Growth and Reproductive Development of Sesame. Journal of Plant Growth Regulation, 41(1), 143–152. https://doi.org/10.1007/s00344-020-10278-y.
              XYPairs: X=[15.7, 27.3, 44.6]; Y=[0, 1, 0]
            LinearInterpolationFunction MinT
              Memo: same as Replacements.Sesame.Phenology.Drydown.Progression.FrostImpact.Memo
              XYPairs: X=[-4, 0, 4.5, 10]; Y=[0, 0, 1, 1]
              VariableReference XValue: VariableName=[Weather].MinT
          PhaseLookup FN
            PhaseLookupValue Pre-Emergence: Start=Sowing; End=Emergence
              Constant One: FixedValue=1
            PhaseLookupValue Post-Emergence: Start=Emergence; End=EndDrydown
              LinearInterpolationFunction FN
                XYPairs: X=[0, 1, 1.5]; Y=[0, 1, 1]
                VariableReference XValue: VariableName=[Leaf].Fn
          LinearInterpolationFunction FVPD
            XYPairs: X=[0, 10, 50]; Y=[1, 1, 1]
            VariableReference XValue: VariableName=[Leaf].Photosynthesis.VPD
          RUECO2Function FCO2: PhotosyntheticPathway=C3
          VariableReference RadnInt: VariableName=[Leaf].RadiationIntercepted
        StomatalConductanceCO2Modifier
          VariableReference PhotosynthesisCO2Modifier: VariableName=[Leaf].Photosynthesis.FCO2
        MultiplyFunction AreaLargestLeafPair
          Memo
            In this model, **AreaLargestLeaf** referes to the total area of the largest leaf pair.
          Constant MaximumSize: FixedValue=0.04; Units=cm^2
        LinearInterpolationFunction SpecificArea
          XYPairs: X=[0, 8]; Y=[0.05, 0.05]
          VariableReference XValue: VariableName=[Leaf].LAI
        MultiplyFunction Area
          Memo
            Leaf area index (LAI).
          VariableReference LeafLiveWt: VariableName=[Leaf].Live.Wt
          VariableReference SLA: VariableName=[Leaf].SpecificArea
        DivideFunction LAR
          Memo
            Leaf appearance rate.
          VariableReference ThermalTime: VariableName=[Phenology].ThermalTime
          VariableReference Phyllochron: VariableName=[Leaf].Phyllochron
        MinimumFunction FRGR
          VariableReference RUE_FT: VariableName=[Leaf].Photosynthesis.FT
          VariableReference RUE_FN: VariableName=[Leaf].Photosynthesis.FN
          VariableReference RUE_FVPD: VariableName=[Leaf].Photosynthesis.FVPD
        MultiplyFunction FRGR_OLD
          VariableReference RUE_FT: VariableName=[Leaf].Photosynthesis.FT
          VariableReference RUE_FN: VariableName=[Leaf].Photosynthesis.FN
          VariableReference RUE_FVPD: VariableName=[Leaf].Photosynthesis.FVPD
        LinearInterpolationFunction ExtinctionCoefficient
          Memo
            Koocheki et al. (2016) estimated the light extinction coefficient of sesame to be 0.681, averaged across six genotypes. The plant densities were 40 plants/m2 and inter-row spacing was 0.5m.

            - Koocheki, A., Nassiri Mahallati, M., Solouki, H., & Karbor, S. (2016). Evaluation of Radiation Absorption and use Efficiency in Substitution Intercropping of Sesame (Sesamum Indicum L.) and Mung Bean (Vigna Radiata L.). Advances in Plants & Agriculture Research, 3(5). https://doi.org/10.15406/apar.2016.03.00109.
          XYPairs: X=[200, 1000]; Y=[0.75, 0.6]
          VariableReference XValue: VariableName=[Sesame].SowingData.RowSpacing
        LinearInterpolationFunction HeightFunction
          XYPairs: X=[1, 2, 3, 4, 6, 7]; Y=[0, 0, 50, 700, 1200, 1300]
          VariableReference XValue: VariableName=[Phenology].Stage
        Constant NReallocationFactor: FixedValue=1
          Memo
            This model assumes that all metabolic and storage N is available for reallocation from senescing leaves.
        Constant NRetranslocationFactor: FixedValue=0.5
        Constant DetachmentRate: FixedValue=0.05; Units=/d
        LinearInterpolationFunction CriticalNConc
          XYPairs: X=[3, 4, 9]; Y=[0.06, 0.05, 0.03]
          VariableReference XValue: VariableName=[Phenology].Stage
        Constant MinimumNConc: FixedValue=0.02
        Constant MaximumNConc: FixedValue=0.02
        Constant MaintenanceRespiration: FixedValue=0; Units=0-1
        Constant DMConversionEfficiency: FixedValue=1; Units=0-1
        BiomassRemoval BiomassRemovalDefaults: HarvestFractionLiveToRemove=0; HarvestFractionDeadToRemove=0; HarvestFractionLiveToResidue=1; HarvestFractionDeadToResidue=1
        Constant DMReallocationFactor: FixedValue=0
        Constant DMRetranslocationFactor: FixedValue=0
        Constant RemobilisationCost: FixedValue=0
        Constant CarbonConcentration: FixedValue=0.4
        PhaseLookup SenescenceRate
          PhaseLookupValue Vegetative: Start=Emergence; End=EndCanopyDevelopment
            Constant Rate: FixedValue=0
          PhaseLookupValue Reproductive: Start=StartPodDevelopment; End=EndDrydown
            Memo
              Leaf senescence rate is calculated to ensure that all leaves are senesced by the end of dry-down phase.

              There is no data on detachment rates and so a simple value was chosen to ensure that leaves were not retained in the canopy. In the future, with more data available a thermal time basis leaf detachment rate will be explored.
            MinimumFunction
              Constant One: FixedValue=1
              DivideFunction Rate
                VariableReference TT: VariableName=[Phenology].ThermalTime
                SubtractFunction TTRemaining
                  ExpressionFunction TTRequired
                    Expression=[Phenology].EarlyPodDevelopment.Target + [Phenology].EarlyGrainFilling.Target + [Phenology].MidGrainFilling.Target + [Phenology].LateGrainFilling.Target + [Phenology].Maturing.Target + [Phenology].Drydown.Target
                  ExpressionFunction TTComplete
                    Expression=[Phenology].EarlyPodDevelopment.ProgressThroughPhase + [Phenology].EarlyGrainFilling.ProgressThroughPhase + [Phenology].MidGrainFilling.ProgressThroughPhase + [Phenology].LateGrainFilling.ProgressThroughPhase + [Phenology].Maturing.ProgressThroughPhase + [Phenology].Drydown.ProgressThroughPhase
        NutrientDemandFunctions DMDemands
          DivideFunction Structural
            Memo
              Growth in leaf area is used to calculate the leaf dry matter demand. Further model development can be taken once new experimental data for metabolic, structural and storage forms are provided.
            PhaseLookup DeltaLAIPotential
              PhaseLookupValue Vegetative: Start=Emergence; End=EndCanopyDevelopment
                LAIncrementWithBranchingandTracking
                  VariableReference PlantNumber: VariableName=[Plant].SowingData.Population
                  VariableReference NodeNumber: VariableName=[Stem].NodeNumber
                  VariableReference BranchNumber: VariableName=[Stem].BranchNumber
                  VariableReference AreaLargestLeaf: VariableName=[Leaf].AreaLargestLeafPair
                  VariableReference LAR: VariableName=[Leaf].LAR
                  XYPairs RelativeArea: X=[0, 5, 6, 7, 15]; Y=[0, 0.3, 1, 0.3, 0.01]
              PhaseLookupValue Reproductive: Start=EndCanopyDevelopment; End=EndDrydown
                Constant Zero: FixedValue=0
            VariableReference SLA: VariableName=[Leaf].SpecificArea
          Constant Storage: FixedValue=0
          Constant Metabolic: FixedValue=0
          Constant QStructuralPriority: FixedValue=1
          Constant QMetabolicPriority: FixedValue=1
          Constant QStoragePriority: FixedValue=1
        NutrientDemandFunctions NDemands
          MultiplyFunction Structural
            VariableReference MinNconc: VariableName=[Leaf].minimumNconc
            VariableReference PotentialDMAllocation: VariableName=[Leaf].potentialDMAllocation.Structural
          MultiplyFunction Metabolic
            SubtractFunction MetabolicNconc
              VariableReference CritNconc: VariableName=[Leaf].criticalNConc
              VariableReference MinNconc: VariableName=[Leaf].minimumNconc
            VariableReference PotentialDMAllocation: VariableName=[Leaf].potentialDMAllocation.Structural
          StorageNDemandFunction Storage
            Constant NitrogenDemandSwitch: FixedValue=1
            VariableReference MaxNconc: VariableName=[Leaf].maximumNconc
          Constant QStructuralPriority: FixedValue=1
          Constant QMetabolicPriority: FixedValue=1
          Constant QStoragePriority: FixedValue=1
        LinearInterpolationFunction FrostFraction
          XYPairs: X=[-4, 4]; Y=[1, 0]
          VariableReference XValue: VariableName=[Weather].MinT
        MultiplyFunction LAIDead
          VariableReference LeafDeadWt: VariableName=[Leaf].Dead.Wt
          VariableReference SLA: VariableName=[Leaf].SpecificArea
      GenericOrgan Stem: IsAboveGround=true
        MultiplyFunction PlantPerLinearMeter
          VariableReference Population: VariableName=[Plant].SowingData.Population
          VariableReference RowSpacing: VariableName=[Plant].SowingData.RowSpacing
          Constant mm2m: FixedValue=0.001
        MultiplyFunction MaxBranchNumber
          Constant Base: FixedValue=10
          LinearInterpolationFunction PopulationEffect
            Memo
              - SMARTER SESAME AGRONOMY GUIDE. Equicon. 2021.
            XYPairs: X=[6, 25]; Y=[1, 0.125]
            VariableReference XValue: VariableName=[Stem].PlantPerLinearMeter
        DivideFunction BAR
          Memo
            Branch appearance rate.
          MultiplyFunction ReducedThermalTime
            VariableReference ThermalTime: VariableName=[Phenology].ThermalTime
            VariableReference FW: VariableName=[Leaf].Photosynthesis.FW
            VariableReference FN: VariableName=[Leaf].Photosynthesis.FN
          LinearInterpolationFunction Target
            XYPairs: X=[0, 4]; Y=[0, 60]
            VariableReference XValue: VariableName=[Stem].NodeNumber
        MinimumFunction BranchNumber
          VariableReference MaxBranchNumber: VariableName=[Stem].MaxBranchNumber
          AccumulateFunction BranchNumberFunction: StartStageName=StartBranching; EndStageName=StartGrainFilling; ResetStageName=Sowing; FractionRemovedOnCut=1; FractionRemovedOnHarvest=1; FractionRemovedOnGraze=1; FractionRemovedOnPrune=0
            VariableReference BAR: VariableName=[Stem].BAR
        AddFunction NodeNumber
          Memo
            In this model, **NodeNumber** referes to the number of node pairs. Two leaves grow from each node pairs.
          AccumulateFunction Change: StartStageName=Emergence; EndStageName=EndCanopyDevelopment; FractionRemovedOnCut=1; FractionRemovedOnHarvest=1; FractionRemovedOnGraze=1; FractionRemovedOnPrune=0
            VariableReference LAR: VariableName=[Leaf].LAR
        Constant NReallocationFactor: FixedValue=1
        Constant NRetranslocationFactor: FixedValue=0.5
        PhaseLookup DMRetranslocationFactor
          PhaseLookupValue GrainFilling: Start=EndCanopyDevelopment; End=EndGrainFilling
            Constant RetranslocationFactor: FixedValue=0.2
        LinearInterpolationFunction MaximumNConc
          XYPairs: X=[3, 4, 5]; Y=[0.025, 0.02, 0.015]
          VariableReference XValue: VariableName=[Phenology].Stage
        Constant MinimumNConc: FixedValue=0.006
        PhaseLookupValue NitrogenDemandSwitch: Start=Emergence; End=StartGrainFilling
          Memo
            There is no evidence of stem N storage during grain filling. Also, there is no stem structural growth during this time.
          Constant: FixedValue=1
        BiomassRemoval BiomassRemovalDefaults: HarvestFractionLiveToRemove=0; HarvestFractionDeadToRemove=0; HarvestFractionLiveToResidue=1; HarvestFractionDeadToResidue=1
        PhaseLookup SenescenceRate
          PhaseLookupValue PostCanopyPhase: Start=StartGrainFilling; End=EndDrydown
            MinimumFunction Rate
              DivideFunction Fraction
                VariableReference TT: VariableName=[Phenology].ThermalTime
                SubtractFunction TTRemaining
                  ExpressionFunction PostCanopyTT
                    Expression=[Phenology].EarlyGrainFilling.Target+[Phenology].MidGrainFilling.Target+[Phenology].LateGrainFilling.Target+[Phenology].Drydown.Target
                  ExpressionFunction PostCanopyTTComplete
                    Expression=[Phenology].EarlyGrainFilling.ProgressThroughPhase+[Phenology].MidGrainFilling.ProgressThroughPhase+[Phenology].LateGrainFilling.ProgressThroughPhase+[Phenology].Drydown.ProgressThroughPhase
              Constant One: FixedValue=1
        Constant DetachmentRateFunction: FixedValue=0; Units=/d
        Constant MaintenanceRespirationFunction: FixedValue=0; Units=0-1
        Constant DMConversionEfficiency: FixedValue=1; Units=0-1
        Constant DMReallocationFactor: FixedValue=0
        VariableReference CriticalNConc: VariableName=[Stem].MinimumNConc
        Constant RemobilisationCost: FixedValue=0
        Constant CarbonConcentration: FixedValue=0.4
        NutrientDemandFunctions DMDemands
          MultiplyFunction Structural
            PhaseLookup Fraction
              PhaseLookupValue StemGrowthPhase: Start=Emergence; End=EndCanopyDevelopment
                Constant Fraction: FixedValue=0.4
              PhaseLookupValue PodAndGrainGrowth: Start=EndCanopyDevelopment; End=EndDrydown
                Constant Fraction: FixedValue=0
            PartitionFractionDemandFunction PotentialGrowth
              PhaseLookup PartitionFraction
                PhaseLookupValue StemGrowthPhase: Start=Emergence; End=EndCanopyDevelopment
                  Constant StemFraction: FixedValue=0.4
                PhaseLookupValue GrainFilling: Start=EndCanopyDevelopment; End=EndDrydown
                  Constant StemFraction: FixedValue=0
          Constant Metabolic: FixedValue=0
          MultiplyFunction Storage
            VariableReference DMDemand: VariableName=[Stem].DMDemands.Structural.PotentialGrowth
            SubtractFunction StorageFraction
              Constant One: FixedValue=1
              VariableReference StructuralFraction: VariableName=[Stem].DMDemands.Structural.Fraction
          Constant QStructuralPriority: FixedValue=1
          Constant QMetabolicPriority: FixedValue=1
          Constant QStoragePriority: FixedValue=1
        NutrientDemandFunctions NDemands
          MultiplyFunction Structural
            VariableReference MinNconc: VariableName=[Stem].minimumNconc
            VariableReference PotentialDMAllocation: VariableName=[Stem].potentialDMAllocation.Structural
          MultiplyFunction Metabolic
            SubtractFunction MetabolicNconc
              VariableReference CritNconc: VariableName=[Stem].criticalNConc
              VariableReference MinNconc: VariableName=[Stem].minimumNconc
            VariableReference PotentialDMAllocation: VariableName=[Stem].potentialDMAllocation.Structural
          StorageNDemandFunction Storage
            VariableReference NitrogenDemandSwitch: VariableName=[Stem].nitrogenDemandSwitch
            VariableReference MaxNconc: VariableName=[Stem].maximumNconc
          Constant QStructuralPriority: FixedValue=1
          Constant QMetabolicPriority: FixedValue=1
          Constant QStoragePriority: FixedValue=1
        RetranslocateNonStructural RetranslocateNitrogen
        NutrientPoolFunctions InitialWt
          Constant Structural: FixedValue=0; Units=g/m^2
          Constant Metabolic: FixedValue=0
          Constant Storage: FixedValue=0
        Constant Photosynthesis: FixedValue=0
        VariableReference initialNConcFunction: VariableName=[Stem].MinimumNConc
      GenericOrgan Shell: IsAboveGround=true
        Constant PotentialHarvestIndex: FixedValue=0.27
        Constant NReallocationFactor: FixedValue=1
        Constant NRetranslocationFactor: FixedValue=0.5
        Constant MaximumNConc: FixedValue=0.045
        VariableReference CriticalNConc: VariableName=[Shell].MinimumNConc
        Constant MinimumNConc: FixedValue=0.01
        Constant DMRetranslocationFactor: FixedValue=0.1
        PhaseLookupValue NitrogenDemandSwitch: Start=StartPodDevelopment; End=EndPodDevelopment
          Constant: FixedValue=1
        BiomassRemoval BiomassRemovalDefaults: HarvestFractionLiveToRemove=0; HarvestFractionDeadToRemove=0; HarvestFractionLiveToResidue=1; HarvestFractionDeadToResidue=1
        PhaseLookup SenescenceRate
          PhaseLookupValue ReproductivePhase: Start=StartGrainFilling; End=EndDrydown
            MinimumFunction Rate
              DivideFunction Fraction
                VariableReference TT: VariableName=[Phenology].ThermalTime
                SubtractFunction TTRemaining
                  ExpressionFunction TTRequired
                    Expression=[Phenology].EarlyGrainFilling.Target + [Phenology].MidGrainFilling.Target + [Phenology].LateGrainFilling.Target + [Phenology].Drydown.Target
                  ExpressionFunction TTProgress
                    Expression=[Phenology].EarlyGrainFilling.ProgressThroughPhase + [Phenology].MidGrainFilling.ProgressThroughPhase + [Phenology].LateGrainFilling.ProgressThroughPhase + [Phenology].Drydown.ProgressThroughPhase
              Constant One: FixedValue=1
        Constant DetachmentRateFunction: FixedValue=0; Units=/d
        Constant MaintenanceRespirationFunction: FixedValue=0; Units=0-1
        Constant DMConversionEfficiency: FixedValue=1; Units=0-1
        Constant DMReallocationFactor: FixedValue=0
        Constant RemobilisationCost: FixedValue=0
        Constant CarbonConcentration: FixedValue=0.4
        AddFunction FillingDuration
          VariableReference EarlyPodDevelopmentDuration: VariableName=[Phenology].EarlyPodDevelopment.Target
          VariableReference EarlyGrainFillingDuration: VariableName=[Phenology].EarlyGrainFilling.Target
          VariableReference MidGrainFillingDuration: VariableName=[Phenology].MidGrainFilling.Target
        NutrientDemandFunctions DMDemands
          MultiplyFunction Structural
            PhaseLookup DMDemandFunction
              PhaseLookupValue PodDevelopment: Start=StartPodDevelopment; End=EndPodDevelopment
                MultiplyFunction HIPodDemand
                  VariableReference AboveGroundWt: VariableName=[AboveGround].Wt
                  DivideFunction HarvestIndexIncrease
                    VariableReference PotentialHarvestIndex: VariableName=[Shell].PotentialHarvestIndex
                    VariableReference FillingDuration: VariableName=[Shell].FillingDuration
                  VariableReference ThermalTime: VariableName=[Phenology].ThermalTime
            Constant StructuralFraction: FixedValue=1
            Memo
              Shell harvest index is used to calculate shell biomass demand, which follows the same approach than grain harvest index. It represents the fraction of shell biomass in relation to total aboveground biomass.
          Constant Metabolic: FixedValue=0
          StorageDMDemandFunction Storage
            SubtractFunction StorageFraction
              Constant One: FixedValue=1
              VariableReference StructuralFraction: VariableName=[Shell].DMDemands.Structural.StructuralFraction
          Constant QStructuralPriority: FixedValue=1
          Constant QMetabolicPriority: FixedValue=1
          Constant QStoragePriority: FixedValue=1
        NutrientDemandFunctions NDemands
          MultiplyFunction Structural
            VariableReference MinNconc: VariableName=[Shell].minimumNconc
            VariableReference PotentialDMAllocation: VariableName=[Shell].potentialDMAllocation.Structural
          StorageNDemandFunction Storage
            VariableReference NitrogenDemandSwitch: VariableName=[Shell].nitrogenDemandSwitch
            VariableReference MaxNconc: VariableName=[Shell].maximumNconc
          Constant Metabolic: FixedValue=0
          Constant QStructuralPriority: FixedValue=1
          Constant QMetabolicPriority: FixedValue=1
          Constant QStoragePriority: FixedValue=1
        RetranslocateNonStructural RetranslocateNitrogen
        NutrientPoolFunctions InitialWt: same as Replacements.Sesame.Stem.InitialWt
        Constant Photosynthesis: FixedValue=0
        VariableReference initialNConcFunction: VariableName=[Shell].MinimumNConc
      ReproductiveOrgan Grain: GrowthRespiration=0; MaintenanceRespiration=0
        Biomass Live
        Biomass Dead
        Constant MaximumHI: FixedValue=0.23; Units=0-1
          Memo
            HI = grain DW / total aboveground DW.

            - Nassiri-Mahallati, M., & Jahan, M. (2020). Using the AquaCrop model to simulate sesame performance in response to superabsorbent polymer and humic acid application under limited irrigation conditions. International Journal of Biometeorology, 64(12), 2105–2117. https://doi.org/10.1007/S00484-020-02001-Z/FIGURES/4.
        PhaseLookup PotentialHarvestIndex
          PhaseLookupValue GrainFilling: Start=StartGrainFilling; End=Maturity
            VariableReference MaximumHI: VariableName=[Grain].MaximumHI
        DivideFunction HarvestIndex
          VariableReference GrainWt: VariableName=[Grain].Wt
          VariableReference AboveGroundWt: VariableName=[AboveGround].Wt
        PhaseLookup DMDemandFunction
          PhaseLookupValue GrainFilling: Start=StartGrainFilling; End=EndGrainFilling
            MultiplyFunction HIGrainDemand
              VariableReference AboveGroundWt: VariableName=[AboveGround].Wt
              DivideFunction HarvestIndexIncrease
                VariableReference PotentialHarvestIndex: VariableName=[Grain].PotentialHarvestIndex
                VariableReference FillingDuration: VariableName=[Phenology].FillingDuration
              VariableReference ThermalTime: VariableName=[Phenology].ThermalTime
        Constant MinimumNConc: FixedValue=0.03
        Constant MaximumNConc: FixedValue=0.05
        Constant WaterContent: FixedValue=0.06
        MultiplyFunction NFillingRate
          VariableReference NConc: VariableName=[Grain].MaximumNConc
          VariableReference DMDemand: VariableName=[Grain].DMDemandFunction
          VariableReference DMConversionEfficiency: VariableName=[Grain].DMConversionEfficiency
        BiomassRemoval BiomassRemovalDefaults: HarvestFractionLiveToRemove=1; HarvestFractionDeadToRemove=1; HarvestFractionLiveToResidue=0; HarvestFractionDeadToResidue=0
        Constant DMConversionEfficiency: FixedValue=0.89
        Constant RemobilisationCost: FixedValue=0
        Constant CarbonConcentration: FixedValue=0.4
        Constant MaximumPotentialGrainSize: FixedValue=0
          Memo
            This parameter is not used.  Grain growth is calculated from harvest index increase.
        Constant NumberFunction: FixedValue=0
          Memo
            Grain number is not estimated by this model.
        NutrientPoolFunctions DMDemandPriorityFactors
          Constant Structural: FixedValue=1
          Constant Metabolic: FixedValue=1
          Constant Storage: FixedValue=1
        NutrientPoolFunctions NDemandPriorityFactors: same as Replacements.Sesame.Grain.DMDemandPriorityFactors
      Root: GrowthRespiration=0; MaintenanceRespiration=0
        PhaseLookup WetRootFractionFactor
          PhaseLookupValue Pre-Emergence: Start=Sowing; End=Emergence
            Constant One: FixedValue=1
          PhaseLookupValue Post-Emergence: Start=Emergence; End=Unused
            LinearInterpolationFunction WetRootFraction
              XYPairs: X=[0, 1]; Y=[1, 0]
              VariableReference XValue: VariableName=[Root].WetRootFraction
        MultiplyFunction RootFrontVelocity
          PhaseLookup PotentialRootFrontVelocity
            PhaseLookupValue PreEmergence: Start=Germination; End=Emergence
              Constant Function: FixedValue=5
            PhaseLookupValue early: Start=Emergence; End=StartGrainFilling
              Constant Function: FixedValue=30
            PhaseLookupValue late: Start=StartGrainFilling; End=Maturity
              Constant Function: FixedValue=5
          VariableReference WetRootFractionFactor: VariableName=[Root].WetRootFractionFactor
          LinearInterpolationFunction RootFrontWetnessFactor
            XYPairs: X=[0, 1, 2]; Y=[1, 1, 0]
            SoilWaterScale XValue: LLModel=1
        Constant MaximumRootDepth: FixedValue=1000000
          Memo
            There is no intrinsic limit to maximum rooting depth.  Roots will be limited by the depth of the soil profile, or via values of XF in each layer.
        RootShapeCylinder RootShape
        Constant KLModifier: FixedValue=1; Units=0-1
          Memo
            No modification to water extraction rate is assumed in this model.
        MultiplyFunction NUptakeSWFactor
          LinearInterpolationFunction RWCFactor
            XYPairs: X=[0, 1]; Y=[0, 1]
            VariableReference XValue: VariableName=[Root].RWC
          LinearInterpolationFunction PHFactor
            XYPairs: X=[0, 5, 8, 13]; Y=[0, 1, 1, 0]
            VariableReference XValue: VariableName=[Chemical].PH
          Constant OtherFactors: FixedValue=1
        Constant MaxDailyNUptake: FixedValue=6
        Constant SenescenceRate: FixedValue=0.005; Units=/d
          Memo
            Roots are assumed to simply senesce at a small and constant rate during the entire growth period.
        Constant MaximumNConc: FixedValue=0.01
        Constant MinimumNConc: FixedValue=0.005
        PhaseLookupValue NitrogenDemandSwitch: Start=Emergence; End=EndGrainFilling
          Constant: FixedValue=1
        Constant KNO3: FixedValue=0.02
        Constant KNH4: FixedValue=0
          Memo
            The current model version considers only NO3 uptake but NH4 option can be activated by the user . We do not expect activation of NH4 to change total plant N uptake because the nitrification rate (conversion of NH4 to NO3) is very fast in the model. In the future we will re-valuate this.
        BiomassRemoval BiomassRemovalDefaults: HarvestFractionLiveToRemove=0; HarvestFractionDeadToRemove=0; HarvestFractionLiveToResidue=0.2; HarvestFractionDeadToResidue=0
        Constant SpecificRootLength: FixedValue=40; Units=m/g
        Constant DMConversionEfficiency: FixedValue=1
        Constant MaintenanceRespirationFunction: FixedValue=1
        Constant RemobilisationCost: FixedValue=0
        Constant CarbonConcentration: FixedValue=0.4
        NutrientDemandFunctions DMDemands
          MultiplyFunction Structural
            PartitionFractionDemandFunction DMDemandFunction
              MultiplyFunction PartitionFraction
                PhaseLookup PotentialPartitionFraction
                  PhaseLookupValue Early: Start=Emergence; End=StartFlowering
                    Constant Function: FixedValue=0.3
                  PhaseLookupValue Middle: Start=StartFlowering; End=StartGrainFilling
                    Constant Function: FixedValue=0.3
                  PhaseLookupValue Late: Start=StartGrainFilling; End=Maturity
                    Constant Function: FixedValue=0.05
                VariableReference WetRootFractionFactor: VariableName=[Root].WetRootFractionFactor
            Constant StructuralFraction: FixedValue=1
          Constant Metabolic: FixedValue=0
          StorageDMDemandFunction Storage
            SubtractFunction StorageFraction
              Constant One: FixedValue=1
              VariableReference StructuralFraction: VariableName=[Root].DMDemands.Structural.StructuralFraction
          Constant QStructuralPriority: FixedValue=1
          Constant QMetabolicPriority: FixedValue=1
          Constant QStoragePriority: FixedValue=1
        NutrientDemandFunctions NDemands
          MultiplyFunction Structural
            VariableReference MinNconc: VariableName=[Root].minimumNconc
            VariableReference PotentialDMAllocation: VariableName=[Root].potentialDMAllocation.Structural
          MultiplyFunction Metabolic
            SubtractFunction MetabolicNconc
              VariableReference CritNconc: VariableName=[Root].criticalNConc
              VariableReference MinNconc: VariableName=[Root].minimumNconc
            VariableReference PotentialDMAllocation: VariableName=[Root].potentialDMAllocation.Structural
          StorageNDemandFunction Storage
            VariableReference NitrogenDemandSwitch: VariableName=[Root].nitrogenDemandSwitch
            VariableReference MaxNconc: VariableName=[Root].maximumNconc
          Constant QStructuralPriority: FixedValue=1
          Constant QMetabolicPriority: FixedValue=1
          Constant QStoragePriority: FixedValue=1
        VariableReference CriticalNConc: VariableName=[Root].MinimumNConc
        NutrientPoolFunctions InitialWt
          Constant Structural: FixedValue=0.2; Units=g/plant
          Constant Metabolic: FixedValue=0
          Constant Storage: FixedValue=0
      CompositeBiomass AboveGround: OrganNames=[Leaf, Stem, Grain, Shell]; IncludeLive=true; IncludeDead=true
      CompositeBiomass BelowGround: OrganNames=[Root]; IncludeLive=true; IncludeDead=true
      CompositeBiomass AboveGroundLive: OrganNames=[Leaf, Stem, Grain, Shell]; IncludeLive=true; IncludeDead=false
      CompositeBiomass Total: OrganNames=[Leaf, Stem, Grain, Shell, Root]; IncludeLive=true; IncludeDead=true
      CompositeBiomass TotalLive: OrganNames=[Leaf, Stem, Grain, Shell, Root]; IncludeLive=true; IncludeDead=false
      CompositeBiomass TotalDead: OrganNames=[Leaf, Stem, Grain, Shell, Root]; IncludeLive=false; IncludeDead=true
      CompositeBiomass Pod: OrganNames=[Shell, Grain]; IncludeLive=true; IncludeDead=true
      Constant MortalityRate: FixedValue=0
      Constant SeedMortalityRate: FixedValue=0
    Report DailyReport: EventNames=[Clock].EndOfDay
      VariableNames:
        [Clock].Today
        [Clock].Today.DayOfYear
        [Sesame].SowingData.SkipPlant
        [Sesame].IsAlive
        [Sesame].DaysAfterSowing as DaysAfterSowing
        [Sesame].Phenology.Stage
        [Sesame].Phenology.CurrentStageName as CurrentStageName
        [Sesame].Phenology.AccumulatedTT
        [Sesame].Phenology.MaturityDAS
        [SoilTemperature].Value[1] as SurfaceSoilTemp
        [Irrigation].IrrigationApplied
        [Weather].MeanT
        [Weather].Radn
        [Weather].MaxT
        [Weather].MinT
        [Weather].CO2
        [Sesame].LAI
        [Sesame].Leaf.LAI
        [Sesame].Leaf.LAITotal
        [Sesame].Leaf.CoverTotal as CoverTotal
        [Sesame].Leaf.CoverGreen as CoverGreen
        [Sesame].Leaf.NConc
        [Sesame].Leaf.N
        [Sesame].Leaf.RadiationIntercepted
        [Sesame].Leaf.Height as Height
        [Sesame].Leaf.CoverGreen
        [Sesame].Leaf.Photosynthesis.FT
        [Sesame].Leaf.Photosynthesis.FT.MeanT
        [Sesame].Leaf.Photosynthesis.FT.MinT
        [Sesame].Leaf.Photosynthesis.FN
        [Sesame].Leaf.Photosynthesis.FW
        [Sesame].Leaf.FW
        [Sesame].Leaf.FRGR
        [Sesame].Leaf.Photosynthesis.FCO2
        [Sesame].Leaf.Wt
        [Sesame].Leaf.Live.Wt
        [Sesame].Leaf.Dead.Wt
        [Sesame].Leaf.Detached.Wt
        [Sesame].Leaf.Total.StructuralWt
        [Sesame].Leaf.Height
        [Sesame].Stem.Wt
        [Sesame].Stem.Live.Wt
        [Sesame].Stem.Dead.Wt
        [Sesame].Stem.Total.StructuralWt
        [Sesame].Stem.NodeNumber
        //[Sesame].Stem.BranchNumber as BranchNumber
        [Sesame].Stem.MaxBranchNumber
        [Sesame].SowingData.Population as Population
        max of [Sesame].Stem.BranchNumber from [Sesame].Sowing to [Clock].Today as BranchNumber
        [Sesame].Shell.Wt
        [Sesame].Shell.Live.Wt
        [Sesame].Shell.Dead.Wt
        [Sesame].Shell.Total.StructuralWt
        [Sesame].Shell.Wt
        [Sesame].Shell.Live.Wt
        ([Sesame].Shell.Wt + [Sesame].Grain.Wt) as ShellAndGrainWt
        ([Sesame].Shell.Live.Wt + [Sesame].Grain.Live.Wt) as ShellAndGrainLiveWt
        ([Sesame].Shell.Dead.Wt + [Sesame].Grain.Dead.Wt) as ShellAndGrainDeadWt
        [Sesame].Root.Depth
        [Sesame].Root.NSupply.Fixation
        [Sesame].Root.NSupply.Uptake
        [Sesame].Root.NSupply.Total
        [Sesame].Root.WetRootFraction
        [Sesame].Root.WetRootFractionFactor
        [Sesame].Grain.Live.NConc
        [Sesame].Grain.WaterContent
        [Sesame].Grain.HarvestIndex
        [Sesame].Grain.PotentialHarvestIndex
        [Sesame].Grain.Wt as GrainWt
        [Sesame].AboveGround.Wt
        [Sesame].AboveGroundLive.Wt
    Report HarvestReport: EventNames=[Sesame].Harvesting
      VariableNames:
        [Clock].Today
        [Clock].Today.DayOfYear
        [Clock].Today.Year as HarvestYear
        [Sesame].DaysAfterSowing as DaysAfterSowing
        [Sesame].SowingData.Population as Population
        [Sesame].Phenology.Stage
        [Sesame].Phenology.AccumulatedTT
        [Sesame].Phenology.EmergenceDAS
        [Sesame].Phenology.StartFloweringDAS
        [Sesame].Phenology.MaturityDAS
        [Sesame].Stem.BranchNumber as BranchNumber
        [Sesame].Stem.NodeNumber
        //[Irrigation].IrrigationEvents as NumberIrrig
        sum of [Irrigation].IrrigationApplied from [Sesame].Sowing to [Sesame].Harvesting as TotalIrrig
        max of [Sesame].Leaf.LAI from [Sesame].Sowing to [Sesame].Harvesting as MaxLAI
        mean of [Sesame].Leaf.Photosynthesis.FT from [Sesame].Sowing to [Sesame].Harvesting as AvePsFT
        mean of [Sesame].Leaf.Photosynthesis.FT.MeanT from [Sesame].Sowing to [Sesame].Harvesting as AvePsFTMeanT
        mean of [Sesame].Leaf.Photosynthesis.FT.MinT from [Sesame].Sowing to [Sesame].Harvesting as AvePsFTMinT
        mean of [Sesame].Leaf.Photosynthesis.FN from [Sesame].Sowing to [Sesame].Harvesting as AvePsFN
        mean of [Sesame].Leaf.Photosynthesis.FW from [Sesame].Sowing to [Sesame].Harvesting as AvePsFW
        mean of [Sesame].Root.WetRootFractionFactor from [Sesame].Sowing to [Sesame].Harvesting as AveWetRootFracFact
        mean of [Sesame].Leaf.FW from [Sesame].Sowing to [Sesame].Harvesting as AveFW
        mean of [Sesame].Leaf.FRGR from [Sesame].Sowing to [Sesame].Harvesting as AveFRGR
        [Sesame].AboveGround.Wt as AboveGroundWt
        [Sesame].Grain.Wt as GrainWt
    Manager Initials
      ResetDateSM =
      ResetDateCN =
      InitDepth = 150, 300, 600, 900, 1200
      InitWater =
      InitNO3N =
      InitNH4N =
      InitOC =
```csharp
using Models.Soils.Nutrients;
using APSIM.Shared.Utilities;
using Models.Surface;
using Models.Utilities;
using Models.Soils.Nutrients;
using Models.Soils;
using Models.PMF;
using Models.Core;
using System;
using System.Linq;
using Models.Interfaces;

namespace Models
{
    [Serializable]
    public class Script : Model
    {
        [Link] private Clock Clock;
        [Link] private ISoilWater soilWater;
        [Link] private SoilCrop soilCrop;
        [Link] private Physical soilPhysical;
        [Link] private Nutrient nutrient;
        [Link] private Organic organic;
        [Link] private SurfaceOrganicMatter SOM;
        [Link] private Summary summary;

        //===================================================================================================================        

        [Description("Reset date for soil moisture (e.g., 01-may or blank)")]
        public string ResetDateSM { get; set; }

        [Description("Reset date for soil N, C, and SOM (e.g., 01-may or blank)")]
        public string ResetDateCN { get; set; }

        [Description("Initial cumulative depths (mm)")]
        public double[] InitDepth { get; set; }

        [Description("Initial gravitational water content (g/g)")]
        public double[] InitWater { get; set; } = new double[0];

        [Description("Initial NO3N (mg/kg)")]
        public double[] InitNO3N { get; set; } = new double[0];

        [Description("Initial NH4N (mg/kg)")]
        public double[] InitNH4N { get; set; } = new double[0];

        [Description("Initial OC (%)")]
        public double[] InitOC { get; set; } = new double[0];

        //===================================================================================================================        

        private double[] MidLayerDepth;
        private bool ResetSM = false;
        private bool ResetCN = false;
        private bool ResetSOM = false;

        //===================================================================================================================

        [EventSubscribe("StartOfSimulation")]
        private void OnStartOfSimulation(object sender, EventArgs args)
        {
            // summary.WriteMessage(this, "Brian0: " + string.IsNullOrEmpty(ResetDateCN), MessageType.Diagnostic);
            
            if (!string.IsNullOrEmpty(ResetDateSM))
                ResetSM = true;
            else
            {
                ResetSM = false;
                ResetDateSM = "01-jan";
            }

            if (!string.IsNullOrEmpty(ResetDateCN))
            {
                ResetCN = true;
                ResetSOM = true;
            }
            else
            {
                ResetCN = false;
                ResetSOM = false;
                ResetDateCN = "01-jan";
            }

            if (InitDepth is null) InitDepth = new double[0];
            if (InitWater is null) InitWater = new double[0];
            if (InitNO3N is null) InitNO3N = new double[0];
            if (InitNH4N is null) InitNH4N = new double[0];
            if (InitOC is null) InitOC = new double[0];
            
            MidLayerDepth = new double[InitDepth.Length];
            double x1, x2, cumDepth;

            for (int layer = 0; layer < InitDepth.Length; layer++)
            {
                if (layer == 0)
                {
                    x1 = 0;
                }
                else
                {
                    x1 = InitDepth[layer - 1];
                }
                x2 = InitDepth[layer];
                cumDepth = x1 + 0.5 * (x2 - x1);
                MidLayerDepth[layer] = cumDepth;
            }

            // summary.WriteMessage(this, "Brian1: " + string.Join(", ", InitWater), MessageType.Diagnostic);
            
            if (InitWater.Length == 1) InitWater = Enumerable.Repeat(InitWater[0], MidLayerDepth.Length).ToArray();
            if (InitNO3N.Length == 1) InitNO3N = Enumerable.Repeat(InitNO3N[0], MidLayerDepth.Length).ToArray();
            if (InitNH4N.Length == 1) InitNH4N = Enumerable.Repeat(InitNH4N[0], MidLayerDepth.Length).ToArray();
            if (InitOC.Length == 1) InitOC = Enumerable.Repeat(InitOC[0], MidLayerDepth.Length).ToArray();

            InitWater = InterpolateInitValues(InitWater, 4);
            InitNO3N = InterpolateInitValues(InitNO3N, 2);
            InitNH4N = InterpolateInitValues(InitNH4N, 2);
            InitOC = InterpolateInitValues(InitOC, 2);
            
            // summary.WriteMessage(this, "Brian2: " + string.Join(", ", InitWater), MessageType.Diagnostic);
        }

        //===================================================================================================================

        [EventSubscribe("StartOfDay")]
        private void OnStartOfDay(object sender, EventArgs e)
        {
            DateTime resetDateSM = DateUtilities.GetDate(ResetDateSM, Clock.Today);
            DateTime resetDateCN = DateUtilities.GetDate(ResetDateCN, Clock.Today);

            // Rset soil moisture on the reset date for soil moisture.
            if (ResetSM && resetDateSM.Equals(Clock.Today))
            {
                summary.WriteMessage(this, "Reset soil moisture content.", MessageType.Diagnostic);
                
                if (InitWater.Length > 0)
                {
                    double x1, x2, depth;
                    int nLayers = soilPhysical.DUL.Length;

                    double[] newSW = new double[soilPhysical.DUL.Length];
                    if (InitWater.Length > 0) soilWater.SW = new double[soilWater.SW.Length];

                    for (int layer = 0; layer < nLayers; layer++)
                    {
                        if (layer == 0)
                        {
                            x1 = 0;
                        }
                        else
                        {
                            x1 = soilPhysical.ThicknessCumulative[layer - 1];
                        }

                        x2 = soilPhysical.ThicknessCumulative[layer];
                        depth = 0.5 * (x1 + x2);

                        if (InitWater.Length > 0)
                        {
                            newSW[layer] = LinearInterpolate(depth, MidLayerDepth, InitWater, 4);
                            newSW[layer] = newSW[layer] * soilPhysical.BD[layer];
                            newSW[layer] = Math.Min(newSW[layer], soilPhysical.DUL[layer]);                            
                        }
                    }

                    if (InitWater.Length > 0) soilWater.SW = newSW;
                }
            }

            // summary.WriteMessage(this, "Brian2: " + ResetCN, MessageType.Diagnostic);
            // summary.WriteMessage(this, "Brian2: " + resetDateCN, MessageType.Diagnostic);
            
            // Reset soil N and C on the reset date for N and C.
            if (ResetCN && resetDateCN.Equals(Clock.Today))
            {
                summary.WriteMessage(this, "Reset soil N and C content.", MessageType.Diagnostic);
                nutrient.Reset();

                if (InitNO3N.Length > 0 || InitNH4N.Length > 0 || InitOC.Length > 0)
                {
                    double x1, x2, depth;
                    int nLayers = nutrient.NO3.kgha.Length;

                    double[] newNO3 = new double[nutrient.NO3.kgha.Length];
                    double[] newNH4 = new double[nutrient.NH4.kgha.Length];
                    double[] newOC = new double[organic.Carbon.Length];

                    if (InitNO3N.Length > 0) nutrient.NO3.kgha = new double[nutrient.NO3.kgha.Length];
                    if (InitNH4N.Length > 0) nutrient.NH4.kgha = new double[nutrient.NH4.kgha.Length];
                    if (InitOC.Length > 0) organic.Carbon = new double[organic.Carbon.Length];

                    for (int layer = 0; layer < nLayers; layer++)
                    {
                        if (layer == 0)
                        {
                            x1 = 0;
                        }
                        else
                        {
                            x1 = soilPhysical.ThicknessCumulative[layer - 1];
                        }

                        x2 = soilPhysical.ThicknessCumulative[layer];
                        depth = 0.5 * (x1 + x2);

                        if (InitNO3N.Length > 0)
                        {
                            newNO3[layer] = LinearInterpolate(depth, MidLayerDepth, InitNO3N, 2);
                            newNO3[layer] = newNO3[layer] * soilPhysical.BD[layer] * soilPhysical.Thickness[layer] / 10;
                        }
                        if (InitNH4N.Length > 0)
                        {
                            newNH4[layer] = LinearInterpolate(depth, MidLayerDepth, InitNH4N, 2);
                            newNH4[layer] = newNH4[layer] * soilPhysical.BD[layer] * soilPhysical.Thickness[layer] / 10;
                        }
                        if (InitOC.Length > 0)
                        {
                            newOC[layer] = LinearInterpolate(depth, MidLayerDepth, InitOC, 2);
                        }
                    }

                    if (InitNO3N.Length > 0) nutrient.NO3.kgha = newNO3;
                    if (InitNH4N.Length > 0) nutrient.NH4.kgha = newNH4;
                    if (InitOC.Length > 0) organic.Carbon = newOC;
                    
                    // summary.WriteMessage(this, "Brian3: " + string.Join(", ", nutrient.NO3.kgha), MessageType.Diagnostic);
                }

                if (ResetSOM && resetDateCN.Equals(Clock.Today))
                {
                    summary.WriteMessage(this, "Reset surface OM.", MessageType.Diagnostic);
                    SOM.Reset();
                }
            }
        }

        //===================================================================================================================

        public double LinearInterpolate(double x, double[] xValues, double[] yValues, int numDig = 3)
        {
            if (x <= xValues[0]) return yValues[0];
            if (x >= xValues[xValues.Length - 1]) return yValues[yValues.Length - 1];            
            
            for (int i = 1; i < xValues.Length; i++)
            {
                if (x < xValues[i])
                {
                    double x0 = xValues[i - 1];
                    double x1 = xValues[i];
                    double y0 = yValues[i - 1];
                    double y1 = yValues[i];
                    return Math.Round(y0 + (y1 - y0) * (x - x0) / (x1 - x0), numDig);
                }
            }
            return yValues[yValues.Length - 1];
        }

        public double[] InterpolateInitValues(double[] InputArray, int numDig = 3)
        {            
            if (InputArray.Length == 2 && MidLayerDepth.Length > 2)
            {                
                double[] newVals = new double[MidLayerDepth.Length];
                double[] newDepths = new double[] { MidLayerDepth[0], MidLayerDepth[MidLayerDepth.Length - 1] };                
                
                newVals[0] = InputArray[0];
                newVals[newVals.Length - 1] = InputArray[1];

                for (int layer = 1; layer < MidLayerDepth.Length - 1; layer++)
                {
                    newVals[layer] = LinearInterpolate(MidLayerDepth[layer], newDepths, InputArray, numDig);
                }
                return (newVals);
            }
            return (InputArray);
        }
    }
}
```
    Manager CO2Trend
      C3 = 1.4507E-08
      C2 = 8.01174e-05
      C1 = 0.057666
      C0 = 314.802402
      Target = -1
      RCP = RCP85
      KeepAt = -1
      KeepAtYear = -1
```csharp
using Models.Soils.Nutrients;
using APSIM.Shared.Utilities;
using Models.Surface;
using Models.Utilities;
using Models.Soils.Nutrients;
using Models.Soils;
using Models.PMF;
using Models.Core;
using System;
using System.Linq;
using Models.Interfaces;

namespace Models
{
	[Serializable]
	public class Script : Model
	{
		[Link] private Clock Clock;
		[Link] private IWeather Weather;
		
		[Description("Coefficient of x^3")]
		public double C3 {get; set;}
		
		[Description("Coefficient of x^2")]
		public double C2 {get; set;}
		
		[Description("Coefficient of x)")]
		public double C1 {get; set;}
		
		[Description("Intercept")]
		public double C0 {get; set;}
		
		[Description("Target period (negative to use regression; set 0 to keep at 350 ppm; or 2030-2050)")]
		public double Target {get; set;}
		
		[Description("RCP scenario (only used if Target>0)")]
		public string RCP {get; set;}
		
		[Description("Keep CO2 at this level (only used if Target<0; negative to ignore)")]
		public double KeepAt {get; set;}
		
		[Description("Keep CO2 at this year's level (only used if Target<0; negative to ignore)")]
		public double KeepAtYear {get; set;}
		private double CO2;
		private double MonID;
		
		[EventSubscribe("DoWeather")]
		private void OnDoWeather(object sender, EventArgs e)
		{
			CO2 = -1;
			if (Target == 0)
			{
				CO2 = 350;
			}
			else if (Target > 0)
			{
				if (Target == 2030)
				{
					if (RCP == "RCP45")
					{
						CO2 = 438;
					}
					else
					{
						CO2 = 452;
					}
				}
				else if (Target == 2050)
				{
					if (RCP == "RCP45")
					{
						CO2 = 483;
					}
					else
					{
						CO2 = 546;
					}
				}
			}
			else if (Target < 0)
			{
				if (KeepAt < 0)
				{
					if (KeepAtYear < 0)
					{
						MonID = (Clock.Today.Year - 1) * 12 + (Clock.Today.Month - 1) + (Clock.Today.Day / 30) - 23483.5;
					}
					else
					{
						MonID = (KeepAtYear - 1) * 12 + 1 - 23483.5;
					}
					CO2 = (C3 * Math.Pow(MonID,3)) + (C2 * Math.Pow(MonID,2)) + (C1 * MonID) + C0;
				}
				else
				{
					CO2 = KeepAt;
				}
				if (CO2 < 350)
				{
					CO2 = 350;
				}
			}
			Weather.CO2 = CO2;
		}
	}
}
```
    Manager MyScripts
```csharp
using Models.Soils.Nutrients;
using APSIM.Shared.Utilities;
using Models.Surface;
using Models.Utilities;
using Models.Soils.Nutrients;
using Models.Soils;
using Models.PMF;
using Models.Core;
using System;
using System.Linq;
using Models.Interfaces;

namespace Models
{
	[Serializable]
	public class Script : Model
	{
		[Link] private Clock Clock;
		[Link] private IWeather Weather;
		
		public double LastStagePassed {get; set;}		
		
		[EventSubscribe("OnPhaseChanged")]
		private void OnDoWeather(object sender, EventArgs e)
		{
			
		}
	}
}
```
  DataStore
    ExcelInput: FileNames=[SesameObserved.xlsx]; SheetNames=[Observed]
    PredictedObserved PredictedObservedStageName: PredictedTableName=DailyReport; ObservedTableName=Observed; FieldNameUsedForMatch=SimulationName; FieldName2UsedForMatch=CurrentStageName; AllColumns=false
      Tests: POName=PredictedObservedStageName
        AcceptedStats:
          Name                    n   Slope      Intercept  SEslope    SEintercept  R2         RMSE     NSE       ME        MAE      RSR       RMR
          Sesame.AboveGround.Wt   4   0.0557694  125.978    0.0442545  6.08375      0.442601   37.9692  0.102468  1.81201   35.8506  0.820457  0.288739
          Sesame.DaysAfterSowing  37  0.938348   2.00618    0.0383456  2.91112      0.944779   10.0525  0.942704  -1.89294  6.36381  0.236109  0.158947
          Sesame.Grain.Wt         4   0.0094558  8.68053    0.0515352  1.63337      0.0165543  23.493   -3.38049  -20.6792  20.6792  1.81256   0.792612
        AcceptedStatsName=Name n Slope Intercept SEslope SEintercept R2 RMSE NSE ME MAE RSR RMR
    PredictedObserved PredictedObservedDate: PredictedTableName=DailyReport; ObservedTableName=Observed; FieldNameUsedForMatch=SimulationName; FieldName2UsedForMatch=Clock.Today; AllColumns=false
      Tests: POName=PredictedObservedDate
        AcceptedStats:
          Name                      n   Slope      Intercept  SEslope    SEintercept  R2         RMSE       NSE        ME          MAE        RSR       RMR
          Sesame.AboveGround.Wt     18  0.331071   106.367    0.400084   142.456      0.0410414  224.129    -3.22837   -120.382    160.974    1.99836   0.661199
          Sesame.DaysAfterSowing    19  0.203035   56.5614    0.358102   50.7358      0.0185585  91.7193    -3.02713   -50.3158    50.3158    1.95325   0.683935
          Sesame.Grain.Wt           18  0.439045   7.9884     0.348619   23.9585      0.0901878  46.644     -2.52578   -27.9562    34.2283    1.8248    0.72793
          Sesame.Leaf.CoverGreen    10  0.990107   0.0138439  0.0758064  0.0584239    0.955205   0.0568061  0.953284   0.00667632  0.0498094  0.205047  0.0784073
          Sesame.Leaf.Height        19  8.60867    158.59     9.06535    782.796      0.050374   1004.22    -4062.05   804.573     854.907    62.042    11.8282
          Sesame.Stem.BranchNumber  19  -0.197938  4.7454     0.123462   0.506344     0.131339   1.05295    -0.702038  -0.0715266  0.904939   1.26983   0.261862
        AcceptedStatsName=Name n Slope Intercept SEslope SEintercept R2 RMSE NSE ME MAE RSR RMR
    PredictedObserved PredictedObservedHarvest: PredictedTableName=HarvestReport; ObservedTableName=Observed; FieldNameUsedForMatch=SimulationName; AllColumns=false
      Tests: POName=PredictedObservedHarvest
        AcceptedStats:
          Name                      n   Slope      Intercept  SEslope   SEintercept  R2         RMSE     NSE        ME          MAE       RSR       RMR
          Sesame.AboveGround.Wt     18  0.814908   58.784     0.120893  43.0459      0.739573   56.5751  0.730581   -3.95718    47.5856   0.504432  0.166902
          Sesame.DaysAfterSowing    38  0.293698   123.163    0.102595  12.4181      0.185427   66.6442  -0.666066  45.8411     46.999    1.27366   0.608763
          Sesame.Grain.Wt           18  0.696119   19.484     0.158634  10.902       0.54618    17.4768  0.505018   0.0120006   14.3812   0.683727  0.272745
          Sesame.Stem.BranchNumber  19  -0.131184  4.52185    0.13633   0.559119     0.0516529  1.01983  -0.596628  -0.0266638  0.860076  1.22988   0.253624
        AcceptedStatsName=Name n Slope Intercept SEslope SEintercept R2 RMSE NSE ME MAE RSR RMR
  Folder Validation
    Folder Australia
      Folder Emerald
        Experiment Emerald
          Factors
            Factor 23
              CompositeFactor Sum_B_IR_Jan
                Specifications:
                  [Clock]
                  [Weather]
                  [Management]
                  [Soil]
                  [AutoIrrigation].Script.AutoIrrigationOn = true
                  [Initials].Script.ResetDateSM = 28-nov
                  [Initials].Script.ResetDateCN = 06-jan
                  [Initials].Script.InitDepth = 150, 300, 600, 900, 1200
                  [Initials].Script.InitWater = 0.99
                  [Initials].Script.InitNO3N = 5.3, 0.5
                  [Initials].Script.InitNH4N = 1.5, 0.1
                Clock: Start=2023-11-25; End=2024-04-30
                Weather: FileName=Emerald_23_Sum.met
                Operations Management
                  2024-01-07  [Fertiliser].Apply(amount: 120, type: "UreaN");
                  2024-01-08  [Sesame].Sow(population:5.2, cultivar:"S57B", depth:30, rowSpacing:250);
                  2024-04-17  [Sesame].Harvest();
                  2024-04-17  [Sesame].EndCrop();
                Soil Black Vertosol (Emerald No911): ASCOrder=Vertosol; ASCSubOrder=Black; SoilType=Clay; Site=Emerald; NearestTown=Emerald; Region=Central Highlands; State=Queensland; Country=Australia; ApsoilNumber=911; Latitude=-23.5211; Longitude=148.123; YearOfSampling=0; DataSource=Collected by Brett Cocks (CES) for NVT.; Comments=Clay -
                  Physical
                    Thickness  ParticleSizeSand  ParticleSizeSilt  ParticleSizeClay  Rocks  BD     AirDry  LL15   DUL    SAT
                    150        5                 65                30                0      1.422  0.062   0.124  0.384  0.434
                    150        5                 65                30                0      1.431  0.118   0.148  0.379  0.429
                    300        5                 65                30                0      1.46   0.153   0.153  0.353  0.403
                    300        5                 65                30                0      1.44   0.153   0.153  0.365  0.415
                    300        5                 65                30                0      1.416  0.153   0.153  0.387  0.437
                    300        5                 65                30                0      1.394  0.153   0.153  0.401  0.451
                    300        5                 65                30                0      1.407  0.153   0.153  0.396  0.446
                    BD, DUL source: Field measured and checked for sensibility
                    AirDry, LL15, SAT source: Unknown source or quality of data
                    Rocks, ParticleSizeSand, ParticleSizeSilt, ParticleSizeClay source: Calculated
                    SoilCrop wheatSoil: LL=[0.124, 0.148, 0.153, 0.165, 0.232, 0.291, 0.349]; KL=[0.06, 0.06, 0.06, 0.04, 0.04, 0.02, 0.01]; XF=[1, 1, 1, 1, 1, 1, 1]
                      LL source: Field measured and checked for sensibility
                    SoilCrop SCRUMSoil: same as Validation.Australia.Emerald.Emerald.Factors.23.Sum_B_IR_Jan.Black Vertosol (Emerald No911).Physical.wheatSoil
                    SoilCrop SesameSoil: same as Validation.Australia.Emerald.Emerald.Factors.23.Sum_B_IR_Jan.Black Vertosol (Emerald No911).Physical.wheatSoil
                  SoilTemperature Temperature
                  Water: Thickness=[150, 150, 300, 300, 300, 300, 300]; InitialValues=[0.384, 0.379, 0.353, 0.365, 0.387, 0.401, 0.396]; FilledFromTop=true
                  Solute NO3: Thickness=[150, 150, 300, 300, 300, 300, 300]; InitialValues=[0, 0, 0, 0, 0, 0, 0]; InitialValuesUnits=ppm; WaterTableConcentration=0; D0=0; DepthConstant=0; MaxDepthSoluteAccessible=0; RunoffEffectivenessAtMovingSolute=0; MaxEffectiveRunoff=0
                  Solute NH4: same as Validation.Australia.Emerald.Emerald.Factors.23.Sum_B_IR_Jan.Black Vertosol (Emerald No911).NO3
                  Solute Urea: same as Validation.Australia.Emerald.Emerald.Factors.23.Sum_B_IR_Jan.Black Vertosol (Emerald No911).NO3
                  Nutrient
                  WaterBalance: SummerDate=1-Nov; SummerU=5; SummerCona=3; WinterDate=1-Apr; WinterU=4; WinterCona=2; DiffusConst=40; DiffusSlope=16; Salb=0.12; CN2Bare=73; CNRed=20; CNCov=0.8; DischargeWidth=5; CatchmentArea=10; PSIDul=-100; Thickness=[150, 150, 300, 300, 300, 300, 300]; SWCON=[0.3, 0.3, 0.3, 0.3, 0.3, 0.3, 0.3]
                  Organic: FOMCNRatio=0; CarbonUnits=Total
                    Thickness  Carbon  SoilCNRatio  FBiom  FInert  FOM
                    150        0.2     12           0.2    0.8     100
                    150        0.2     12           0.2    0.8     100
                    300        0.2     12           0.2    0.8     100
                    300        0.2     12           0.2    0.8     100
                    300        0.2     12           0.2    0.8     100
                    300        0.2     12           0.2    0.8     100
                    300        0.2     12           0.2    0.8     100
                  Chemical: PHUnits=Water
                    Thickness  PH  CEC
                    150        7   8.795
                    150        7   8.795
                    300        7   8.795
                    300        7   8.795
                    300        7   8.795
                    300        7   8.795
                    300        7   8.795
                    CEC source: Calculated
              CompositeFactor Sum_W103_IR_Jan
                Specifications:
                  [Clock]
                  [Weather]
                  [Management]
                  [Soil]
                  [AutoIrrigation].Script.AutoIrrigationOn = true
                  [Initials].Script.ResetDateSM = 28-nov
                  [Initials].Script.ResetDateCN = 06-jan
                  [Initials].Script.InitDepth = 150, 300, 600, 900, 1200
                  [Initials].Script.InitWater = 0.99
                  [Initials].Script.InitNO3N = 5.3, 0.5
                  [Initials].Script.InitNH4N = 1.5, 0.1
                Clock: Start=2023-11-25; End=2024-04-30
                Weather: FileName=Emerald_23_Sum.met
                Operations Management
                  2024-01-07  [Fertiliser].Apply(amount: 120, type: "UreaN");
                  2024-01-08  [Sesame].Sow(population:4.8, cultivar:"ES103", depth:30, rowSpacing:250);
                  2024-04-17  [Sesame].Harvest();
                  2024-04-17  [Sesame].EndCrop();
                Soil Black Vertosol (Emerald No911): same as Validation.Australia.Emerald.Emerald.Factors.23.Sum_B_IR_Jan.Black Vertosol (Emerald No911)
              CompositeFactor Sum_B_RF_Jan
                Specifications:
                  [Clock]
                  [Weather]
                  [Management]
                  [Soil]
                  [AutoIrrigation].Script.AutoIrrigationOn = false
                  [Initials].Script.ResetDateSM = 28-nov
                  [Initials].Script.ResetDateCN = 06-jan
                  [Initials].Script.InitDepth = 150, 300, 600, 900, 1200
                  [Initials].Script.InitWater = 0.99
                  [Initials].Script.InitNO3N = 5.3, 0.5
                  [Initials].Script.InitNH4N = 1.5, 0.1
                Clock: Start=2023-11-25; End=2024-04-30
                Weather: FileName=Emerald_23_Sum.met
                Operations Management
                  2024-01-07  [Fertiliser].Apply(amount: 120, type: "UreaN");
                  2024-01-08  [Sesame].Sow(population:1.1, cultivar:"S57B", depth:30, rowSpacing:250);
                  2024-04-17  [Sesame].Harvest();
                  2024-04-17  [Sesame].EndCrop();
                Soil Black Vertosol (Emerald No911): same as Validation.Australia.Emerald.Emerald.Factors.23.Sum_B_IR_Jan.Black Vertosol (Emerald No911)
              CompositeFactor Sum_W103_RF_Jan
                Specifications:
                  [Clock]
                  [Weather]
                  [Management]
                  [Soil]
                  [AutoIrrigation].Script.AutoIrrigationOn = false
                  [Initials].Script.ResetDateSM = 06-jan
                  [Initials].Script.ResetDateCN = 06-jan
                  [Initials].Script.InitDepth = 150, 300, 600, 900, 1200
                  [Initials].Script.InitWater = 0.99
                  [Initials].Script.InitNO3N = 5.3, 0.5
                  [Initials].Script.InitNH4N = 1.5, 0.1
                Clock: Start=2023-11-25; End=2024-04-30
                Weather: FileName=Emerald_23_Sum.met
                Operations Management
                  2024-01-07  [Fertiliser].Apply(amount: 120, type: "UreaN");
                  2024-01-08  [Sesame].Sow(population:3.0, cultivar:"ES103", depth:30, rowSpacing:250);
                  2024-04-17  [Sesame].Harvest();
                  2024-04-17  [Sesame].EndCrop();
                Soil Black Vertosol (Emerald No911): same as Validation.Australia.Emerald.Emerald.Factors.23.Sum_B_IR_Jan.Black Vertosol (Emerald No911)
              CompositeFactor Sum_B_IR_Feb
                Specifications:
                  [Clock]
                  [Weather]
                  [Management]
                  [Soil]
                  [AutoIrrigation].Script.AutoIrrigationOn = true
                  [Initials].Script.ResetDateSM = 01-feb
                  [Initials].Script.ResetDateCN = 06-jan
                  [Initials].Script.InitDepth = 150, 300, 600, 900, 1200
                  [Initials].Script.InitWater = 0.2
                  [Initials].Script.InitNO3N = 5, 1
                  [Initials].Script.InitNH4N = 2, 0.1
                Clock: Start=2024-01-05; End=2024-06-30
                Weather: FileName=Emerald_23_Sum.met
                Operations Management
                  2024-02-07  [Fertiliser].Apply(amount: 120, type: "UreaN");
                  2024-02-08  [Sesame].Sow(population:11, cultivar:"S57B", depth:30, rowSpacing:250);
                  2024-05-28  [Sesame].Harvest();
                  2024-05-28  [Sesame].EndCrop();
                Soil Black Vertosol (Emerald No911): same as Validation.Australia.Emerald.Emerald.Factors.23.Sum_B_IR_Jan.Black Vertosol (Emerald No911)
              CompositeFactor Sum_W103_IR_Feb
                Specifications:
                  [Clock]
                  [Weather]
                  [Management]
                  [Soil]
                  [AutoIrrigation].Script.AutoIrrigationOn = true
                  [Initials].Script.ResetDateSM = 01-feb
                  [Initials].Script.ResetDateCN = 06-jan
                  [Initials].Script.InitDepth = 150, 300, 600, 900, 1200
                  [Initials].Script.InitWater = 0.2
                  [Initials].Script.InitNO3N = 5, 1
                  [Initials].Script.InitNH4N = 2, 0.1
                Clock: Start=2024-01-05; End=2024-06-30
                Weather: FileName=Emerald_23_Sum.met
                Operations Management
                  2024-02-07  [Fertiliser].Apply(amount: 120, type: "UreaN");
                  2024-02-08  [Sesame].Sow(population:11, cultivar:"ES103", depth:30, rowSpacing:250);
                  2024-05-28  [Sesame].Harvest();
                  2024-05-28  [Sesame].EndCrop();
                Soil Black Vertosol (Emerald No911): same as Validation.Australia.Emerald.Emerald.Factors.23.Sum_B_IR_Jan.Black Vertosol (Emerald No911)
              CompositeFactor Sum_B_RF_Feb
                Specifications:
                  [Clock]
                  [Weather]
                  [Management]
                  [Soil]
                  [AutoIrrigation].Script.AutoIrrigationOn = false
                  [Initials].Script.ResetDateSM = 01-feb
                  [Initials].Script.ResetDateCN = 06-jan
                  [Initials].Script.InitDepth = 150, 300, 600, 900, 1200
                  [Initials].Script.InitWater = 0.2
                  [Initials].Script.InitNO3N = 5, 1
                  [Initials].Script.InitNH4N = 2, 0.1
                Clock: Start=2024-01-05; End=2024-06-30
                Weather: FileName=Emerald_23_Sum.met
                Operations Management
                  2024-02-07  [Fertiliser].Apply(amount: 120, type: "UreaN");
                  2024-02-08  [Sesame].Sow(population:11.0, cultivar:"S57B", depth:30, rowSpacing:250);
                  2024-05-28  [Sesame].Harvest();
                  2024-05-28  [Sesame].EndCrop();
                Soil Black Vertosol (Emerald No911): same as Validation.Australia.Emerald.Emerald.Factors.23.Sum_B_IR_Jan.Black Vertosol (Emerald No911)
              CompositeFactor Sum_W103_RF_Feb
                Specifications:
                  [Clock]
                  [Weather]
                  [Management]
                  [Soil]
                  [AutoIrrigation].Script.AutoIrrigationOn = false
                  [Initials].Script.ResetDateSM = 01-feb
                  [Initials].Script.ResetDateCN = 06-jan
                  [Initials].Script.InitDepth = 150, 300, 600, 900, 1200
                  [Initials].Script.InitWater = 0.2
                  [Initials].Script.InitNO3N = 5, 1
                  [Initials].Script.InitNH4N = 2, 0.1
                Clock: Start=2024-01-05; End=2024-06-30
                Weather: FileName=Emerald_23_Sum.met
                Operations Management: same as Validation.Australia.Emerald.Emerald.Factors.23.Sum_W103_IR_Feb.Management
                Soil Black Vertosol (Emerald No911): same as Validation.Australia.Emerald.Emerald.Factors.23.Sum_B_IR_Jan.Black Vertosol (Emerald No911)
          Simulation EmeraldBase
            Clock: Start=2023-01-01; End=2025-12-30
            Summary summaryfile
            Weather: FileName=EMERALD DPI FIELD STATION.met
            SoilArbitrator Soil Arbitrator
            Zone paddock: Area=1; Slope=0; AspectAngle=0; Altitude=50
              Soil: SoilType=SoilType= clay loam; State=Queensland; Country=Australia; ApsoilNumber=0; Latitude=-23.4669; Longitude=148.1519
                DataSource=Original source is Soil and Landscape Grid of Australia. See: https://esoil.io/TERNLandscapes/Public/Pages/SLGA/index.html 2025-05-31 14:11:28.993667
                Comments=resolution=90 m - taxonomic classification name = clay loam - drainage class = NA - elevation = NA - slope = NA - geomdesc = NA
                Water: Thickness=[50, 100, 150, 300, 400, 330]; InitialValues=[0.26, 0.26, 0.27, 0.29, 0.28, 0.31]; FilledFromTop=true
                Physical
                  Thickness  ParticleSizeSand  ParticleSizeSilt  ParticleSizeClay  Rocks  BD    AirDry  LL15  DUL   SAT       KS
                  50         68                10                23                0      1.44  0.055   0.11  0.26  0.406604  937.4
                  100        64                10                26                0      1.45  0.096   0.12  0.26  0.40283   834.13
                  150        58                11                32                0      1.5   0.112   0.14  0.27  0.383962  415.1
                  300        50                11                39                0      1.53  0.17    0.17  0.29  0.392642  286.995
                  400        47                11                42                0      1.56  0.16    0.16  0.28  0.381321  280.827
                  330        44                11                44                0      1.57  0.19    0.19  0.31  0.377547  84.0424
                  Rocks source: Calculated
                  SoilCrop SesameSoil: LL=[0.11, 0.12, 0.14, 0.176206, 0.197108, 0.262873]; KL=[0.06, 0.06, 0.06, 0.0568968, 0.0414462, 0.0235635]; XF=[1, 1, 1, 0.925, 0.835, 0.795]
                  SoilCrop SoybeanSoil: LL=[0.11, 0.12, 0.14, 0.173581, 0.181408, 0.232042]; KL=[0.06, 0.06, 0.06, 0.0582097, 0.0492959, 0.0389789]; XF=[1, 1, 1, 0.925, 0.835, 0.795]
                  SoilCrop WheatSoil: same as Validation.Australia.Emerald.Emerald.EmeraldBase.paddock.Soil.Physical.SoybeanSoil
                  SoilCrop MaizeSoil: same as Validation.Australia.Emerald.Emerald.EmeraldBase.paddock.Soil.Physical.SesameSoil
                WaterBalance SoilWater: SummerDate=1-nov; SummerU=4; SummerCona=4; WinterDate=1-apr; WinterU=4; WinterCona=2.5; DiffusConst=27634.79; DiffusSlope=-13.05; Salb=0.13; CN2Bare=73; CNRed=20; CNCov=0; DischargeWidth=5; CatchmentArea=10; PSIDul=-100
                Solute NO3: Thickness=[50, 100, 150, 300, 400, 330]; InitialValues=[10, 10, 5, 5, 1, 1]; InitialValuesUnits=kg/ha; WaterTableConcentration=0; D0=0; DepthConstant=0; MaxDepthSoluteAccessible=0; RunoffEffectivenessAtMovingSolute=0; MaxEffectiveRunoff=0
                Solute NH4: Thickness=[50, 100, 150, 300, 400, 330]; InitialValues=[2, 2, 2, 1, 1, 1]; InitialValuesUnits=kg/ha; WaterTableConcentration=0; D0=0; DepthConstant=0; MaxDepthSoluteAccessible=0; RunoffEffectivenessAtMovingSolute=0; MaxEffectiveRunoff=0
                Solute Urea: Thickness=[50, 100, 150, 300, 400, 330]; InitialValues=[0, 0, 0, 0, 0, 0]; InitialValuesUnits=kg/ha; WaterTableConcentration=0; D0=0; DepthConstant=0; MaxDepthSoluteAccessible=0; RunoffEffectivenessAtMovingSolute=0; MaxEffectiveRunoff=0
                Organic: FOMCNRatio=40; CarbonUnits=Total
                  Thickness  Carbon  SoilCNRatio  FBiom      FInert    FOM
                  50         1.23    12           0.04       0.8       150
                  100        1.07    12           0.0327492  0.80804   122.81
                  150        0.8     12           0.0268128  0.816161  100.548
                  300        0.42    12           0.0219525  0.824364  82.3217
                  400        0.21    12           0.0179732  0.832649  67.3993
                  330        0.13    12           0.0147152  0.841017  55.1819
                Chemical: PHUnits=Water
                  Thickness  PH   CEC
                  50         6.9  13.4645
                  100        7    13.6375
                  150        7.2  14.23
                  300        7.4  14.708
                  400        7.7  14.8355
                  330        7.5  14.9885
                  CEC source: Calculated
                Nutrient
                SoilTemperature Temperature
              Manager Initials
                ResetDateSM =
                ResetDateCN =
                InitDepth = 150, 300, 600, 900, 1200
                InitWater =
                InitNO3N =
                InitNH4N =
                InitOC =
              MicroClimate: a_interception=0; b_interception=1; c_interception=0; d_interception=0; SoilHeatFluxFraction=0.4; MinimumHeightDiffForNewLayer=0; NightInterceptionFraction=0.5; ReferenceHeight=2
              Manager CO2Trend
                C3 = 1.5264E-08
                C2 = 7.93268e-05
                C1 = 0.0578807
                C0 = 314.79058
                Target = -1
                RCP = RCP85
                KeepAt = -1
                KeepAtYear = -1
              Irrigation
              Manager AutoIrrigation
                Crop = [Sesame]
                AutoIrrigationOn = True
                FASWThreshold = 0.4
                FASWDepth = 300
                weeks = 0
                afterSowing = 0
```csharp
using APSIM.Numerics;
using Models.Interfaces;
using System;
using System.Linq;
using Models.Core;
using System.Collections.Generic;
using System.Text;
using Models.Soils;
using Models.PMF;
using Models;
using System.Xml.Serialization;
using APSIM.Shared.Utilities;
using Models.Interfaces;
using APSIM.Numerics;
namespace Models
{
    [Serializable] 
    public class Script : Model
    {
        [Link] private Zone zone;
        [Link] private Irrigation irrigation;
        [Link] private ISoilWater waterBalance;
        [Link] private IPhysical soilPhysical;
        public double FASW { get; set; }
        public double WaterDeficit  { get; set; }
    


        [Description("Crop to irrigate")]
        public IPlant Crop { get; set; }
        
        [Description("Auto irrigation on?")]
        public bool AutoIrrigationOn { get; set; }

        [Description("Threshold fraction available water (0-1)")]
        public double FASWThreshold { get; set; }

        [Description("Soil depth (mm) to which fraction available water is calculated")]
        public double FASWDepth { get; set; }

        [Description("Minimum weeks between irrigations")]
        public double weeks { get; set; }

        [Description("Minimum days after sowing for first irrigation")]
        public int afterSowing { get; set; }

        private double irrigationGap = 0;    // gap between irrigations

        /// <summary>Called at start of simulation. Performs some basic error checking. </summary>
        [EventSubscribe("StartOfSimulation")]
        private void ErrorChecking(object sender, EventArgs args)
        {
            if (Crop == null)
                throw new Exception("No crop was specified in script " + Parent.Name);
        }

        [EventSubscribe("DoManagement")]
        private void OnDoManagement(object sender, EventArgs e)
        {
            if (AutoIrrigationOn && Crop.IsAlive)
            {
                irrigationGap += 1;             // increment gap between irrigations
                CalculateFASW();                // calc FASW and WaterDeficit
                
                if ((FASW < FASWThreshold) && (irrigationGap >= weeks * 7))
                {
                    irrigation.Apply(WaterDeficit, depth: 0);
                    irrigationGap = 0;            // reset
                }
            }
            else
            {
                irrigationGap = weeks * 7 - afterSowing - 1;    // allow irrigation a number of days after it becomes alive/sown
            }
        }

        // Calculate the fraction of the potential available sw
        // Calculate the deficit amount from DUL
        private void CalculateFASW()
        {
            double[] LL15 = MathUtilities.Multiply(soilPhysical.LL15, soilPhysical.Thickness);
            double[] DUL = MathUtilities.Multiply(soilPhysical.DUL, soilPhysical.Thickness);
        
            int nlayr = GetLayerIndex(FASWDepth);
            nlayr = Math.Min(nlayr, soilPhysical.Thickness.Length-1);
            double cumdep = MathUtilities.Sum(soilPhysical.Thickness, 0, nlayr, 0.0);    // tricky function that sums up to before nlayr

            double part_layer = MathUtilities.Divide((FASWDepth - cumdep), soilPhysical.Thickness[nlayr], 0.0);

            // note that results may be strange if swdep < ll15
            double avail_sw = (MathUtilities.Sum(waterBalance.SWmm, 0, nlayr, 0.0) + part_layer * waterBalance.SWmm[nlayr])
                            - (MathUtilities.Sum(LL15, 0, nlayr, 0.0) + part_layer * LL15[nlayr]);

            double pot_avail_sw = (MathUtilities.Sum(DUL, 0, nlayr, 0.0) + part_layer * DUL[nlayr])
                                - (MathUtilities.Sum(LL15, 0, nlayr, 0.0) + part_layer * LL15[nlayr]);
            
            FASW = MathUtilities.Divide(avail_sw, pot_avail_sw, 0.0);
            WaterDeficit = MathUtilities.Constrain(pot_avail_sw - avail_sw, 0.0, 100000);
        }

        // Get index of the layer that has this depth in it 
        private int GetLayerIndex(double pointDepth)
        {
            double[] cumThickness = soilPhysical.ThicknessCumulative;
            int layerIdx = 0;
            while ((layerIdx < cumThickness.Length) && (pointDepth > cumThickness[layerIdx]))
            {
                layerIdx += 1;
            }

            return layerIdx;
        }
    }
}
```
              Fertiliser
              SurfaceOrganicMatter: InitialResidueName=fallow; InitialResidueType=Sesame; InitialResidueMass=100; InitialStandingFraction=0.5; InitialCPR=0; InitialCNR=55
              Plant Sesame
              Operations Management
              Report DailyReport: EventNames=[Clock].DoReport
              Report HarvestReport: EventNames=[Sesame].Harvesting
      Folder Katherine
        Experiment Katherine
          Factors
            Factor 22 (disabled)
              CompositeFactor Sum_B_RF
                Specifications:
                  [Clock]
                  [Weather]
                  [Management]
                  [Soil]
                  [Initials].Script.ResetDateSM = 01-feb
                  [Initials].Script.ResetDateCN = 08-feb
                  [Initials].Script.InitDepth = 150, 300, 600, 900, 1200
                  [Initials].Script.InitWater = 0.99
                  [Initials].Script.InitNO3N = 15, 1
                  [Initials].Script.InitNH4N = 2, 0.1
                Clock: Start=2023-01-31; End=2023-12-30
                Weather: FileName=Katherine_22_Sum.met
                Operations Management
                  2023-02-09  [Fertiliser].Apply(amount: 30, type: "NO3N");
                  2023-02-15  [Sesame].Sow(population:21.7, cultivar:"S57B", depth:30, rowSpacing:250);
                  2023-03-15  [Fertiliser].Apply(amount: 23, type: "UreaN");
                  2023-07-12  [Sesame].Harvest();
                  2023-07-12  [Sesame].EndCrop()
                Soil Katherine_22_Sum: SoilType=SoilType=loam; Country=Australia; ApsoilNumber=0; Latitude=-14.46851; Longitude=132.2073
                  DataSource=Original source is Soil and Landscape Grid of Australia. See: https://esoil.io/TERNLandscapes/Public/Pages/SLGA/index.html 2025-06-25 21:33:09.149038
                  Comments=resolution=90 m - taxonomic classification name = loam - drainage class = NA - elevation = NA - slope = NA - geomdesc = NA
                  Water: Thickness=[50, 100, 150, 300, 400, 440]; InitialValues=[0.13, 0.13, 0.12, 0.15, 0.16, 0.15]; FilledFromTop=true
                  Physical
                    Thickness  ParticleSizeSand  ParticleSizeSilt  ParticleSizeClay  Rocks  BD    AirDry  LL15  DUL   SAT       KS
                    50         71                12                17                0      1.48  0.065   0.13  0.26  0.391509  634.502
                    100        69                12                18                0      1.49  0.104   0.13  0.27  0.387736  474.462
                    150        66                12                22                0      1.57  0.096   0.12  0.25  0.357547  368.622
                    300        60                12                28                0      1.58  0.15    0.15  0.27  0.353774  166.235
                    400        58                12                30                0      1.6   0.16    0.16  0.27  0.346226  121.655
                    440        51                12                38                0      1.6   0.15    0.15  0.26  0.366226  319.587
                    Rocks source: Calculated
                    SoilCrop SesameSoil: LL=[0.13, 0.13, 0.12, 0.158182, 0.198269, 0.228203]; KL=[0.06, 0.06, 0.06, 0.0559091, 0.0391259, 0.0173437]; XF=[1, 1, 0.905, 0.85, 0.79, 0.755]
                    SoilCrop SoybeanSoil: LL=[0.13, 0.13, 0.12, 0.15472, 0.182078, 0.195117]; KL=[0.06, 0.06, 0.06, 0.0576399, 0.0479573, 0.0353906]; XF=[1, 1, 0.905, 0.85, 0.79, 0.755]
                    SoilCrop WheatSoil: same as Validation.Australia.Katherine.Katherine.Factors.22.Sum_B_RF.Katherine_22_Sum.Physical.SoybeanSoil
                    SoilCrop MaizeSoil: same as Validation.Australia.Katherine.Katherine.Factors.22.Sum_B_RF.Katherine_22_Sum.Physical.SesameSoil
                  WaterBalance SoilWater: SummerDate=1-nov; SummerU=6; SummerCona=6; WinterDate=1-apr; WinterU=4; WinterCona=2.5; DiffusConst=27634.79; DiffusSlope=-13.05; Salb=0.13; CN2Bare=73; CNRed=20; CNCov=0; DischargeWidth=5; CatchmentArea=10; PSIDul=-100
                  Solute NO3: Thickness=[50, 100, 150, 300, 400, 440]; InitialValues=[0.5, 0.495025, 0.490099, 0.485223, 0.480395, 0.475615]; InitialValuesUnits=ppm; WaterTableConcentration=0; D0=0; DepthConstant=0; MaxDepthSoluteAccessible=0; RunoffEffectivenessAtMovingSolute=0; MaxEffectiveRunoff=0
                  Solute NH4: Thickness=[50, 100, 150, 300, 400, 440]; InitialValuesUnits=ppm; WaterTableConcentration=0; D0=0; DepthConstant=0; MaxDepthSoluteAccessible=0; RunoffEffectivenessAtMovingSolute=0; MaxEffectiveRunoff=0
                    InitialValues=[0.05, 0.0495025, 0.0490099, 0.0485223, 0.0480395, 0.0475615]
                  Solute Urea: Thickness=[50, 100, 150, 300, 400, 440]; InitialValues=[0, 0, 0, 0, 0, 0]; InitialValuesUnits=kg/ha; WaterTableConcentration=0; D0=0; DepthConstant=0; MaxDepthSoluteAccessible=0; RunoffEffectivenessAtMovingSolute=0; MaxEffectiveRunoff=0
                  Organic: FOMCNRatio=40; CarbonUnits=Total
                    Thickness  Carbon  SoilCNRatio  FBiom      FInert    FOM
                    50         1.87    12           0.04       0.8       150
                    100        1.4     12           0.0327492  0.80804   122.81
                    150        0.69    12           0.0268128  0.816161  100.548
                    300        0.61    12           0.0219525  0.824364  82.3217
                    400        0.51    12           0.0179732  0.832649  67.3993
                    440        0.4     12           0.0147152  0.841017  55.1819
                  Chemical: Thickness=[50, 100, 150, 300, 400, 440]; PH=[6.2, 6.3, 6.4, 6.5, 6.8, 6.9]; PHUnits=Water
                  Nutrient
                  SoilTemperature Temperature
              CompositeFactor Sum_W103_RF
                Specifications:
                  [Clock]
                  [Weather]
                  [Management]
                  [Soil]
                  [Initials].Script.ResetDateSM = 01-feb
                  [Initials].Script.ResetDateCN = 08-feb
                  [Initials].Script.InitDepth = 150, 300, 600, 900, 1200
                  [Initials].Script.InitWater = 0.99
                  [Initials].Script.InitNO3N = 5, 1
                  [Initials].Script.InitNH4N = 2, 0.1
                Clock: Start=2023-01-31; End=2023-12-30
                Weather: FileName=Katherine_22_Sum.met
                Operations Management
                  2023-02-09  [Fertiliser].Apply(amount: 30, type: "NO3N");
                  2023-02-15  [Sesame].Sow(population:24.1, cultivar:"ES103", depth:30, rowSpacing:250);
                  2023-03-15  [Fertiliser].Apply(amount: 23, type: "UreaN");
                  2023-06-14  [Sesame].Harvest();
                  2023-06-14  [Sesame].EndCrop()
                Soil Katherine_22_Sum: same as Validation.Australia.Katherine.Katherine.Factors.22.Sum_B_RF.Katherine_22_Sum
            Factor 23 (disabled)
              CompositeFactor Win_W103_IR
                Specifications:
                  [Clock]
                  [Weather]
                  [Management]
                  [Soil]
                  [Initials].Script.ResetDateSM = 15-jun
                  [Initials].Script.ResetDateCN = 15-jun
                  [Initials].Script.InitDepth = 150, 300, 600, 900, 1200
                  [Initials].Script.InitWater = 0.05
                  [Initials].Script.InitNO3N = 5, 1
                  [Initials].Script.InitNH4N = 2, 0.1
                Clock: Start=2023-06-01; End=2023-12-30
                Weather: FileName=Katherine_23_Win.met
                Operations Management
                  2023-06-16  [Fertiliser].Apply(amount: 72, type: "NO3N");
                  2023-06-16  [Sesame].Sow(population:10.4, cultivar:"ES103", depth:25, rowSpacing:250);
                  2023-06-20  [Irrigation].Apply(amount:16);
                  2023-06-27  [Irrigation].Apply(amount:19);
                  2023-06-30  [Irrigation].Apply(amount:18);
                  2023-07-04  [Irrigation].Apply(amount:19);
                  2023-07-10  [Irrigation].Apply(amount:7);
                  2023-07-19  [Irrigation].Apply(amount:10);
                  2023-07-27  [Irrigation].Apply(amount:14);
                  2023-07-31  [Irrigation].Apply(amount:19);
                  2023-08-05  [Irrigation].Apply(amount:12);
                  2023-08-11  [Irrigation].Apply(amount:16);
                  2023-08-15  [Irrigation].Apply(amount:18);
                  2023-08-15  [Fertiliser].Apply(amount: 30, type: "UreaN");
                  2023-08-22  [Irrigation].Apply(amount:24);
                  2023-08-29  [Irrigation].Apply(amount:27);
                  2023-09-08  [Irrigation].Apply(amount:25);
                  2023-09-12  [Irrigation].Apply(amount:23);
                  2023-09-15  [Irrigation].Apply(amount:21);
                  2023-09-19  [Irrigation].Apply(amount:0);
                  2023-09-22  [Irrigation].Apply(amount:23);
                  2023-09-26  [Irrigation].Apply(amount:23);
                  2023-09-29  [Irrigation].Apply(amount:23);
                  2023-10-03  [Irrigation].Apply(amount:23);
                  2023-10-06  [Irrigation].Apply(amount:25);
                  2023-10-10  [Irrigation].Apply(amount:23);
                  2023-10-13  [Irrigation].Apply(amount:23);
                  2023-10-17  [Irrigation].Apply(amount:23);
                  2023-10-21  [Irrigation].Apply(amount:23);
                  2023-10-25  [Irrigation].Apply(amount:25);
                  2023-10-30  [Irrigation].Apply(amount:4);
                  2023-11-01  [Irrigation].Apply(amount:20);
                  2023-11-13  [Irrigation].Apply(amount:13);
                  2023-11-20  [Irrigation].Apply(amount:4);
                  2023-11-24  [Irrigation].Apply(amount:49);
                  2023-11-27  [Irrigation].Apply(amount:54);
                  2023-12-04  [Sesame].Harvest();
                  2023-12-04  [Sesame].EndCrop()
                Soil Katherine_23_Win: SoilType=SoilType=loam; Country=Australia; ApsoilNumber=0; Latitude=-14.46851; Longitude=132.2073
                  DataSource=Original source is Soil and Landscape Grid of Australia. See: https://esoil.io/TERNLandscapes/Public/Pages/SLGA/index.html 2025-06-25 21:33:18.435493
                  Comments=resolution=90 m - taxonomic classification name = loam - drainage class = NA - elevation = NA - slope = NA - geomdesc = NA
                  Water: Thickness=[50, 100, 150, 300, 400, 440]; InitialValues=[0.13, 0.13, 0.12, 0.15, 0.16, 0.15]; FilledFromTop=true
                  Physical
                    Thickness  ParticleSizeSand  ParticleSizeSilt  ParticleSizeClay  Rocks  BD    AirDry  LL15  DUL   SAT       KS
                    50         69                12                18                0      1.48  0.065   0.13  0.26  0.391509  634.502
                    100        69                12                18                0      1.49  0.104   0.13  0.27  0.387736  474.462
                    150        66                12                22                0      1.57  0.096   0.12  0.25  0.357547  368.622
                    300        60                12                28                0      1.58  0.15    0.15  0.27  0.353774  166.235
                    400        58                12                30                0      1.6   0.16    0.16  0.27  0.346226  121.655
                    440        51                12                38                0      1.6   0.15    0.15  0.26  0.366226  319.587
                    Rocks source: Calculated
                    SoilCrop SesameSoil: same as Validation.Australia.Katherine.Katherine.Factors.22.Sum_B_RF.Katherine_22_Sum.Physical.SesameSoil
                    SoilCrop SoybeanSoil: same as Validation.Australia.Katherine.Katherine.Factors.22.Sum_B_RF.Katherine_22_Sum.Physical.SoybeanSoil
                    SoilCrop WheatSoil: same as Validation.Australia.Katherine.Katherine.Factors.22.Sum_B_RF.Katherine_22_Sum.Physical.SoybeanSoil
                    SoilCrop MaizeSoil: same as Validation.Australia.Katherine.Katherine.Factors.22.Sum_B_RF.Katherine_22_Sum.Physical.SesameSoil
                  WaterBalance SoilWater: same as Validation.Australia.Katherine.Katherine.Factors.22.Sum_B_RF.Katherine_22_Sum.SoilWater
                  Solute NO3: same as Validation.Australia.Katherine.Katherine.Factors.22.Sum_B_RF.Katherine_22_Sum.NO3
                  Solute NH4: same as Validation.Australia.Katherine.Katherine.Factors.22.Sum_B_RF.Katherine_22_Sum.NH4
                  Solute Urea: same as Validation.Australia.Katherine.Katherine.Factors.22.Sum_B_RF.Katherine_22_Sum.Urea
                  Organic: same as Validation.Australia.Katherine.Katherine.Factors.22.Sum_B_RF.Katherine_22_Sum.Organic
                  Chemical: PHUnits=Water
                    Thickness  PH   CEC
                    50         6.2  13.5035
                    100        6.3  12.579
                    150        6.4  11.8485
                    300        6.5  12.8685
                    400        6.8  13.0435
                    440        6.9  14.463
                    CEC source: Calculated
                  Nutrient
                  SoilTemperature Temperature
              CompositeFactor Win_B_IR
                Specifications:
                  [Clock]
                  [Weather]
                  [Management]
                  [Soil]
                  [Initials].Script.ResetDateSM = 15-jun
                  [Initials].Script.ResetDateCN = 15-jun
                  [Initials].Script.InitDepth = 150, 300, 600, 900, 1200
                  [Initials].Script.InitWater = 0.05
                  [Initials].Script.InitNO3N = 5, 1
                  [Initials].Script.InitNH4N = 2, 0.1
                Clock: Start=2023-06-01; End=2023-12-30
                Weather: FileName=Katherine_23_Win.met
                Operations Management
                  2023-06-16  [Fertiliser].Apply(amount: 72, type: "NO3N");
                  2023-06-16  [Sesame].Sow(population:10.8, cultivar:"S57B", depth:25, rowSpacing:250);
                  2023-06-20  [Irrigation].Apply(amount:16);
                  2023-06-27  [Irrigation].Apply(amount:19);
                  2023-06-30  [Irrigation].Apply(amount:18);
                  2023-07-04  [Irrigation].Apply(amount:19);
                  2023-07-10  [Irrigation].Apply(amount:7);
                  2023-07-19  [Irrigation].Apply(amount:10);
                  2023-07-27  [Irrigation].Apply(amount:14);
                  2023-07-31  [Irrigation].Apply(amount:19);
                  2023-08-05  [Irrigation].Apply(amount:12);
                  2023-08-11  [Irrigation].Apply(amount:16);
                  2023-08-15  [Irrigation].Apply(amount:18);
                  2023-08-15  [Fertiliser].Apply(amount: 30, type: "UreaN");
                  2023-08-22  [Irrigation].Apply(amount:24);
                  2023-08-29  [Irrigation].Apply(amount:27);
                  2023-09-08  [Irrigation].Apply(amount:25);
                  2023-09-12  [Irrigation].Apply(amount:23);
                  2023-09-15  [Irrigation].Apply(amount:21);
                  2023-09-19  [Irrigation].Apply(amount:0);
                  2023-09-22  [Irrigation].Apply(amount:23);
                  2023-09-26  [Irrigation].Apply(amount:23);
                  2023-09-29  [Irrigation].Apply(amount:23);
                  2023-10-03  [Irrigation].Apply(amount:23);
                  2023-10-06  [Irrigation].Apply(amount:25);
                  2023-10-10  [Irrigation].Apply(amount:23);
                  2023-10-13  [Irrigation].Apply(amount:23);
                  2023-10-17  [Irrigation].Apply(amount:23);
                  2023-10-21  [Irrigation].Apply(amount:23);
                  2023-10-25  [Irrigation].Apply(amount:25);
                  2023-10-30  [Irrigation].Apply(amount:4);
                  2023-11-01  [Irrigation].Apply(amount:20);
                  2023-11-13  [Irrigation].Apply(amount:13);
                  2023-11-20  [Irrigation].Apply(amount:4);
                  2023-11-24  [Irrigation].Apply(amount:49);
                  2023-11-27  [Irrigation].Apply(amount:54);
                  2023-12-04  [Sesame].Harvest();
                  2023-12-04  [Sesame].EndCrop()
                Soil Katherine_23_Win: SoilType=SoilType=loam; Country=Australia; ApsoilNumber=0; Latitude=-14.46851; Longitude=132.2073
                  DataSource=Original source is Soil and Landscape Grid of Australia. See: https://esoil.io/TERNLandscapes/Public/Pages/SLGA/index.html 2025-06-25 21:33:18.435493
                  Comments=resolution=90 m - taxonomic classification name = loam - drainage class = NA - elevation = NA - slope = NA - geomdesc = NA
                  Water: Thickness=[50, 100, 150, 300, 400, 440]; InitialValues=[0.13, 0.13, 0.12, 0.15, 0.16, 0.15]; FilledFromTop=true
                  Physical: same as Validation.Australia.Katherine.Katherine.Factors.22.Sum_B_RF.Katherine_22_Sum.Physical
                  WaterBalance SoilWater: same as Validation.Australia.Katherine.Katherine.Factors.22.Sum_B_RF.Katherine_22_Sum.SoilWater
                  Solute NO3: same as Validation.Australia.Katherine.Katherine.Factors.22.Sum_B_RF.Katherine_22_Sum.NO3
                  Solute NH4: same as Validation.Australia.Katherine.Katherine.Factors.22.Sum_B_RF.Katherine_22_Sum.NH4
                  Solute Urea: same as Validation.Australia.Katherine.Katherine.Factors.22.Sum_B_RF.Katherine_22_Sum.Urea
                  Organic: same as Validation.Australia.Katherine.Katherine.Factors.22.Sum_B_RF.Katherine_22_Sum.Organic
                  Chemical: same as Validation.Australia.Katherine.Katherine.Factors.23.Win_W103_IR.Katherine_23_Win.Chemical
                  Nutrient
                  SoilTemperature Temperature
            Factor 24 (disabled)
              CompositeFactor Win_B_IR_Feb
                Specifications:
                  [Clock]
                  [Weather]
                  [Management]
                  [Soil]
                  [Initials].Script.ResetDateSM = 16-feb
                  [Initials].Script.ResetDateCN = 26-feb
                  [Initials].Script.InitDepth = 150, 300, 600, 900, 1200
                  [Initials].Script.InitWater = 0.99
                  [Initials].Script.InitNO3N = 5, 1
                  [Initials].Script.InitNH4N = 2, 0.1
                Clock: Start=2024-02-15; End=2024-09-20
                Weather: FileName=Katherine_24_Win.met
                Operations Management
                  2024-02-27  [Sesame].Sow(population:8.7, cultivar:"S57B", depth:25, rowSpacing:200);
                  2024-02-27  [Fertiliser].Apply(amount: 15, type: "NO3N");
                  2024-06-24  [Fertiliser].Apply(amount: 46, type: "UreaN");
                  2024-05-22  [Irrigation].Apply(amount:34);
                  2024-05-27  [Irrigation].Apply(amount:14);
                  2024-06-05  [Irrigation].Apply(amount:21);
                  2024-06-20  [Irrigation].Apply(amount:23);
                  2024-07-08  [Irrigation].Apply(amount:7);
                  2024-07-12  [Irrigation].Apply(amount:8);
                  2024-07-15  [Irrigation].Apply(amount:8);
                  2024-07-22  [Irrigation].Apply(amount:23);
                  2024-07-31  [Irrigation].Apply(amount:13);
                  2024-08-22  [Sesame].Harvest();
                  2024-08-22  [Sesame].EndCrop()
                Soil Katherine_24_Win: SoilType=SoilType=loam; Country=Australia; ApsoilNumber=0; Latitude=-14.46851; Longitude=132.2073
                  DataSource=Original source is Soil and Landscape Grid of Australia. See: https://esoil.io/TERNLandscapes/Public/Pages/SLGA/index.html 2025-06-25 21:33:27.436464
                  Comments=resolution=90 m - taxonomic classification name = loam - drainage class = NA - elevation = NA - slope = NA - geomdesc = NA
                  Water: Thickness=[50, 100, 150, 300, 400, 440]; InitialValues=[0.13, 0.13, 0.12, 0.15, 0.16, 0.15]; FilledFromTop=true
                  Physical
                    Thickness  ParticleSizeSand  ParticleSizeSilt  ParticleSizeClay  Rocks  BD    AirDry  LL15  DUL   SAT       KS
                    50         71                12                17                0      1.48  0.1     0.13  0.26  0.391509  634.502
                    100        69                12                18                0      1.49  0.1     0.13  0.27  0.387736  474.462
                    150        66                12                22                0      1.57  0.1     0.12  0.25  0.357547  368.622
                    300        60                12                28                0      1.58  0.1     0.15  0.27  0.353774  166.235
                    400        58                12                30                0      1.6   0.1     0.16  0.27  0.346226  121.655
                    440        51                12                38                0      1.6   0.1     0.15  0.26  0.366226  319.587
                    Rocks source: Calculated
                    SoilCrop SesameSoil: LL=[0.1, 0.1, 0.1, 0.1, 0.1, 0.1]; KL=[0.06, 0.06, 0.06, 0.0559091, 0.0391259, 0.0173437]; XF=[1, 1, 0.905, 0.85, 0.79, 0.755]
                    SoilCrop SoybeanSoil: same as Validation.Australia.Katherine.Katherine.Factors.22.Sum_B_RF.Katherine_22_Sum.Physical.SoybeanSoil
                    SoilCrop WheatSoil: same as Validation.Australia.Katherine.Katherine.Factors.22.Sum_B_RF.Katherine_22_Sum.Physical.SoybeanSoil
                    SoilCrop MaizeSoil: same as Validation.Australia.Katherine.Katherine.Factors.22.Sum_B_RF.Katherine_22_Sum.Physical.SesameSoil
                  WaterBalance SoilWater: same as Validation.Australia.Katherine.Katherine.Factors.22.Sum_B_RF.Katherine_22_Sum.SoilWater
                  Solute NO3: same as Validation.Australia.Katherine.Katherine.Factors.22.Sum_B_RF.Katherine_22_Sum.NO3
                  Solute NH4: same as Validation.Australia.Katherine.Katherine.Factors.22.Sum_B_RF.Katherine_22_Sum.NH4
                  Solute Urea: same as Validation.Australia.Katherine.Katherine.Factors.22.Sum_B_RF.Katherine_22_Sum.Urea
                  Organic: same as Validation.Australia.Katherine.Katherine.Factors.22.Sum_B_RF.Katherine_22_Sum.Organic
                  Chemical: same as Validation.Australia.Katherine.Katherine.Factors.23.Win_W103_IR.Katherine_23_Win.Chemical
                  Nutrient
                  SoilTemperature Temperature
              CompositeFactor Win_W103_IR_Feb
                Specifications:
                  [Clock]
                  [Weather]
                  [Management]
                  [Soil]
                  [Initials].Script.ResetDateSM = 16-feb
                  [Initials].Script.ResetDateCN = 26-feb
                  [Initials].Script.InitDepth = 150, 300, 600, 900, 1200
                  [Initials].Script.InitWater = 0.99
                  [Initials].Script.InitNO3N = 5, 1
                  [Initials].Script.InitNH4N = 2, 0.1
                Clock: Start=2024-02-15; End=2024-09-20
                Weather: FileName=Katherine_24_Win.met
                Operations Management
                  2024-02-27  [Sesame].Sow(population:9.2, cultivar:"ES103", depth:25, rowSpacing:200);
                  2024-02-27  [Fertiliser].Apply(amount: 15, type: "NO3N");
                  2024-06-24  [Fertiliser].Apply(amount: 46, type: "UreaN");
                  2024-05-22  [Irrigation].Apply(amount:32);
                  2024-05-27  [Irrigation].Apply(amount:18);
                  2024-06-05  [Irrigation].Apply(amount:23);
                  2024-06-20  [Irrigation].Apply(amount:17);
                  2024-07-08  [Irrigation].Apply(amount:6);
                  2024-07-12  [Irrigation].Apply(amount:6);
                  2024-07-15  [Irrigation].Apply(amount:9);
                  2024-07-22  [Irrigation].Apply(amount:0);
                  2024-07-31  [Irrigation].Apply(amount:16);
                  2024-08-22  [Sesame].Harvest();
                  2024-08-22  [Sesame].EndCrop()
                Soil Katherine_24_Win: same as Validation.Australia.Katherine.Katherine.Factors.24.Win_B_IR_Feb.Katherine_24_Win
              CompositeFactor Win_B_IR_May
                Specifications:
                  [Clock]
                  [Weather]
                  [Management]
                  [Soil]
                  [Initials].Script.ResetDateSM = 07-may
                  [Initials].Script.ResetDateCN = 07-may
                  [Initials].Script.InitDepth = 150, 300, 600, 900, 1200
                  [Initials].Script.InitWater = 0.1
                  [Initials].Script.InitNO3N = 5, 1
                  [Initials].Script.InitNH4N = 2, 0.1
                Clock: Start=2024-05-01; End=2024-11-20
                Weather: FileName=Katherine_24_Win.met
                Operations Management
                  2024-05-08  [Sesame].Sow(population:5.6, cultivar:"S57B", depth:25, rowSpacing:200);
                  2024-05-08  [Fertiliser].Apply(amount: 15, type: "NO3N");
                  2024-06-24  [Fertiliser].Apply(amount: 46, type: "UreaN");
                  2024-05-22  [Irrigation].Apply(amount:34);
                  2024-05-27  [Irrigation].Apply(amount:14);
                  2024-06-05  [Irrigation].Apply(amount:21);
                  2024-06-20  [Irrigation].Apply(amount:23);
                  2024-07-08  [Irrigation].Apply(amount:7);
                  2024-07-12  [Irrigation].Apply(amount:8);
                  2024-07-15  [Irrigation].Apply(amount:8);
                  2024-07-22  [Irrigation].Apply(amount:23);
                  2024-07-31  [Irrigation].Apply(amount:13);
                  2024-11-05  [Sesame].Harvest();
                  2024-11-05  [Sesame].EndCrop()
                Soil Katherine_24_Win: same as Validation.Australia.Katherine.Katherine.Factors.24.Win_B_IR_Feb.Katherine_24_Win
              CompositeFactor Win_W103_IR_May
                Specifications:
                  [Clock]
                  [Weather]
                  [Management]
                  [Soil]
                  [Initials].Script.ResetDateSM = 07-may
                  [Initials].Script.ResetDateCN = 07-may
                  [Initials].Script.InitDepth = 150, 300, 600, 900, 1200
                  [Initials].Script.InitWater = 0.1
                  [Initials].Script.InitNO3N = 5, 1
                  [Initials].Script.InitNH4N = 2, 0.1
                Clock: Start=2024-05-01; End=2024-11-20
                Weather: FileName=Katherine_24_Win.met
                Operations Management
                  2024-05-08  [Sesame].Sow(population:12.3, cultivar:"ES103", depth:25, rowSpacing:200);
                  2024-05-08  [Fertiliser].Apply(amount: 15, type: "NO3N");
                  2024-06-24  [Fertiliser].Apply(amount: 46, type: "UreaN");
                  2024-05-22  [Irrigation].Apply(amount:32);
                  2024-05-27  [Irrigation].Apply(amount:18);
                  2024-06-05  [Irrigation].Apply(amount:23);
                  2024-06-20  [Irrigation].Apply(amount:17);
                  2024-07-08  [Irrigation].Apply(amount:6);
                  2024-07-12  [Irrigation].Apply(amount:6);
                  2024-07-15  [Irrigation].Apply(amount:9);
                  2024-07-22  [Irrigation].Apply(amount:0);
                  2024-07-31  [Irrigation].Apply(amount:16);
                  2024-11-05  [Sesame].Harvest();
                  2024-11-05  [Sesame].EndCrop()
                Soil Katherine_24_Win: same as Validation.Australia.Katherine.Katherine.Factors.24.Win_B_IR_Feb.Katherine_24_Win
              CompositeFactor Win_W313_IR_May
                Specifications:
                  [Clock]
                  [Weather]
                  [Management]
                  [Soil]
                  [Initials].Script.ResetDateSM = 07-may
                  [Initials].Script.ResetDateCN = 07-may
                  [Initials].Script.InitDepth = 150, 300, 600, 900, 1200
                  [Initials].Script.InitWater = 0.1
                  [Initials].Script.InitNO3N = 5, 1
                  [Initials].Script.InitNH4N = 2, 0.1
                Clock: Start=2024-05-01; End=2024-11-20
                Weather: FileName=Katherine_24_Win.met
                Operations Management
                  2024-05-08  [Sesame].Sow(population:12.7, cultivar:"ES313", depth:25, rowSpacing:200);
                  2024-05-08  [Fertiliser].Apply(amount: 15, type: "NO3N");
                  2024-06-24  [Fertiliser].Apply(amount: 46, type: "UreaN");
                  2024-05-22  [Irrigation].Apply(amount:32);
                  2024-05-27  [Irrigation].Apply(amount:18);
                  2024-06-05  [Irrigation].Apply(amount:23);
                  2024-06-20  [Irrigation].Apply(amount:17);
                  2024-07-08  [Irrigation].Apply(amount:6);
                  2024-07-12  [Irrigation].Apply(amount:6);
                  2024-07-15  [Irrigation].Apply(amount:9);
                  2024-07-22  [Irrigation].Apply(amount:0);
                  2024-07-31  [Irrigation].Apply(amount:16);
                  2024-10-17  [Sesame].Harvest();
                  2024-10-17  [Sesame].EndCrop()
                Soil Katherine_24_Win: same as Validation.Australia.Katherine.Katherine.Factors.24.Win_B_IR_Feb.Katherine_24_Win
          Simulation KatherineBase
            Clock: Start=2023-01-01; End=2025-12-30
            Summary summaryfile
            Weather: FileName=Katherine.met
            SoilArbitrator Soil Arbitrator
            Zone paddock: Area=1; Slope=0; AspectAngle=0; Altitude=50
              Soil: ASCOrder=NA; ASCSubOrder=NA; SoilType=Aric Regosols; Site=NA; NearestTown=NA; Region=NA; State=NA; Country=Iran; NaturalVegetation=NA; ApsoilNumber=9999; Latitude=35.375; Longitude=59.375; LocationAccuracy=+- 250 m; YearOfSampling=2019; DataSource=ISRIC SoilGrids
                Water: Thickness=[150, 150, 150, 150, 200, 200, 200, 200, 300, 300]; FilledFromTop=false
                  InitialValues=[0.214, 0.214, 0.214, 0.214, 0.214, 0.21, 0.21, 0.21, 0.21, 0.21]
                Physical
                  Thickness  ParticleSizeSand  ParticleSizeSilt  ParticleSizeClay  Rocks  BD   AirDry  LL15  DUL   SAT    KS
                  150        47.7              34                18.3              0      1.3  0.067   0.18  0.35  0.43   40.291
                  150        46                33.5              20.5              0      1.3  0.068   0.18  0.35  0.43   29.005
                  150        45.2              32.8              22                0      1.3  0.069   0.18  0.35  0.427  25.09
                  150        45.8              32.2              22                0.109  1.3  0.068   0.18  0.35  0.422  26.588
                  200        46.5              31.8              21.7              0.12   1.3  0.067   0.18  0.35  0.417  28.176
                  200        47.5              31.2              21.3              0.128  1.3  0.067   0.18  0.33  0.413  29.859
                  200        48                31                21                0.135  1.3  0.067   0.18  0.33  0.41   30.737
                  200        48                31                21                0.135  1.3  0.067   0.18  0.33  0.41   30.737
                  300        48                31                21                0.135  1.3  0.067   0.18  0.33  0.41   30.737
                  300        48                31                21                0.135  1.3  0.067   0.18  0.33  0.41   30.737
                  SoilCrop SesameSoil
                    LL=[0.2, 0.205, 0.208, 0.213, 0.224, 0.239, 0.255, 0.271, 0.29, 0.313]
                    KL=[0.06, 0.06, 0.06, 0.055, 0.048, 0.04, 0.032, 0.024, 0.014, 0.003]
                    XF=[1, 1, 1, 1, 1, 1, 1, 1, 1, 1]
                  SoilCrop SoybeanSoil: same as Validation.Australia.Katherine.Katherine.KatherineBase.paddock.Soil.Physical.SesameSoil
                  SoilCrop CanolaSoil: same as Validation.Australia.Katherine.Katherine.KatherineBase.paddock.Soil.Physical.SesameSoil
                  SoilCrop SorghumSoil
                    LL=[0.2, 0.205, 0.208, 0.21, 0.218, 0.23, 0.241, 0.253, 0.268, 0.285]
                    KL=[0.07, 0.07, 0.07, 0.066, 0.06, 0.053, 0.045, 0.039, 0.03, 0.019]
                    XF=[1, 1, 1, 1, 1, 1, 1, 1, 1, 1]
                  SoilCrop PeanutSoil
                    LL=[0.2, 0.205, 0.208, 0.203, 0.21, 0.23, 0.249, 0.269, 0.293, 0.316]
                    KL=[0.06, 0.06, 0.06, 0.06, 0.055, 0.045, 0.035, 0.025, 0.012, 0.001]
                    XF=[1, 1, 1, 1, 1, 1, 1, 1, 1, 1]
                  SoilCrop MungbeanSoil
                    LL=[0.2, 0.205, 0.208, 0.207, 0.224, 0.247, 0.271, 0.294, 0.316, 0.318]
                    KL=[0.06, 0.06, 0.06, 0.058, 0.048, 0.036, 0.024, 0.012, 0.001, 0]
                    XF=[1, 1, 1, 1, 1, 1, 1, 1, 1, 0]
                WaterBalance SoilWater: SummerDate=1-may; SummerU=6; SummerCona=6; WinterDate=1-oct; WinterU=2; WinterCona=2; DiffusConst=79.36; DiffusSlope=32.89; Salb=0.13; CN2Bare=73; CNRed=20; CNCov=0; DischargeWidth=5; CatchmentArea=10; PSIDul=-100
                Organic: FOMCNRatio=40; CarbonUnits=Total
                  Thickness  Carbon  SoilCNRatio  FBiom  FInert  FOM
                  150        0.954   8            0.04   0.436   36.386
                  150        0.731   8            0.031  0.563   29.055
                  150        0.515   8            0.014  0.786   23.201
                  150        0.449   8            0.01   0.888   18.526
                  200        0.398   8            0.01   0.99    13.725
                  200        0.359   8            0.01   0.99    10.167
                  200        0.342   8            0.01   0.99    7.532
                  200        0.347   8            0.01   0.99    5.58
                  300        0.353   8            0.01   0.99    3.558
                  300        0.361   8            0.01   0.99    2.269
                Chemical: PHUnits=Water
                  Thickness  PH   CEC
                  150        6.5  10.3353
                  150        6.5  10.46725
                  150        6.5  10.2748
                  150        6.5  10.0063
                  200        6.5  9.8316
                  200        6.5  9.65065
                  200        6.5  9.5925
                  200        6.5  9.60375
                  300        6.5  9.61725
                  300        6.5  9.63525
                  CEC source: Calculated
                Nutrient
                Solute NO3: Thickness=[150, 150, 150, 150, 200, 200, 200, 200, 300, 300]; InitialValues=[5, 5, 5, 3, 3, 3, 2, 2, 1, 1]; InitialValuesUnits=kg/ha; WaterTableConcentration=0; D0=0; DepthConstant=0; MaxDepthSoluteAccessible=0; RunoffEffectivenessAtMovingSolute=0; MaxEffectiveRunoff=0
                Solute NH4: Thickness=[150, 150, 150, 150, 200, 200, 200, 200, 300, 300]; InitialValues=[2, 2, 1, 1, 1, 1, 0, 0, 0, 0]; InitialValuesUnits=kg/ha; WaterTableConcentration=0; D0=0; DepthConstant=0; MaxDepthSoluteAccessible=0; RunoffEffectivenessAtMovingSolute=0; MaxEffectiveRunoff=0
                Solute Urea: Thickness=[150, 150, 150, 150, 200, 200, 200, 200, 300, 300]; InitialValues=[0, 0, 0, 0, 0, 0, 0, 0, 0, 0]; InitialValuesUnits=kg/ha; WaterTableConcentration=0; D0=0; DepthConstant=0; MaxDepthSoluteAccessible=0; RunoffEffectivenessAtMovingSolute=0; MaxEffectiveRunoff=0
                SoilTemperature CERESSoilTemperature
              Manager Initials
                ResetDate = 1-may
                ResetWaterAndCN = Yes
                ResetSOM = Yes
                InitDepth = 150, 300, 600, 900, 1200
                InitWater =
                InitNO3N =
                InitNH4N =
                InitOC =
              MicroClimate: a_interception=0; b_interception=1; c_interception=0; d_interception=0; SoilHeatFluxFraction=0.4; MinimumHeightDiffForNewLayer=0; NightInterceptionFraction=0.5; ReferenceHeight=2
              Manager CO2Trend
                C3 = 1.5264E-08
                C2 = 7.93268e-05
                C1 = 0.0578807
                C0 = 314.79058
                Target = -1
                RCP = RCP85
                KeepAt = -1
                KeepAtYear = -1
              Irrigation
              Fertiliser
              SurfaceOrganicMatter: InitialResidueName=fallow; InitialResidueType=Sesame; InitialResidueMass=0; InitialStandingFraction=0; InitialCPR=0; InitialCNR=55
              Plant Sesame
              Operations Management
              Report DailyReport: EventNames=[Clock].DoReport
              Report HarvestReport: EventNames=[Sesame].Harvesting
      Folder Kununurra
        Experiment Kununurra
          Factors
            Factor 24
              Memo
                All initial values were measured.
              CompositeFactor Sum_W3301_0_IR_Dec
                Specifications:
                  [Clock]
                  [Weather]
                  [Management]
                  [Soil]
                  [Initials].Script.ResetDateSM = 13-dec
                  [Initials].Script.ResetDateCN = 20-sep
                  [Initials].Script.InitDepth = 150, 300, 600, 900, 1200
                  [Initials].Script.InitWater = 0.182, 0.209, 0.219, 0.214, 0.218
                  [Initials].Script.InitNO3N = 9, 7, 7, 6, 6
                  [Initials].Script.InitNH4N = 26, 3, 4, 5, 7
                Clock: Start=2024-09-19; End=2025-03-30
                Operations Management
                  2024-12-05  [Irrigation].Apply(amount:100);
                  2024-12-12  [Fertiliser].Apply(amount: 0, type: "UreaN");
                  2024-12-12  [Sesame].Sow(population:26.7, cultivar:"S3301", depth:25, rowSpacing:225);
                  2025-03-07  [Sesame].Harvest();
                  2025-03-07  [Sesame].EndCrop()
                Soil Kununurra_24_Sum: SoilType=SoilType=loamy sand; State=Western Australia; Country=Australia; ApsoilNumber=0; Latitude=-15.7783; Longitude=128.7439
                  DataSource=Original source is Soil and Landscape Grid of Australia. See: https://esoil.io/TERNLandscapes/Public/Pages/SLGA/index.html 2025-06-25 21:33:58.46834
                  Comments=resolution=90 m - taxonomic classification name = loamy sand - drainage class = NA - elevation = NA - slope = NA - geomdesc = NA
                  Water: Thickness=[50, 100, 150, 300, 400, 220]; InitialValues=[0.05, 0.04, 0.04, 0.05, 0.05, 0.07]; FilledFromTop=true
                  Physical
                    Thickness  ParticleSizeSand  ParticleSizeSilt  ParticleSizeClay  Rocks  BD    AirDry  LL15  DUL   SAT       KS
                    50         89                5                 7                 0      1.57  0.025   0.05  0.19  0.337547  1210.71
                    100        88                5                 7                 0      1.58  0.032   0.04  0.18  0.333774  1467.69
                    150        87                5                 8                 0      1.61  0.032   0.04  0.17  0.322453  1395.2
                    300        85                6                 10                0      1.64  0.05    0.05  0.17  0.331132  1449.8
                    400        82                6                 12                0      1.65  0.05    0.05  0.16  0.327358  1559.9
                    220        77                8                 15                0      1.65  0.07    0.07  0.19  0.327358  840.772
                    Rocks source: Calculated
                    SoilCrop SesameSoil: LL=[0.05, 0.04, 0.04, 0.0585921, 0.089179, 0.144702]; KL=[0.06, 0.06, 0.06, 0.055704, 0.0386297, 0.0226491]; XF=[1, 0.99, 0.91, 0.825, 0.785, 0.76]
                    SoilCrop SoybeanSoil: LL=[0.05, 0.04, 0.04, 0.054957, 0.0726033, 0.113097]; KL=[0.06, 0.06, 0.06, 0.0575215, 0.047671, 0.0384514]; XF=[1, 0.99, 0.91, 0.825, 0.785, 0.76]
                    SoilCrop WheatSoil: same as Validation.Australia.Kununurra.Kununurra.Factors.24.Sum_W3301_0_IR_Dec.Kununurra_24_Sum.Physical.SoybeanSoil
                    SoilCrop MaizeSoil: same as Validation.Australia.Kununurra.Kununurra.Factors.24.Sum_W3301_0_IR_Dec.Kununurra_24_Sum.Physical.SesameSoil
                  WaterBalance SoilWater: SummerDate=1-nov; SummerU=6; SummerCona=6; WinterDate=1-apr; WinterU=4; WinterCona=2.5; DiffusConst=27634.79; DiffusSlope=-13.05; Salb=0.16; CN2Bare=68; CNRed=20; CNCov=0; DischargeWidth=5; CatchmentArea=10; PSIDul=-100
                  Solute NO3: Thickness=[50, 100, 150, 300, 400, 220]; InitialValues=[0.5, 0.495025, 0.490099, 0.485223, 0.480395, 0.475615]; InitialValuesUnits=ppm; WaterTableConcentration=0; D0=0; DepthConstant=0; MaxDepthSoluteAccessible=0; RunoffEffectivenessAtMovingSolute=0; MaxEffectiveRunoff=0
                  Solute NH4: Thickness=[50, 100, 150, 300, 400, 220]; InitialValuesUnits=ppm; WaterTableConcentration=0; D0=0; DepthConstant=0; MaxDepthSoluteAccessible=0; RunoffEffectivenessAtMovingSolute=0; MaxEffectiveRunoff=0
                    InitialValues=[0.05, 0.0495025, 0.0490099, 0.0485223, 0.0480395, 0.0475615]
                  Solute Urea: Thickness=[50, 100, 150, 300, 400, 220]; InitialValues=[0, 0, 0, 0, 0, 0]; InitialValuesUnits=kg/ha; WaterTableConcentration=0; D0=0; DepthConstant=0; MaxDepthSoluteAccessible=0; RunoffEffectivenessAtMovingSolute=0; MaxEffectiveRunoff=0
                  Organic: FOMCNRatio=40; CarbonUnits=Total
                    Thickness  Carbon  SoilCNRatio  FBiom      FInert    FOM
                    50         0.77    12           0.04       0.8       150
                    100        0.61    12           0.0327492  0.80804   122.81
                    150        0.47    12           0.0268128  0.816161  100.548
                    300        0.48    12           0.0219525  0.824364  82.3217
                    400        0.25    12           0.0179732  0.832649  67.3993
                    220        0.2     12           0.0147152  0.841017  55.1819
                  Chemical: Thickness=[50, 100, 150, 300, 400, 220]; PH=[6.6, 6.7, 6.8, 6.8, 6.8, 7]; PHUnits=Water
                  Nutrient
                  SoilTemperature Temperature
                Weather: FileName=Kununurra_24_Sum.met
              CompositeFactor Sum_W3301_40_IR_Dec
                Specifications:
                  [Clock]
                  [Weather]
                  [Management]
                  [Soil]
                  [Initials].Script.ResetDateSM = 13-dec
                  [Initials].Script.ResetDateCN = 20-sep
                  [Initials].Script.InitDepth = 150, 300, 600, 900, 1200
                  [Initials].Script.InitWater = 0.183, 0.211, 0.213, 0.208, 0.220
                  [Initials].Script.InitNO3N = 12, 10, 8, 7, 8
                  [Initials].Script.InitNH4N = 134, 13, 8, 6, 8
                Clock: Start=2024-09-19; End=2025-03-30
                Weather: FileName=Kununurra_24_Sum.met
                Operations Management
                  2024-12-05  [Irrigation].Apply(amount:100);
                  2024-12-12  [Fertiliser].Apply(amount: 46, type: "UreaN");
                  2024-12-12  [Sesame].Sow(population:18.6, cultivar:"S3301", depth:25, rowSpacing:225);
                  2025-03-07  [Sesame].Harvest();
                  2025-03-07  [Sesame].EndCrop()
                Soil Kununurra_24_Sum: same as Validation.Australia.Kununurra.Kununurra.Factors.24.Sum_W3301_0_IR_Dec.Kununurra_24_Sum
              CompositeFactor Sum_W3301_80_IR_Dec
                Specifications:
                  [Clock]
                  [Weather]
                  [Management]
                  [Soil]
                  [Initials].Script.ResetDateSM = 13-dec
                  [Initials].Script.ResetDateCN = 20-sep
                  [Initials].Script.InitDepth = 150, 300, 600, 900, 1200
                  [Initials].Script.InitWater = 0.183, 0.207, 0.207, 0.207, 0.216
                  [Initials].Script.InitNO3N = 5, 7, 7, 7, 6
                  [Initials].Script.InitNH4N = 26, 3, 4, 5, 7
                Clock: Start=2024-09-19; End=2025-03-30
                Weather: FileName=Kununurra_24_Sum.met
                Operations Management
                  2024-12-05  [Irrigation].Apply(amount:100);
                  2024-12-12  [Fertiliser].Apply(amount: 83, type: "UreaN");
                  2024-12-12  [Sesame].Sow(population:17.3, cultivar:"S3301", depth:25, rowSpacing:225);
                  2025-03-07  [Sesame].Harvest();
                  2025-03-07  [Sesame].EndCrop()
                Soil Kununurra_24_Sum: same as Validation.Australia.Kununurra.Kununurra.Factors.24.Sum_W3301_0_IR_Dec.Kununurra_24_Sum
              CompositeFactor Sum_W3301_120_IR_Dec (disabled)
                Specifications:
                  [Clock]
                  [Weather]
                  [Management]
                  [Soil]
                  [Initials].Script.ResetDateSM = 13-dec
                  [Initials].Script.ResetDateCN = 20-sep
                  [Initials].Script.InitDepth = 150, 300, 600, 900, 1200
                  [Initials].Script.InitWater = 0.178, 0.204, 0.202, 0.204, 0.209
                  [Initials].Script.InitNO3N = 5, 8, 8, 7, 6
                  [Initials].Script.InitNH4N = 160, 10, 9, 5, 9
                Clock: Start=2024-09-19; End=2025-03-30
                Weather: FileName=Kununurra_24_Sum.met
                Operations Management
                  2024-12-05  [Irrigation].Apply(amount:100);
                  2024-12-12  [Fertiliser].Apply(amount: 124, type: "UreaN");
                  2024-12-12  [Sesame].Sow(population:20.8, cultivar:"S3301", depth:25, rowSpacing:225);
                  2025-03-07  [Sesame].Harvest();
                  2025-03-07  [Sesame].EndCrop()
                Soil Kununurra_24_Sum: SoilType=SoilType=loamy sand; State=Western Australia; Country=Australia; ApsoilNumber=0; Latitude=-15.7783; Longitude=128.7439
                  DataSource=Original source is Soil and Landscape Grid of Australia. See: https://esoil.io/TERNLandscapes/Public/Pages/SLGA/index.html 2025-06-25 21:33:58.46834
                  Comments=resolution=90 m - taxonomic classification name = loamy sand - drainage class = NA - elevation = NA - slope = NA - geomdesc = NA
                  Water: Thickness=[50, 100, 150, 300, 400, 220]; InitialValues=[0.05, 0.04, 0.04, 0.05, 0.05, 0.07]; FilledFromTop=true
                  Physical
                    Thickness  ParticleSizeSand  ParticleSizeSilt  ParticleSizeClay  Rocks  BD    AirDry  LL15  DUL   SAT       KS
                    50         89                5                 7                 0      1.57  0.025   0.05  0.19  0.337547  1210.71
                    100        88                5                 7                 0      1.58  0.032   0.04  0.18  0.333774  1467.69
                    150        87                5                 8                 0      1.61  0.032   0.04  0.17  0.322453  1395.2
                    300        85                6                 10                0      1.64  0.05    0.05  0.17  0.331132  1449.8
                    400        82                6                 12                0      1.65  0.05    0.05  0.16  0.327358  1559.9
                    220        77                8                 15                0      1.65  0.07    0.07  0.19  0.327358  840.772
                    Rocks source: Calculated
                    SoilCrop SesameSoil: LL=[0.05, 0.04, 0.04, 0.0585921, 0.089179, 0.144702]; KL=[0.06, 0.06, 0.06, 0.055704, 0.0386297, 0.0226491]; XF=[1, 0.99, 0.91, 0.825, 0.785, 0.76]
                    SoilCrop SoybeanSoil: LL=[0.05, 0.04, 0.04, 0.054957, 0.0726033, 0.113097]; KL=[0.06, 0.06, 0.06, 0.0575215, 0.047671, 0.0384514]; XF=[1, 0.99, 0.91, 0.825, 0.785, 0.76]
                    SoilCrop WheatSoil: same as Validation.Australia.Kununurra.Kununurra.Factors.24.Sum_W3301_120_IR_Dec.Kununurra_24_Sum.Physical.SoybeanSoil
                    SoilCrop MaizeSoil: same as Validation.Australia.Kununurra.Kununurra.Factors.24.Sum_W3301_120_IR_Dec.Kununurra_24_Sum.Physical.SesameSoil
                  WaterBalance SoilWater: SummerDate=1-nov; SummerU=6; SummerCona=6; WinterDate=1-apr; WinterU=4; WinterCona=2.5; DiffusConst=27634.79; DiffusSlope=-13.05; Salb=0.16; CN2Bare=68; CNRed=20; CNCov=0; DischargeWidth=5; CatchmentArea=10; PSIDul=-100
                  Solute NO3: Thickness=[50, 100, 150, 300, 400, 220]; InitialValues=[0.5, 0.495025, 0.490099, 0.485223, 0.480395, 0.475615]; InitialValuesUnits=ppm; WaterTableConcentration=0; D0=0; DepthConstant=0; MaxDepthSoluteAccessible=0; RunoffEffectivenessAtMovingSolute=0; MaxEffectiveRunoff=0
                  Solute NH4: Thickness=[50, 100, 150, 300, 400, 220]; InitialValuesUnits=ppm; WaterTableConcentration=0; D0=0; DepthConstant=0; MaxDepthSoluteAccessible=0; RunoffEffectivenessAtMovingSolute=0; MaxEffectiveRunoff=0
                    InitialValues=[0.05, 0.0495025, 0.0490099, 0.0485223, 0.0480395, 0.0475615]
                  Solute Urea: Thickness=[50, 100, 150, 300, 400, 220]; InitialValues=[0, 0, 0, 0, 0, 0]; InitialValuesUnits=kg/ha; WaterTableConcentration=0; D0=0; DepthConstant=0; MaxDepthSoluteAccessible=0; RunoffEffectivenessAtMovingSolute=0; MaxEffectiveRunoff=0
                  Organic: FOMCNRatio=40; CarbonUnits=Total
                    Thickness  Carbon  SoilCNRatio  FBiom      FInert    FOM
                    50         0.77    12           0.04       0.8       150
                    100        0.61    12           0.0327492  0.80804   122.81
                    150        0.47    12           0.0268128  0.816161  100.548
                    300        0.48    12           0.0219525  0.824364  82.3217
                    400        0.25    12           0.0179732  0.832649  67.3993
                    220        0.2     12           0.0147152  0.841017  55.1819
                  Chemical: Thickness=[50, 100, 150, 300, 400, 220]; PH=[6.6, 6.7, 6.8, 6.8, 6.8, 7]; PHUnits=Water
                  Nutrient
                  SoilTemperature Temperature
          Simulation KununurraBase
            Clock: Start=2023-01-01; End=2025-12-30
            Summary summaryfile
            Weather: FileName=Kununurra.met
            SoilArbitrator Soil Arbitrator
            Zone paddock: Area=1; Slope=0; AspectAngle=0; Altitude=50
              Soil: ASCOrder=NA; ASCSubOrder=NA; SoilType=Aric Regosols; Site=NA; NearestTown=NA; Region=NA; State=NA; Country=Iran; NaturalVegetation=NA; ApsoilNumber=9999; Latitude=35.375; Longitude=59.375; LocationAccuracy=+- 250 m; YearOfSampling=2019; DataSource=ISRIC SoilGrids
                Water: Thickness=[150, 150, 150, 150, 200, 200, 200, 200, 300, 300]; FilledFromTop=false
                  InitialValues=[0.226, 0.231, 0.233, 0.227, 0.224, 0.224, 0.224, 0.224, 0.224, 0.224]
                Physical
                  Thickness  ParticleSizeSand  ParticleSizeSilt  ParticleSizeClay  BD   AirDry  LL15   DUL    SAT    KS
                  150        47.7              34                18.7              1.3  0.067   0.2    0.328  0.43   40.291
                  150        46                33.5              21.5              1.3  0.068   0.205  0.334  0.43   29.005
                  150        45.2              32.8              22.8              1.3  0.069   0.208  0.334  0.427  25.09
                  150        45.8              32.2              22.2              1.3  0.068   0.203  0.324  0.422  26.588
                  200        46.5              31.8              21.8              1.3  0.067   0.2    0.319  0.417  28.176
                  200        47.5              31.2              21.2              1.3  0.067   0.2    0.318  0.413  29.859
                  200        48                31                21                1.3  0.067   0.2    0.318  0.41   30.737
                  200        48                31                21                1.3  0.067   0.2    0.318  0.41   30.737
                  300        48                31                21                1.3  0.067   0.2    0.318  0.41   30.737
                  300        48                31                21                1.3  0.067   0.2    0.318  0.41   30.737
                  SoilCrop SesameSoil
                    LL=[0.2, 0.205, 0.208, 0.213, 0.224, 0.239, 0.255, 0.271, 0.29, 0.313]
                    KL=[0.06, 0.06, 0.06, 0.055, 0.048, 0.04, 0.032, 0.024, 0.014, 0.003]
                    XF=[1, 1, 1, 1, 1, 1, 1, 1, 1, 1]
                  SoilCrop SoybeanSoil
                    LL=[0.2, 0.205, 0.208, 0.213, 0.224, 0.239, 0.255, 0.271, 0.29, 0.313]
                    KL=[0.06, 0.06, 0.06, 0.055, 0.048, 0.04, 0.032, 0.024, 0.014, 0.003]
                    XF=[1, 1, 1, 1, 1, 1, 1, 1, 1, 1]
                  SoilCrop CanolaSoil
                    LL=[0.2, 0.205, 0.208, 0.213, 0.224, 0.239, 0.255, 0.271, 0.29, 0.313]
                    KL=[0.06, 0.06, 0.06, 0.055, 0.048, 0.04, 0.032, 0.024, 0.014, 0.003]
                    XF=[1, 1, 1, 1, 1, 1, 1, 1, 1, 1]
                  SoilCrop SorghumSoil
                    LL=[0.2, 0.205, 0.208, 0.21, 0.218, 0.23, 0.241, 0.253, 0.268, 0.285]
                    KL=[0.07, 0.07, 0.07, 0.066, 0.06, 0.053, 0.045, 0.039, 0.03, 0.019]
                    XF=[1, 1, 1, 1, 1, 1, 1, 1, 1, 1]
                  SoilCrop PeanutSoil
                    LL=[0.2, 0.205, 0.208, 0.203, 0.21, 0.23, 0.249, 0.269, 0.293, 0.316]
                    KL=[0.06, 0.06, 0.06, 0.06, 0.055, 0.045, 0.035, 0.025, 0.012, 0.001]
                    XF=[1, 1, 1, 1, 1, 1, 1, 1, 1, 1]
                  SoilCrop MungbeanSoil
                    LL=[0.2, 0.205, 0.208, 0.207, 0.224, 0.247, 0.271, 0.294, 0.316, 0.318]
                    KL=[0.06, 0.06, 0.06, 0.058, 0.048, 0.036, 0.024, 0.012, 0.001, 0]
                    XF=[1, 1, 1, 1, 1, 1, 1, 1, 1, 0]
                WaterBalance SoilWater: same as Validation.Australia.Katherine.Katherine.KatherineBase.paddock.Soil.SoilWater
                Organic: same as Validation.Australia.Katherine.Katherine.KatherineBase.paddock.Soil.Organic
                Chemical: Thickness=[150, 150, 150, 150, 200, 200, 200, 200, 300, 300]; PH=[6.5, 6.5, 6.5, 6.5, 6.5, 6.5, 6.5, 6.5, 6.5, 6.5]; PHUnits=Water
                Nutrient
                Solute NO3: same as Validation.Australia.Katherine.Katherine.KatherineBase.paddock.Soil.NH4
                Solute NH4: Thickness=[150, 150, 150, 150, 200, 200, 200, 200, 300, 300]; InitialValues=[0.5, 0.4, 0.4, 0.4, 0, 0, 0, 0, 0, 0]; InitialValuesUnits=kg/ha; WaterTableConcentration=0; D0=0; DepthConstant=0; MaxDepthSoluteAccessible=0; RunoffEffectivenessAtMovingSolute=0; MaxEffectiveRunoff=0
                Solute Urea: same as Validation.Australia.Katherine.Katherine.KatherineBase.paddock.Soil.Urea
                SoilTemperature CERESSoilTemperature
              Manager Initials
                ResetDate = 1-may
                ResetWaterAndCN = Yes
                ResetSOM = Yes
                InitDepth = 150, 300, 600, 900, 1200
                InitWater =
                InitNO3N =
                InitNH4N =
                InitOC =
              MicroClimate: a_interception=0; b_interception=1; c_interception=0; d_interception=0; SoilHeatFluxFraction=0.4; MinimumHeightDiffForNewLayer=0; NightInterceptionFraction=0.5; ReferenceHeight=2
              Manager CO2Trend
                C3 = 1.5264E-08
                C2 = 7.93268e-05
                C1 = 0.0578807
                C0 = 314.79058
                Target = -1
                RCP = RCP85
                KeepAt = -1
                KeepAtYear = -1
              Irrigation
              Fertiliser
              SurfaceOrganicMatter: InitialResidueName=fallow; InitialResidueType=Sesame; InitialResidueMass=0; InitialStandingFraction=0; InitialCPR=0; InitialCNR=55
              Plant Sesame
              Operations Management
              Report DailyReport: EventNames=[Clock].DoReport
              Report HarvestReport: EventNames=[Sesame].Harvesting
      Folder Tully
        Experiment Tully
          Factors
            Factor 22
              Memo
                No maturity and biomass data. Extremely low yield
              CompositeFactor Sum_W103_RF
                Specifications:
                  [Clock]
                  [Weather]
                  [Management]
                  [Soil]
                  [Initials].Script.ResetDateSM = 11-feb
                  [Initials].Script.ResetDateCN = 11-feb
                  [Initials].Script.InitDepth = 150, 300, 600, 900, 1200
                  [Initials].Script.InitWater = 0.1, 0.1, 0.1, 0.1, 0.1
                  [Initials].Script.InitNO3N = 5, 2, 1, 1, 1
                  [Initials].Script.InitNH4N = 2, 1, 1, 0.1, 0.1
                Clock: Start=2023-02-05; End=2023-06-30
                Weather: FileName=Tully_22_Sum.met
                Operations Management
                  2023-02-12  [Fertiliser].Apply(amount: 200, type: "DAP");
                  2023-02-12  [Sesame].Sow(population:19.7, cultivar:"ES103", depth:25, rowSpacing:300);
                  2023-02-14  [Irrigation].Apply(amount:20);
                  2023-06-29  [Sesame].Harvest();
                  2023-06-29  [Sesame].EndCrop()
                Soil Tully_22_Sum: SoilType=SoilType=clay loam; State=Queensland; Country=Australia; ApsoilNumber=0; Latitude=-18.13305; Longitude=145.9146
                  DataSource=Original source is Soil and Landscape Grid of Australia. See: https://esoil.io/TERNLandscapes/Public/Pages/SLGA/index.html 2025-06-25 21:34:10.410156
                  Comments=resolution=90 m - taxonomic classification name = clay loam - drainage class = NA - elevation = NA - slope = NA - geomdesc = NA
                  Water: Thickness=[50, 100, 150, 300, 400, 90]; InitialValues=[0.11, 0.13, 0.12, 0.14, 0.15, 0.15]; FilledFromTop=true
                  Physical
                    Thickness  ParticleSizeSand  ParticleSizeSilt  ParticleSizeClay  Rocks  BD    AirDry  LL15  DUL   SAT       KS
                    50         67                11                22                0      1.15  0.055   0.11  0.28  0.516038  3614.03
                    100        66                11                23                0      1.19  0.104   0.13  0.29  0.500943  2512.63
                    150        65                11                24                0      1.35  0.096   0.12  0.26  0.440566  1607.15
                    300        59                11                30                0      1.43  0.14    0.14  0.26  0.410377  892.399
                    400        57                11                33                0      1.48  0.15    0.15  0.27  0.411509  739.087
                    90         55                11                34                0      1.49  0.15    0.15  0.26  0.407736  819.794
                    Rocks source: Calculated
                    SoilCrop SesameSoil: LL=[0.11, 0.13, 0.12, 0.145333, 0.182, 0.1973]; KL=[0.06, 0.06, 0.06, 0.0573333, 0.044, 0.0342]; XF=[1, 1, 1, 1, 1, 1]
                    SoilCrop SoybeanSoil: LL=[0.11, 0.13, 0.12, 0.143077, 0.168462, 0.177288]; KL=[0.06, 0.06, 0.06, 0.0584615, 0.0507692, 0.0451154]; XF=[1, 1, 1, 1, 1, 1]
                    SoilCrop WheatSoil: same as Validation.Australia.Tully.Tully.Factors.22.Sum_W103_RF.Tully_22_Sum.Physical.SoybeanSoil
                    SoilCrop MaizeSoil: LL=[0.11, 0.13, 0.12, 0.145333, 0.182, 0.1973]; KL=[0.06, 0.06, 0.06, 0.0573333, 0.044, 0.0342]; XF=[1, 1, 1, 1, 1, 1]
                  WaterBalance SoilWater: SummerDate=1-nov; SummerU=6; SummerCona=6; WinterDate=1-apr; WinterU=4; WinterCona=2.5; DiffusConst=27634.79; DiffusSlope=-13.05; Salb=0.13; CN2Bare=73; CNRed=20; CNCov=0; DischargeWidth=5; CatchmentArea=10; PSIDul=-100
                  Solute NO3: Thickness=[50, 100, 150, 300, 400, 90]; InitialValues=[0.5, 0.495025, 0.490099, 0.485223, 0.480395, 0.475615]; InitialValuesUnits=ppm; WaterTableConcentration=0; D0=0; DepthConstant=0; MaxDepthSoluteAccessible=0; RunoffEffectivenessAtMovingSolute=0; MaxEffectiveRunoff=0
                  Solute NH4: Thickness=[50, 100, 150, 300, 400, 90]; InitialValuesUnits=ppm; WaterTableConcentration=0; D0=0; DepthConstant=0; MaxDepthSoluteAccessible=0; RunoffEffectivenessAtMovingSolute=0; MaxEffectiveRunoff=0
                    InitialValues=[0.05, 0.0495025, 0.0490099, 0.0485223, 0.0480395, 0.0475615]
                  Solute Urea: Thickness=[50, 100, 150, 300, 400, 90]; InitialValues=[0, 0, 0, 0, 0, 0]; InitialValuesUnits=kg/ha; WaterTableConcentration=0; D0=0; DepthConstant=0; MaxDepthSoluteAccessible=0; RunoffEffectivenessAtMovingSolute=0; MaxEffectiveRunoff=0
                  Organic: FOMCNRatio=40; CarbonUnits=Total
                    Thickness  Carbon  SoilCNRatio  FBiom      FInert    FOM
                    50         3.84    12           0.04       0.8       150
                    100        2.82    12           0.0327492  0.80804   122.81
                    150        1.53    12           0.0268128  0.816161  100.548
                    300        0.63    12           0.0219525  0.824364  82.3217
                    400        0.33    12           0.0179732  0.832649  67.3993
                    90         0.18    12           0.0147152  0.841017  55.1819
                  Chemical: Thickness=[50, 100, 150, 300, 400, 90]; PH=[5.6, 5.6, 5.5, 5.6, 5.6, 5.6]; PHUnits=Water
                  Nutrient
                  SoilTemperature Temperature
              CompositeFactor Sum_B_RF
                Specifications:
                  [Clock]
                  [Weather]
                  [Management]
                  [Soil]
                  [Initials].Script.ResetDateSM = 11-feb
                  [Initials].Script.ResetDateCN = 11-feb
                  [Initials].Script.InitDepth = 150, 300, 600, 900, 1200
                  [Initials].Script.InitWater = 0.1, 0.1, 0.1, 0.1, 0.1
                  [Initials].Script.InitNO3N = 5, 2, 1, 1, 1
                  [Initials].Script.InitNH4N = 2, 1, 1, 0.1, 0.1
                Clock: Start=2023-02-05; End=2023-06-30
                Weather: FileName=Tully_22_Sum.met
                Operations Management
                  2023-02-12  [Fertiliser].Apply(amount: 200, type: "DAP");
                  2023-02-12  [Sesame].Sow(population:9.2, cultivar:"S57B", depth:25, rowSpacing:300);
                  2023-02-14  [Irrigation].Apply(amount:20);
                  2023-06-29  [Sesame].Harvest();
                  2023-06-29  [Sesame].EndCrop()
                Soil Tully_22_Sum: same as Validation.Australia.Tully.Tully.Factors.22.Sum_W103_RF.Tully_22_Sum
            Factor 23
              CompositeFactor Win_B_0_RF
                Specifications:
                  [Clock]
                  [Weather]
                  [Management]
                  [Soil]
                  [Initials].Script.ResetDateSM = 28-jun
                  [Initials].Script.ResetDateCN = 28-jun
                  [Initials].Script.InitDepth = 150, 300, 600, 900, 1200
                  [Initials].Script.InitWater = 0.11
                  [Initials].Script.InitNO3N = 5, 1
                  [Initials].Script.InitNH4N = 2, 0.1
                Clock: Start=2023-06-25; End=2024-01-30
                Weather: FileName=Tully_23_Win.met
                Operations Management
                  2023-06-29  [Fertiliser].Apply(amount: 0, type: "NH4SO4N");
                  2023-06-29  [Sesame].Sow(population:8.6, cultivar:"S57B", depth:30, rowSpacing:300);
                  2024-01-04  [Sesame].Harvest();
                  2024-01-04  [Sesame].EndCrop();
                Soil Tully_23_Win: SoilType=SoilType=loam; State=Queensland; Country=Australia; ApsoilNumber=0; Latitude=-18.05912; Longitude=145.8735
                  DataSource=Original source is Soil and Landscape Grid of Australia. See: https://esoil.io/TERNLandscapes/Public/Pages/SLGA/index.html 2025-06-25 21:34:21.368176
                  Comments=resolution=90 m - taxonomic classification name = loam - drainage class = NA - elevation = NA - slope = NA - geomdesc = NA
                  Water: Thickness=[50, 100, 150, 300, 400, 1000]; InitialValues=[0.12, 0.13, 0.12, 0.13, 0.13, 0.11]; FilledFromTop=true
                  Physical
                    Thickness  ParticleSizeSand  ParticleSizeSilt  ParticleSizeClay  Rocks  BD    AirDry  LL15  DUL   SAT       KS
                    50         67                12                21                0      1.14  0.06    0.12  0.27  0.519811  4040.01
                    100        64                12                24                0      1.17  0.104   0.13  0.29  0.508491  2771.53
                    150        66                11                23                0      1.36  0.096   0.12  0.25  0.436792  1736.82
                    300        60                11                29                0      1.47  0.13    0.13  0.26  0.395283  687.164
                    400        63                10                27                0      1.51  0.13    0.13  0.25  0.380189  603.92
                    1000       67                10                23                0      1.52  0.11    0.11  0.22  0.376415  1034.47
                    Rocks source: Calculated
                    SoilCrop SesameSoil: LL=[0.12, 0.13, 0.12, 0.135778, 0.162, 0.1903]; KL=[0.06, 0.06, 0.06, 0.0573333, 0.044, 0.0162]; XF=[1, 1, 1, 1, 1, 1]
                    SoilCrop SoybeanSoil: LL=[0.12, 0.13, 0.12, 0.133333, 0.148462, 0.156538]; KL=[0.06, 0.06, 0.06, 0.0584615, 0.0507692, 0.0346154]; XF=[1, 1, 1, 1, 1, 1]
                    SoilCrop WheatSoil: same as Validation.Australia.Tully.Tully.Factors.23.Win_B_0_RF.Tully_23_Win.Physical.SoybeanSoil
                    SoilCrop MaizeSoil: LL=[0.12, 0.13, 0.12, 0.135778, 0.162, 0.1903]; KL=[0.06, 0.06, 0.06, 0.0573333, 0.044, 0.0162]; XF=[1, 1, 1, 1, 1, 1]
                  WaterBalance SoilWater: same as Validation.Australia.Tully.Tully.Factors.22.Sum_W103_RF.Tully_22_Sum.SoilWater
                  Solute NO3: Thickness=[50, 100, 150, 300, 400, 1000]; InitialValues=[0.5, 0.495025, 0.490099, 0.485223, 0.480395, 0.475615]; InitialValuesUnits=ppm; WaterTableConcentration=0; D0=0; DepthConstant=0; MaxDepthSoluteAccessible=0; RunoffEffectivenessAtMovingSolute=0; MaxEffectiveRunoff=0
                  Solute NH4: Thickness=[50, 100, 150, 300, 400, 1000]; InitialValuesUnits=ppm; WaterTableConcentration=0; D0=0; DepthConstant=0; MaxDepthSoluteAccessible=0; RunoffEffectivenessAtMovingSolute=0; MaxEffectiveRunoff=0
                    InitialValues=[0.05, 0.0495025, 0.0490099, 0.0485223, 0.0480395, 0.0475615]
                  Solute Urea: Thickness=[50, 100, 150, 300, 400, 1000]; InitialValues=[0, 0, 0, 0, 0, 0]; InitialValuesUnits=kg/ha; WaterTableConcentration=0; D0=0; DepthConstant=0; MaxDepthSoluteAccessible=0; RunoffEffectivenessAtMovingSolute=0; MaxEffectiveRunoff=0
                  Organic: FOMCNRatio=40; CarbonUnits=Total
                    Thickness  Carbon  SoilCNRatio  FBiom      FInert    FOM
                    50         2.35    12           0.04       0.8       150
                    100        1.88    12           0.0327492  0.80804   122.81
                    150        0.92    12           0.0268128  0.816161  100.548
                    300        0.46    12           0.0219525  0.824364  82.3217
                    400        0.25    12           0.0179732  0.832649  67.3993
                    1000       0.15    12           0.0147152  0.841017  55.1819
                  Chemical: Thickness=[50, 100, 150, 300, 400, 1000]; PH=[5.4, 5.4, 5.4, 5.5, 5.8, 5.8]; PHUnits=Water
                  Nutrient
                  SoilTemperature Temperature
              CompositeFactor Win_B_40_RF
                Specifications:
                  [Clock]
                  [Weather]
                  [Management]
                  [Soil]
                  [Initials].Script.ResetDateSM = 28-jun
                  [Initials].Script.ResetDateCN = 28-jun
                  [Initials].Script.InitDepth = 150, 300, 600, 900, 1200
                  [Initials].Script.InitWater = 0.11
                  [Initials].Script.InitNO3N = 5, 1
                  [Initials].Script.InitNH4N = 2, 0.1
                Clock: Start=2023-06-25; End=2024-01-06
                Weather: FileName=Tully_23_Win.met
                Operations Management
                  2023-06-29  [Fertiliser].Apply(amount: 40, type: "NH4SO4N");
                  2023-06-29  [Sesame].Sow(population:8.7, cultivar:"S57B", depth:30, rowSpacing:300);
                  2024-01-04  [Sesame].Harvest();
                  2024-01-04  [Sesame].EndCrop()
                Soil Tully_23_Win: same as Validation.Australia.Tully.Tully.Factors.23.Win_B_0_RF.Tully_23_Win
              CompositeFactor Win_B_80_RF
                Specifications:
                  [Clock]
                  [Weather]
                  [Management]
                  [Soil]
                  [Initials].Script.ResetDateSM = 28-jun
                  [Initials].Script.ResetDateCN = 28-jun
                  [Initials].Script.InitDepth = 150, 300, 600, 900, 1200
                  [Initials].Script.InitWater = 0.11
                  [Initials].Script.InitNO3N = 5, 1
                  [Initials].Script.InitNH4N = 2, 0.1
                Clock: Start=2023-06-25; End=2024-01-06
                Weather: FileName=Tully_23_Win.met
                Operations Management
                  2023-06-29  [Fertiliser].Apply(amount: 80, type: "NH4SO4N");
                  2023-06-29  [Sesame].Sow(population:10.8, cultivar:"S57B", depth:30, rowSpacing:300);
                  2024-01-04  [Sesame].Harvest();
                  2024-01-04  [Sesame].EndCrop()
                Soil Tully_23_Win: same as Validation.Australia.Tully.Tully.Factors.23.Win_B_0_RF.Tully_23_Win
              CompositeFactor Win_B_120_RF
                Specifications:
                  [Clock]
                  [Weather]
                  [Management]
                  [Soil]
                  [Initials].Script.ResetDateSM = 28-jun
                  [Initials].Script.ResetDateCN = 28-jun
                  [Initials].Script.InitDepth = 150, 300, 600, 900, 1200
                  [Initials].Script.InitWater = 0.11
                  [Initials].Script.InitNO3N = 5, 1
                  [Initials].Script.InitNH4N = 2, 0.1
                Clock: Start=2023-06-25; End=2024-01-06
                Weather: FileName=Tully_23_Win.met
                Operations Management
                  2023-06-29  [Fertiliser].Apply(amount: 120, type: "NH4SO4N");
                  2023-06-29  [Sesame].Sow(population:8.7, cultivar:"S57B", depth:30, rowSpacing:300);
                  2024-01-04  [Sesame].Harvest();
                  2024-01-04  [Sesame].EndCrop()
                Soil Tully_23_Win: same as Validation.Australia.Tully.Tully.Factors.23.Win_B_0_RF.Tully_23_Win
            Factor 24
              CompositeFactor Win_B_RF
                Specifications:
                  [Clock]
                  [Weather]
                  [Management]
                  [Soil]
                  [Initials].Script.ResetDateSM = 09-sep
                  [Initials].Script.ResetDateCN = 13-sep
                  [Initials].Script.InitDepth = 150, 300, 600, 900, 1200
                  [Initials].Script.InitWater = 0.07
                  [Initials].Script.InitNO3N = 5, 1
                  [Initials].Script.InitNH4N = 1, 1
                Clock: Start=2024-09-10; End=2025-01-15
                Weather: FileName=Tully_24_Win.met
                Operations Management
                  2024-09-14  [Fertiliser].Apply(amount: 49, type: "NO3N");
                  2024-09-14  [Sesame].Sow(population:26.7, cultivar:"S57B", depth:30, rowSpacing:300);
                  2025-01-02  [Sesame].Harvest();
                  2025-01-02  [Sesame].EndCrop();
                Soil Tully_24_Win: SoilType=SoilType=loam; State=Queensland; Country=Australia; ApsoilNumber=0; Latitude=-18.11489; Longitude=145.9119
                  DataSource=Original source is Soil and Landscape Grid of Australia. See: https://esoil.io/TERNLandscapes/Public/Pages/SLGA/index.html 2025-06-25 21:34:32.979207
                  Comments=resolution=90 m - taxonomic classification name = loam - drainage class = NA - elevation = NA - slope = NA - geomdesc = NA
                  Water: Thickness=[50, 100, 150, 300, 400, 320]; InitialValues=[0.09, 0.11, 0.12, 0.11, 0.1, 0.08]; FilledFromTop=true
                  Physical
                    Thickness  ParticleSizeSand  ParticleSizeSilt  ParticleSizeClay  Rocks  BD    AirDry  LL15  DUL   SAT       KS
                    50         72                11                18                0      1.18  0.045   0.09  0.23  0.504717  5497.35
                    100        70                10                19                0      1.21  0.088   0.11  0.24  0.493396  4157.43
                    150        68                10                22                0      1.39  0.096   0.12  0.25  0.425472  1457.2
                    300        65                10                25                0      1.49  0.11    0.11  0.23  0.387736  1082.31
                    400        67                10                23                0      1.52  0.1     0.1   0.22  0.376415  1083.53
                    320        71                9                 20                0      1.53  0.08    0.08  0.19  0.372642  1728.63
                    Rocks source: Calculated
                    SoilCrop SesameSoil: LL=[0.09, 0.11, 0.12, 0.115333, 0.132, 0.135733]; KL=[0.06, 0.06, 0.06, 0.0573333, 0.044, 0.0296]; XF=[1, 1, 1, 1, 1, 1]
                    SoilCrop SoybeanSoil: LL=[0.09, 0.11, 0.12, 0.113077, 0.118462, 0.112154]; KL=[0.06, 0.06, 0.06, 0.0584615, 0.0507692, 0.0424615]; XF=[1, 1, 1, 1, 1, 1]
                    SoilCrop WheatSoil: same as Validation.Australia.Tully.Tully.Factors.24.Win_B_RF.Tully_24_Win.Physical.SoybeanSoil
                    SoilCrop MaizeSoil: same as Validation.Australia.Tully.Tully.Factors.24.Win_B_RF.Tully_24_Win.Physical.SesameSoil
                  WaterBalance SoilWater: same as Validation.Australia.Tully.Tully.Factors.22.Sum_W103_RF.Tully_22_Sum.SoilWater
                  Solute NO3: Thickness=[50, 100, 150, 300, 400, 320]; InitialValues=[0.5, 0.495025, 0.490099, 0.485223, 0.480395, 0.475615]; InitialValuesUnits=ppm; WaterTableConcentration=0; D0=0; DepthConstant=0; MaxDepthSoluteAccessible=0; RunoffEffectivenessAtMovingSolute=0; MaxEffectiveRunoff=0
                  Solute NH4: Thickness=[50, 100, 150, 300, 400, 320]; InitialValuesUnits=ppm; WaterTableConcentration=0; D0=0; DepthConstant=0; MaxDepthSoluteAccessible=0; RunoffEffectivenessAtMovingSolute=0; MaxEffectiveRunoff=0
                    InitialValues=[0.05, 0.0495025, 0.0490099, 0.0485223, 0.0480395, 0.0475615]
                  Solute Urea: Thickness=[50, 100, 150, 300, 400, 320]; InitialValues=[0, 0, 0, 0, 0, 0]; InitialValuesUnits=kg/ha; WaterTableConcentration=0; D0=0; DepthConstant=0; MaxDepthSoluteAccessible=0; RunoffEffectivenessAtMovingSolute=0; MaxEffectiveRunoff=0
                  Organic: FOMCNRatio=40; CarbonUnits=Total
                    Thickness  Carbon  SoilCNRatio  FBiom      FInert    FOM
                    50         2.31    12           0.04       0.8       150
                    100        1.74    12           0.0327492  0.80804   122.81
                    150        0.98    12           0.0268128  0.816161  100.548
                    300        0.56    12           0.0219525  0.824364  82.3217
                    400        0.26    12           0.0179732  0.832649  67.3993
                    320        0.22    12           0.0147152  0.841017  55.1819
                  Chemical: Thickness=[50, 100, 150, 300, 400, 320]; PH=[5.6, 5.6, 5.6, 5.6, 5.8, 5.9]; PHUnits=Water
                  Nutrient
                  SoilTemperature Temperature
              CompositeFactor Win_W103_RF
                Specifications:
                  [Clock]
                  [Weather]
                  [Management]
                  [Soil]
                  [Initials].Script.ResetDateSM = 09-sep
                  [Initials].Script.ResetDateCN = 13-sep
                  [Initials].Script.InitDepth = 150, 300, 600, 900, 1200
                  [Initials].Script.InitWater = 0.07
                  [Initials].Script.InitNO3N = 5, 1
                  [Initials].Script.InitNH4N = 1, 1
                Clock: Start=2024-09-10; End=2025-01-15
                Weather: FileName=Tully_24_Win.met
                Operations Management
                  2024-09-14  [Fertiliser].Apply(amount: 49, type: "NO3N");
                  2024-09-14  [Sesame].Sow(population:16.7, cultivar:"ES103", depth:30, rowSpacing:300);
                  2025-01-02  [Sesame].Harvest();
                  2025-01-02  [Sesame].EndCrop();
                Soil Tully_24_Win: same as Validation.Australia.Tully.Tully.Factors.24.Win_B_RF.Tully_24_Win
              CompositeFactor Win_W313_RF
                Specifications:
                  [Clock]
                  [Weather]
                  [Management]
                  [Soil]
                  [Initials].Script.ResetDateSM = 09-sep
                  [Initials].Script.ResetDateCN = 13-sep
                  [Initials].Script.InitDepth = 150, 300, 600, 900, 1200
                  [Initials].Script.InitWater = 0.07
                  [Initials].Script.InitNO3N = 5, 1
                  [Initials].Script.InitNH4N = 1, 1
                Clock: Start=2024-09-10; End=2025-01-15
                Weather: FileName=Tully_24_Win.met
                Operations Management
                  2024-09-14  [Fertiliser].Apply(amount: 49, type: "NO3N");
                  2024-09-14  [Sesame].Sow(population:13.2, cultivar:"ES313", depth:30, rowSpacing:300);
                  2025-01-02  [Sesame].Harvest();
                  2025-01-02  [Sesame].EndCrop();
                Soil Tully_24_Win: same as Validation.Australia.Tully.Tully.Factors.24.Win_B_RF.Tully_24_Win
          Simulation TullyBase
            Clock: Start=2015-05-01; End=2016-11-03
            Summary summaryfile
            Weather: FileName=Tully Experiment.met
            SoilArbitrator Soil Arbitrator
            Zone paddock: Area=1; Slope=0; AspectAngle=0; Altitude=50
              Soil: SoilType=SoilType= loam; Country=Australia; ApsoilNumber=0; Latitude=-18.05; Longitude=145.85
                DataSource=Original source is Soil and Landscape Grid of Australia. See: https://esoil.io/TERNLandscapes/Public/Pages/SLGA/index.html 2025-05-31 14:11:44.928669
                Comments=resolution=90 m - taxonomic classification name = loam - drainage class = NA - elevation = NA - slope = NA - geomdesc = NA
                Water: Thickness=[50, 100, 150, 300, 400, 1000]; InitialValues=[0.25, 0.31, 0.28, 0.2355, 0.12, 0.11]; FilledFromTop=true
                Physical
                  Thickness  ParticleSizeSand  ParticleSizeSilt  ParticleSizeClay  Rocks  BD    AirDry  LL15  DUL   SAT       KS
                  50         68                12                20                0      1.13  0.05    0.1   0.25  0.523585  5394.77
                  100        61                13                26                0      1.16  0.128   0.16  0.31  0.512264  2106.65
                  150        63                12                25                0      1.32  0.112   0.14  0.28  0.451887  1349.49
                  300        60                12                29                0      1.45  0.13    0.13  0.26  0.40283   800.772
                  400        65                10                25                0      1.49  0.12    0.12  0.24  0.387736  880.731
                  1000       65                10                25                0      1.51  0.11    0.11  0.23  0.380189  943.165
                  Rocks source: Calculated
                  SoilCrop SesameSoil: LL=[0.1, 0.16, 0.14, 0.135778, 0.152, 0.1976]; KL=[0.06, 0.06, 0.06, 0.0573333, 0.044, 0.0162]; XF=[1, 1, 1, 1, 1, 1]
                  SoilCrop SoybeanSoil: LL=[0.1, 0.16, 0.14, 0.133333, 0.138462, 0.160769]; KL=[0.06, 0.06, 0.06, 0.0584615, 0.0507692, 0.0346154]; XF=[1, 1, 1, 1, 1, 1]
                  SoilCrop WheatSoil: same as Validation.Australia.Tully.Tully.TullyBase.paddock.Soil.Physical.SoybeanSoil
                  SoilCrop MaizeSoil: LL=[0.1, 0.16, 0.14, 0.135778, 0.152, 0.1976]; KL=[0.06, 0.06, 0.06, 0.0573333, 0.044, 0.0162]; XF=[1, 1, 1, 1, 1, 1]
                WaterBalance SoilWater: same as Validation.Australia.Tully.Tully.Factors.22.Sum_W103_RF.Tully_22_Sum.SoilWater
                Solute NO3: Thickness=[50, 100, 150, 300, 400, 1000]; InitialValues=[5, 5, 2, 2, 2, 2]; InitialValuesUnits=kg/ha; WaterTableConcentration=0; D0=0; DepthConstant=0; MaxDepthSoluteAccessible=0; RunoffEffectivenessAtMovingSolute=0; MaxEffectiveRunoff=0
                Solute NH4: Thickness=[50, 100, 150, 300, 400, 1000]; InitialValues=[5, 1, 1, 1, 1, 1]; InitialValuesUnits=kg/ha; WaterTableConcentration=0; D0=0; DepthConstant=0; MaxDepthSoluteAccessible=0; RunoffEffectivenessAtMovingSolute=0; MaxEffectiveRunoff=0
                Solute Urea: same as Validation.Australia.Tully.Tully.Factors.23.Win_B_0_RF.Tully_23_Win.Urea
                Organic: FOMCNRatio=40; CarbonUnits=Total
                  Thickness  Carbon  SoilCNRatio  FBiom      FInert    FOM
                  50         2.88    12           0.04       0.8       150
                  100        2.46    12           0.0327492  0.80804   122.81
                  150        1.52    12           0.0268128  0.816161  100.548
                  300        0.81    12           0.0219525  0.824364  82.3217
                  400        0.35    12           0.0179732  0.832649  67.3993
                  1000       0.27    12           0.0147152  0.841017  55.1819
                Chemical: PHUnits=Water
                  Thickness  PH   CEC
                  50         5.3  16.376
                  100        5.3  16.564
                  150        5.3  14.316
                  300        5.5  13.5855
                  400        5.7  11.8175
                  1000       5.6  11.6375
                  CEC source: Calculated
                Nutrient
                SoilTemperature Temperature
              Manager Initials
                ResetDate = 1-may
                ResetWaterAndCN = Yes
                ResetSOM = Yes
                InitDepth = 150, 300, 600, 900, 1200
                InitWater =
                InitNO3N =
                InitNH4N =
                InitOC =
              MicroClimate: a_interception=0; b_interception=1; c_interception=0; d_interception=0; SoilHeatFluxFraction=0.4; MinimumHeightDiffForNewLayer=0; NightInterceptionFraction=0.5; ReferenceHeight=2
              Manager CO2Trend
                C3 = 1.5264E-08
                C2 = 7.93268e-05
                C1 = 0.0578807
                C0 = 314.79058
                Target = -1
                RCP = RCP85
                KeepAt = -1
                KeepAtYear = -1
              Irrigation
              Fertiliser
              SurfaceOrganicMatter: InitialResidueName=fallow; InitialResidueType=Sesame; InitialResidueMass=0; InitialStandingFraction=0; InitialCPR=0; InitialCNR=55
              Plant Sesame
              Operations Management
              Report DailyReport: EventNames=[Clock].DoReport
              Report HarvestReport: EventNames=[Sesame].Harvesting
    Folder Iran
      Folder Mashad
        Experiment Mashad
          Factors
            Factor Year
              CompositeFactor 2010
                Specifications:
                  [Clock]
                  [Sowing]
                  [Harvesting]
                Clock: Start=2010-06-09; End=2010-11-03
                Manager Sowing
                  RowSpacing = 500
                  SowingDepth = 30
                  SowingRate = 25
                  CultivarName = Jahan2015
                  SowingDate = 06/10/2010 00:00:00
```csharp
using Models.Soils;
using System;
using Models.Core;
using Models.PMF;
using APSIM.Shared.Utilities;
        
        namespace Models
        {
           [Serializable] 
           [System.Xml.Serialization.XmlInclude(typeof(Model))]
            public class Script : Model
            {      
               [Link] Plant Sesame;
               [Link] Clock Clock;

               [Description("Spacing (mm) between rows")]
               public double RowSpacing { get; set; }
               [Description("Depth (mm) Grains are planted")]
               public double SowingDepth { get; set; }
               [Description("Seeds sown (/m2)")]
               public double SowingRate { get; set; }
               [Description("Cultivar")]
               [Display(Type=DisplayType.CultivarName)]
               public string CultivarName { get; set; }
               [Description("Sowing Date")]
               public DateTime SowingDate { get; set; }

               [EventSubscribe("DoManagement")]
               private void OnDoManagement(object sender, EventArgs e)
               {
                if (Clock.Today.Date == SowingDate)
                    Sesame.Sow(population:SowingRate, cultivar:CultivarName, depth:SowingDepth, rowSpacing:RowSpacing, budNumber:1);
               }
            }
        }
```
                Operations Harvesting
              CompositeFactor 2016
                Specifications:
                  [Clock]
                  [Sowing]
                  [Harvesting]
                Clock: Start=2016-05-01; End=2016-10-01
                Manager Sowing
                  RowSpacing = 500
                  SowingDepth = 30
                  SowingRate = 30
                  CultivarName = Jahan2015
                  SowingDate = 05/05/2016 00:00:00
                  script: same as in Validation.Iran.Mashad.Mashad.Factors.Year.2010.Sowing
                Operations Harvesting
          Simulation MashadBase
            Clock: Start=2015-05-01; End=2016-10-11
            Summary summaryfile
            Weather: FileName=Mashad.met
            SoilArbitrator Soil Arbitrator
            Zone paddock: Area=1; Slope=0; AspectAngle=0; Altitude=50
              MicroClimate: a_interception=0; b_interception=1; c_interception=0; d_interception=0; SoilHeatFluxFraction=0.4; MinimumHeightDiffForNewLayer=0; NightInterceptionFraction=0.5; ReferenceHeight=2
              Manager CO2Trend
                C3 = 1.5264E-08
                C2 = 7.93268e-05
                C1 = 0.0578807
                C0 = 314.79058
                Target = -1
                RCP = RCP85
                KeepAt = -1
                KeepAtYear = -1
              Irrigation
              Fertiliser
              SurfaceOrganicMatter: InitialResidueName=fallow; InitialResidueType=Sesame; InitialResidueMass=0; InitialStandingFraction=0; InitialCPR=0; InitialCNR=55
              Soil Synthetic Soil Derived from ISRIC SoilGrids: ASCOrder=NA; ASCSubOrder=NA; SoilType=Aric Regosols; Site=NA; NearestTown=NA; Region=NA; State=NA; Country=Iran; NaturalVegetation=NA; ApsoilNumber=9999; Latitude=35.375; Longitude=59.375; LocationAccuracy=+- 250 m; YearOfSampling=2019; DataSource=ISRIC SoilGrids
                Water: Thickness=[150, 150, 150, 150, 200, 200, 200, 200, 300, 300]; FilledFromTop=false
                  InitialValues=[0.226, 0.231, 0.234, 0.228, 0.224, 0.224, 0.224, 0.224, 0.224, 0.224]
                Physical
                  Thickness  ParticleSizeSand  ParticleSizeSilt  ParticleSizeClay  BD     AirDry  LL15   DUL    SAT    KS
                  150        47.7              34                18.7              1.394  0.067   0.2    0.328  0.43   40.291
                  150        46                33.5              21.5              1.409  0.068   0.205  0.334  0.43   29.005
                  150        45.2              32.8              22.8              1.433  0.069   0.208  0.334  0.427  25.09
                  150        45.8              32.2              22.2              1.452  0.068   0.203  0.324  0.422  26.588
                  200        46.5              31.8              21.8              1.465  0.067   0.2    0.319  0.417  28.176
                  200        47.5              31.2              21.2              1.471  0.067   0.2    0.318  0.413  29.859
                  200        48                31                21                1.475  0.067   0.2    0.318  0.41   30.737
                  200        48                31                21                1.476  0.067   0.2    0.318  0.41   30.737
                  300        48                31                21                1.478  0.067   0.2    0.318  0.41   30.737
                  300        48                31                21                1.48   0.067   0.2    0.318  0.41   30.737
                  SoilCrop SesameSoil
                    LL=[0.2, 0.205, 0.208, 0.213, 0.224, 0.239, 0.255, 0.271, 0.29, 0.313]
                    KL=[0.06, 0.06, 0.06, 0.055, 0.048, 0.04, 0.032, 0.024, 0.014, 0.003]
                    XF=[1, 1, 1, 1, 1, 1, 1, 1, 1, 1]
                  SoilCrop SoybeanSoil
                    LL=[0.2, 0.205, 0.208, 0.213, 0.224, 0.239, 0.255, 0.271, 0.29, 0.313]
                    KL=[0.06, 0.06, 0.06, 0.055, 0.048, 0.04, 0.032, 0.024, 0.014, 0.003]
                    XF=[1, 1, 1, 1, 1, 1, 1, 1, 1, 1]
                  SoilCrop CanolaSoil
                    LL=[0.2, 0.205, 0.208, 0.213, 0.224, 0.239, 0.255, 0.271, 0.29, 0.313]
                    KL=[0.06, 0.06, 0.06, 0.055, 0.048, 0.04, 0.032, 0.024, 0.014, 0.003]
                    XF=[1, 1, 1, 1, 1, 1, 1, 1, 1, 1]
                  SoilCrop SorghumSoil
                    LL=[0.2, 0.205, 0.208, 0.21, 0.218, 0.23, 0.241, 0.253, 0.268, 0.285]
                    KL=[0.07, 0.07, 0.07, 0.066, 0.06, 0.053, 0.045, 0.039, 0.03, 0.019]
                    XF=[1, 1, 1, 1, 1, 1, 1, 1, 1, 1]
                  SoilCrop PeanutSoil
                    LL=[0.2, 0.205, 0.208, 0.203, 0.21, 0.23, 0.249, 0.269, 0.293, 0.316]
                    KL=[0.06, 0.06, 0.06, 0.06, 0.055, 0.045, 0.035, 0.025, 0.012, 0.001]
                    XF=[1, 1, 1, 1, 1, 1, 1, 1, 1, 1]
                  SoilCrop MungbeanSoil
                    LL=[0.2, 0.205, 0.208, 0.207, 0.224, 0.247, 0.271, 0.294, 0.316, 0.318]
                    KL=[0.06, 0.06, 0.06, 0.058, 0.048, 0.036, 0.024, 0.012, 0.001, 0]
                    XF=[1, 1, 1, 1, 1, 1, 1, 1, 1, 0]
                WaterBalance SoilWater: same as Validation.Australia.Katherine.Katherine.KatherineBase.paddock.Soil.SoilWater
                Organic: same as Validation.Australia.Katherine.Katherine.KatherineBase.paddock.Soil.Organic
                Chemical: PHUnits=Water
                  Thickness  PH    EC
                  150        7.78  0
                  150        7.85  0
                  150        7.93  0
                  150        7.97  0
                  200        8     0
                  200        8     0
                  200        8.01  0
                  200        8.03  0
                  300        8.05  0
                  300        8.08  0
                Nutrient
                Solute NO3: Thickness=[150, 150, 150, 150, 200, 200, 200, 200, 300, 300]; InitialValues=[60, 0, 0, 0, 0, 0, 0, 0, 0, 0]; InitialValuesUnits=kg/ha; WaterTableConcentration=0; D0=0; DepthConstant=0; MaxDepthSoluteAccessible=0; RunoffEffectivenessAtMovingSolute=0; MaxEffectiveRunoff=0
                Solute NH4: Thickness=[150, 150, 150, 150, 200, 200, 200, 200, 300, 300]; InitialValues=[1, 1, 1, 1, 1, 1, 1, 1, 1, 1]; InitialValuesUnits=kg/ha; WaterTableConcentration=0; D0=0; DepthConstant=0; MaxDepthSoluteAccessible=0; RunoffEffectivenessAtMovingSolute=0; MaxEffectiveRunoff=0
                Solute Urea: same as Validation.Australia.Katherine.Katherine.KatherineBase.paddock.Soil.Urea
                SoilTemperature CERESSoilTemperature
              Plant Sesame
              Manager Sowing
                RowSpacing = 300
                SowingDepth = 30
                SowingRate = 30
                CultivarName = Jahan2015
                SowingDate = 07/10/2017 00:00:00
                script: same as in Validation.Iran.Mashad.Mashad.Factors.Year.2010.Sowing
              Manager AutoIrrigate
                Crop = [Sesame]
                AutoIrrigationOn = True
                FASWThreshold = 0.45
                FASWDepth = 350
                weeks = 1
                afterSowing = 1
```csharp
using APSIM.Numerics;
using Models.Interfaces;
using System;
using System.Linq;
using Models.Core;
using System.Collections.Generic;
using System.Text;
using Models.Soils;
using Models.PMF;
using Models;
using System.Xml.Serialization;
using APSIM.Shared.Utilities;
using Models.Interfaces;
using APSIM.Numerics;
namespace Models
{
    [Serializable] 
    public class Script : Model
    {
        [Link] private Zone zone;
        [Link] private Irrigation irrigation;
        [Link] private ISoilWater waterBalance;
        [Link] private IPhysical soilPhysical;
        public double FASW { get; set; }
        public double WaterDeficit  { get; set; }
    


        [Description("Crop to irrigate")]
        public IPlant Crop { get; set; }
        
        [Description("Auto irrigation on?")]
        public bool AutoIrrigationOn { get; set; }

        [Description("Threshold fraction available water (0-1)")]
        public double FASWThreshold { get; set; }

        [Description("Soil depth (mm) to which fraction available water is calculated")]
        public double FASWDepth { get; set; }

        [Description("Minimum weeks between irrigations")]
        public double weeks { get; set; }

        [Description("Minimum days after sowing for first irrigation")]
        public int afterSowing { get; set; }

        private double irrigationGap = 0;    // gap between irrigations

        /// <summary>Called at start of simulation. Performs some basic error checking. </summary>
        [EventSubscribe("StartOfSimulation")]
        private void ErrorChecking(object sender, EventArgs args)
        {
            if (Crop == null)
                throw new Exception("No crop was specified in script " + Parent.Name);
        }

        [EventSubscribe("DoManagement")]
        private void OnDoManagement(object sender, EventArgs e)
        {
            if (AutoIrrigationOn && Crop.IsAlive)
            {
                   irrigationGap += 1;                // increment gap between irrigations
                CalculateFASW();                // calc FASW and WaterDeficit
                if ((FASW < FASWThreshold) && (irrigationGap >= weeks * 7))
                {
                    irrigation.Apply(WaterDeficit, depth: 0);
                    irrigationGap = 0;            // reset
                }
            }
            else
            {
                irrigationGap = weeks * 7 - afterSowing - 1;    // allow irrigation a number of days after it becomes alive/sown
            }
        }

        // Calculate the fraction of the potential available sw
        // Calculate the deficit amount from DUL
        private void CalculateFASW()
        {
            double[] LL15 = MathUtilities.Multiply(soilPhysical.LL15, soilPhysical.Thickness);
            double[] DUL = MathUtilities.Multiply(soilPhysical.DUL, soilPhysical.Thickness);
        
            int nlayr = GetLayerIndex(FASWDepth);
            double cumdep = MathUtilities.Sum(soilPhysical.Thickness, 0, nlayr, 0.0);    // tricky function that sums up to before nlayr

            double part_layer = MathUtilities.Divide((FASWDepth - cumdep), soilPhysical.Thickness[nlayr], 0.0);

            // note that results may be strange if swdep < ll15
            double avail_sw = (MathUtilities.Sum(waterBalance.SWmm, 0, nlayr, 0.0) + part_layer * waterBalance.SWmm[nlayr])
                            - (MathUtilities.Sum(LL15, 0, nlayr, 0.0) + part_layer * LL15[nlayr]);

            double pot_avail_sw = (MathUtilities.Sum(DUL, 0, nlayr, 0.0) + part_layer * DUL[nlayr])
                                - (MathUtilities.Sum(LL15, 0, nlayr, 0.0) + part_layer * LL15[nlayr]);
            
            FASW = MathUtilities.Divide(avail_sw, pot_avail_sw, 0.0);
            WaterDeficit = MathUtilities.Constrain(pot_avail_sw - avail_sw, 0.0, 100000);
        }

        // Get index of the layer that has this depth in it 
        private int GetLayerIndex(double pointDepth)
        {
            double[] cumThickness = soilPhysical.ThicknessCumulative;
            int layerIdx = 0;
            while ((layerIdx < cumThickness.Length) && (pointDepth > cumThickness[layerIdx]))
            {
                layerIdx += 1;
            }

            return layerIdx;
        }
    }
}
```
              Manager ResetOnDate
                ResetDate = 1-may
                OffsetDays = 0
                ResetWater = Yes
                ResetNutrients = Yes
                ResetSOM = Yes
```csharp
using Models.Soils.Nutrients;
using APSIM.Shared.Utilities;
using Models.Surface;
using Models.Utilities;
using Models.Soils.Nutrients;
using Models.Soils;
using Models.PMF;
using Models.Core;
using System;
using System.Linq;
using Models.Interfaces;

namespace Models
{
    [Serializable]
    public class Script : Model
    {
        [Link] private Clock Clock;
        [Link] private Plant Wheat;
        [Link] private ISoilWater SoilWater;
        [Link] private Nutrient nutrient;
        [Link] private SurfaceOrganicMatter SOM;
        [Link] private Summary Summary;

        [Description("Date to reset on:")]
        public string ResetDate {get;set;}
        
        [Description("Offset by Days (Negative is Days Before, Positive is Days After):")]
        public int OffsetDays {get;set;}

        [Description("Reset Water? (Yes or No)")]
        public string ResetWater {get;set;}

        [Description("Reset Soil Nutrients ? (Yes or No)")]
        public string ResetNutrients {get;set;}

        [Description("Reset Surface Organic Matter? (Yes or No)")]
        public string ResetSOM {get;set;}

        [EventSubscribe("DoManagement")]
        private void OnDoManagement(object sender, EventArgs e)
        {
            DateTime offsetDate = DateUtilities.GetDate(ResetDate, Clock.Today).AddDays(OffsetDays);
            if (offsetDate.Equals(Clock.Today))
            {
                if (ResetWater == "Yes")
                {
                    Summary.WriteMessage(this, "Reset Water", MessageType.Diagnostic);
                    SoilWater.Reset();
                }
                if (ResetNutrients == "Yes")
                {
                    Summary.WriteMessage(this, "Reset Nitrogen", MessageType.Diagnostic);
                    nutrient.Reset();
                }
                if (ResetSOM == "Yes")
                {
                    Summary.WriteMessage(this, "Reset Surface OM", MessageType.Diagnostic);
                    SOM.Reset();
                }
            }
        }
    }
}
```
              Operations Harvesting
              Report DailyReport: EventNames=[Clock].DoReport
              Report HarvestReport: EventNames=[Sesame].Harvesting
    Folder India
      Folder Bikaner
        Experiment Bikaner2017
          Factors
            Factor Sowing: Specification=[Sowing]
              Manager July10
                RowSpacing = 300
                SowingDepth = 30
                SowingRate = 30
                CultivarName = RT125
                SowingDate = 07/10/2017 00:00:00
                script: same as in Validation.Iran.Mashad.Mashad.Factors.Year.2010.Sowing
              Manager July20
                RowSpacing = 300
                SowingDepth = 30
                SowingRate = 30
                CultivarName = RT125
                SowingDate = 07/20/2017 00:00:00
                script: same as in Validation.Iran.Mashad.Mashad.Factors.Year.2010.Sowing
              Manager July30
                RowSpacing = 300
                SowingDepth = 30
                SowingRate = 30
                CultivarName = RT125
                SowingDate = 07/30/2017 00:00:00
                script: same as in Validation.Iran.Mashad.Mashad.Factors.Year.2010.Sowing
              Manager Aug09
                RowSpacing = 300
                SowingDepth = 30
                SowingRate = 30
                CultivarName = RT125
                SowingDate = 08/09/2017 00:00:00
                script: same as in Validation.Iran.Mashad.Mashad.Factors.Year.2010.Sowing
          Simulation Bikaner2017Base
            Clock: Start=2017-07-01; End=2017-11-15
            Summary summaryfile
            Weather: FileName=Bikaner.met
            SoilArbitrator Soil Arbitrator
            Zone paddock: Area=1; Slope=0; AspectAngle=0; Altitude=50
              MicroClimate: a_interception=0; b_interception=1; c_interception=0; d_interception=0; SoilHeatFluxFraction=0.4; MinimumHeightDiffForNewLayer=0; NightInterceptionFraction=0.5; ReferenceHeight=2
              Manager CO2Trend
                C3 = 1.5264E-08
                C2 = 7.93268e-05
                C1 = 0.0578807
                C0 = 314.79058
                Target = -1
                RCP = RCP85
                KeepAt = -1
                KeepAtYear = -1
              Irrigation
              Fertiliser
              SurfaceOrganicMatter: InitialResidueName=maize; InitialResidueType=maize; InitialResidueMass=5000; InitialStandingFraction=0; InitialCPR=0; InitialCNR=55
              Plant Sesame
              Soil Synthetic Soil Derived from ISRIC SoilGrids: ASCOrder=NA; ASCSubOrder=NA; SoilType=Haplic Arenosols; Site=NA; NearestTown=NA; Region=NA; State=NA; Country=India; NaturalVegetation=NA; ApsoilNumber=9999; Latitude=28.125; Longitude=73.375; LocationAccuracy=+- 250 m; YearOfSampling=2019; DataSource=ISRIC SoilGrids
                Water: Thickness=[150, 150, 150, 150, 200, 200, 200, 200, 300, 300]; FilledFromTop=false
                  InitialValues=[0.164, 0.169, 0.173, 0.173, 0.172, 0.172, 0.171, 0.169, 0.167, 0.164]
                Physical
                  Thickness  ParticleSizeSand  ParticleSizeSilt  ParticleSizeClay  BD     AirDry  LL15   DUL    SAT    KS
                  150        64.7              19                15.8              1.478  0.043   0.13   0.242  0.403  55.969
                  150        63.5              19                17.5              1.484  0.045   0.135  0.247  0.4    46.13
                  150        63                19                18.2              1.485  0.047   0.14   0.251  0.4    42.287
                  150        63                19                18.8              1.491  0.047   0.14   0.249  0.4    39.904
                  200        63                19                18.8              1.499  0.047   0.14   0.247  0.398  39.904
                  200        63                19                18.2              1.508  0.047   0.14   0.247  0.393  42.287
                  200        63.1              19.1              17.8              1.514  0.046   0.139  0.246  0.39   44.553
                  200        63.3              19.3              17.4              1.517  0.046   0.137  0.244  0.39   46.669
                  300        63.6              19.6              16.9              1.521  0.045   0.135  0.242  0.39   49.455
                  300        63.8              19.9              16.3              1.525  0.044   0.132  0.238  0.39   53.02
                  SoilCrop SesameSoil
                    LL=[0.13, 0.135, 0.14, 0.144, 0.161, 0.183, 0.203, 0.223, 0.24, 0.238]
                    KL=[0.06, 0.06, 0.06, 0.058, 0.048, 0.036, 0.024, 0.012, 0.001, 0]
                    XF=[1, 1, 1, 1, 1, 1, 1, 1, 1, 0]
                  SoilCrop MungbeanSoil
                    LL=[0.13, 0.135, 0.14, 0.144, 0.161, 0.183, 0.203, 0.223, 0.24, 0.238]
                    KL=[0.06, 0.06, 0.06, 0.058, 0.048, 0.036, 0.024, 0.012, 0.001, 0]
                    XF=[1, 1, 1, 1, 1, 1, 1, 1, 1, 0]
                  SoilCrop SoybeanSoil
                    LL=[0.13, 0.135, 0.141, 0.149, 0.161, 0.176, 0.189, 0.201, 0.217, 0.234]
                    KL=[0.06, 0.06, 0.06, 0.055, 0.048, 0.04, 0.032, 0.024, 0.014, 0.003]
                    XF=[1, 1, 1, 1, 1, 1, 1, 1, 1, 1]
                  SoilCrop RiceSoil
                    LL=[0.13, 0.135, 0.141, 0.149, 0.161, 0.176, 0.189, 0.201, 0.217, 0.234]
                    KL=[0.06, 0.06, 0.06, 0.055, 0.048, 0.04, 0.032, 0.024, 0.014, 0.003]
                    XF=[1, 1, 1, 1, 1, 1, 1, 1, 1, 1]
                  SoilCrop WheatSoil
                    LL=[0.13, 0.135, 0.141, 0.149, 0.161, 0.176, 0.189, 0.201, 0.217, 0.234]
                    KL=[0.06, 0.06, 0.06, 0.055, 0.048, 0.04, 0.032, 0.024, 0.014, 0.003]
                    XF=[1, 1, 1, 1, 1, 1, 1, 1, 1, 1]
                  SoilCrop TeffSoil
                    LL=[0.13, 0.135, 0.141, 0.149, 0.161, 0.176, 0.189, 0.201, 0.217, 0.234]
                    KL=[0.06, 0.06, 0.06, 0.055, 0.048, 0.04, 0.032, 0.024, 0.014, 0.003]
                    XF=[1, 1, 1, 1, 1, 1, 1, 1, 1, 1]
                  SoilCrop SugarcaneSoil
                    LL=[0.13, 0.135, 0.14, 0.145, 0.152, 0.161, 0.168, 0.174, 0.182, 0.191]
                    KL=[0.06, 0.06, 0.06, 0.057, 0.053, 0.048, 0.044, 0.039, 0.033, 0.027]
                    XF=[1, 1, 1, 1, 1, 1, 1, 1, 1, 1]
                  SoilCrop MaizeSoil
                    LL=[0.13, 0.135, 0.141, 0.149, 0.161, 0.176, 0.189, 0.201, 0.217, 0.234]
                    KL=[0.06, 0.06, 0.06, 0.055, 0.048, 0.04, 0.032, 0.024, 0.014, 0.003]
                    XF=[1, 1, 1, 1, 1, 1, 1, 1, 1, 1]
                  SoilCrop OilPalmSoil
                    LL=[0.13, 0.135, 0.14, 0.145, 0.152, 0.161, 0.168, 0.174, 0.182, 0.191]
                    KL=[0.06, 0.06, 0.06, 0.057, 0.053, 0.048, 0.044, 0.039, 0.033, 0.027]
                    XF=[1, 1, 1, 1, 1, 1, 1, 1, 1, 1]
                  SoilCrop CassavaSoil
                    LL=[0.13, 0.135, 0.141, 0.149, 0.161, 0.176, 0.189, 0.201, 0.217, 0.234]
                    KL=[0.06, 0.06, 0.06, 0.055, 0.048, 0.04, 0.032, 0.024, 0.014, 0.003]
                    XF=[1, 1, 1, 1, 1, 1, 1, 1, 1, 1]
                  SoilCrop PlantainForageSoil
                    LL=[0.13, 0.135, 0.14, 0.145, 0.152, 0.161, 0.168, 0.174, 0.182, 0.191]
                    KL=[0.06, 0.06, 0.06, 0.057, 0.053, 0.048, 0.044, 0.039, 0.033, 0.027]
                    XF=[1, 1, 1, 1, 1, 1, 1, 1, 1, 1]
                  SoilCrop SunflowerSoil
                    LL=[0.131, 0.143, 0.158, 0.167, 0.178, 0.191, 0.202, 0.213, 0.226, 0.237]
                    KL=[0.1, 0.093, 0.084, 0.075, 0.065, 0.053, 0.041, 0.029, 0.015, 0.001]
                    XF=[1, 1, 1, 1, 1, 1, 1, 1, 1, 1]
                  SoilCrop CanolaSoil
                    LL=[0.13, 0.135, 0.141, 0.149, 0.161, 0.176, 0.189, 0.201, 0.217, 0.234]
                    KL=[0.06, 0.06, 0.06, 0.055, 0.048, 0.04, 0.032, 0.024, 0.014, 0.003]
                    XF=[1, 1, 1, 1, 1, 1, 1, 1, 1, 1]
                  SoilCrop SorghumSoil
                    LL=[0.13, 0.135, 0.14, 0.147, 0.156, 0.167, 0.177, 0.185, 0.196, 0.209]
                    KL=[0.07, 0.07, 0.07, 0.066, 0.06, 0.053, 0.045, 0.039, 0.03, 0.019]
                    XF=[1, 1, 1, 1, 1, 1, 1, 1, 1, 1]
                  SoilCrop MilletSoil
                    LL=[0.13, 0.135, 0.14, 0.147, 0.156, 0.167, 0.177, 0.185, 0.196, 0.209]
                    KL=[0.07, 0.07, 0.07, 0.066, 0.06, 0.053, 0.045, 0.039, 0.03, 0.019]
                    XF=[1, 1, 1, 1, 1, 1, 1, 1, 1, 1]
                  SoilCrop PeanutSoil
                    LL=[0.13, 0.135, 0.14, 0.14, 0.149, 0.167, 0.184, 0.2, 0.219, 0.237]
                    KL=[0.06, 0.06, 0.06, 0.06, 0.055, 0.045, 0.035, 0.025, 0.012, 0.001]
                    XF=[1, 1, 1, 1, 1, 1, 1, 1, 1, 1]
                  SoilCrop BarleySoil
                    LL=[0.13, 0.135, 0.141, 0.148, 0.159, 0.172, 0.183, 0.194, 0.207, 0.223]
                    KL=[0.07, 0.07, 0.07, 0.065, 0.058, 0.049, 0.041, 0.033, 0.023, 0.01]
                    XF=[1, 1, 1, 1, 1, 1, 1, 1, 1, 1]
                  SoilCrop CottonSoil
                    LL=[0.13, 0.135, 0.14, 0.14, 0.14, 0.146, 0.157, 0.167, 0.179, 0.194]
                    KL=[0.1, 0.1, 0.1, 0.1, 0.1, 0.094, 0.083, 0.072, 0.058, 0.042]
                    XF=[1, 1, 1, 1, 1, 1, 1, 1, 1, 1]
                  SoilCrop OatsSoil
                    LL=[0.13, 0.135, 0.141, 0.149, 0.161, 0.176, 0.189, 0.201, 0.217, 0.234]
                    KL=[0.06, 0.06, 0.06, 0.055, 0.048, 0.04, 0.032, 0.024, 0.014, 0.003]
                    XF=[1, 1, 1, 1, 1, 1, 1, 1, 1, 1]
                  SoilCrop ChickpeaSoil
                    LL=[0.13, 0.135, 0.14, 0.14, 0.148, 0.165, 0.18, 0.195, 0.213, 0.233]
                    KL=[0.06, 0.06, 0.06, 0.06, 0.055, 0.046, 0.037, 0.028, 0.016, 0.003]
                    XF=[1, 1, 1, 1, 1, 1, 1, 1, 1, 1]
                  SoilCrop Pigeon PeaSoil
                    LL=[0.13, 0.135, 0.14, 0.14, 0.149, 0.167, 0.184, 0.2, 0.219, 0.237]
                    KL=[0.06, 0.06, 0.06, 0.06, 0.055, 0.045, 0.035, 0.025, 0.012, 0.001]
                    XF=[1, 1, 1, 1, 1, 1, 1, 1, 1, 1]
                  SoilCrop CowpeaSoil
                    LL=[0.13, 0.135, 0.141, 0.149, 0.161, 0.176, 0.189, 0.201, 0.217, 0.234]
                    KL=[0.06, 0.06, 0.06, 0.055, 0.048, 0.04, 0.032, 0.024, 0.014, 0.003]
                    XF=[1, 1, 1, 1, 1, 1, 1, 1, 1, 1]
                  SoilCrop FababeanSoil
                    LL=[0.13, 0.135, 0.14, 0.14, 0.142, 0.155, 0.17, 0.183, 0.2, 0.219]
                    KL=[0.08, 0.08, 0.08, 0.08, 0.079, 0.069, 0.057, 0.046, 0.031, 0.014]
                    XF=[1, 1, 1, 1, 1, 1, 1, 1, 1, 1]
                  SoilCrop LucerneSoil
                    LL=[0.13, 0.135, 0.14, 0.14, 0.14, 0.14, 0.139, 0.138, 0.147, 0.158]
                    KL=[0.1, 0.1, 0.1, 0.1, 0.1, 0.1, 0.1, 0.099, 0.089, 0.075]
                    XF=[1, 1, 1, 1, 1, 1, 1, 1, 1, 1]
                  SoilCrop LupinSoil
                    LL=[0.13, 0.135, 0.141, 0.149, 0.161, 0.176, 0.189, 0.201, 0.217, 0.234]
                    KL=[0.06, 0.06, 0.06, 0.055, 0.048, 0.04, 0.032, 0.024, 0.014, 0.003]
                    XF=[1, 1, 1, 1, 1, 1, 1, 1, 1, 1]
                  SoilCrop LentilSoil
                    LL=[0.13, 0.135, 0.141, 0.149, 0.161, 0.176, 0.189, 0.201, 0.217, 0.234]
                    KL=[0.06, 0.06, 0.06, 0.055, 0.048, 0.04, 0.032, 0.024, 0.014, 0.003]
                    XF=[1, 1, 1, 1, 1, 1, 1, 1, 1, 1]
                  SoilCrop TriticaleSoil
                    LL=[0.13, 0.135, 0.148, 0.162, 0.179, 0.199, 0.217, 0.234, 0.242, 0.238]
                    KL=[0.07, 0.07, 0.065, 0.056, 0.045, 0.032, 0.019, 0.006, 0, 0]
                    XF=[1, 1, 1, 1, 1, 1, 1, 1, 0, 0]
                  SoilCrop EucalyptusSoil
                    LL=[0.13, 0.135, 0.14, 0.141, 0.142, 0.143, 0.143, 0.142, 0.141, 0.139]
                    KL=[0.08, 0.08, 0.08, 0.079, 0.079, 0.078, 0.077, 0.076, 0.075, 0.074]
                    XF=[1, 1, 1, 1, 1, 1, 1, 1, 1, 1]
                  SoilCrop GliricidiaSoil
                    LL=[0.13, 0.135, 0.14, 0.141, 0.143, 0.146, 0.147, 0.147, 0.147, 0.148]
                    KL=[0.08, 0.08, 0.08, 0.079, 0.077, 0.076, 0.074, 0.072, 0.07, 0.068]
                    XF=[1, 1, 1, 1, 1, 1, 1, 1, 1, 1]
                  SoilCrop PinusSoil
                    LL=[0.13, 0.135, 0.14, 0.141, 0.142, 0.143, 0.143, 0.142, 0.141, 0.139]
                    KL=[0.08, 0.08, 0.08, 0.079, 0.079, 0.078, 0.077, 0.076, 0.075, 0.074]
                    XF=[1, 1, 1, 1, 1, 1, 1, 1, 1, 1]
                  SoilCrop SCRUMSoil
                    LL=[0.13, 0.135, 0.141, 0.149, 0.161, 0.176, 0.189, 0.201, 0.217, 0.234]
                    KL=[0.06, 0.06, 0.06, 0.055, 0.048, 0.04, 0.032, 0.024, 0.014, 0.003]
                    XF=[1, 1, 1, 1, 1, 1, 1, 1, 1, 1]
                WaterBalance SoilWater: SummerDate=1-may; SummerU=6; SummerCona=6; WinterDate=1-oct; WinterU=6; WinterCona=6; DiffusConst=804.78; DiffusSlope=19.15; Salb=0.13; CN2Bare=68; CNRed=20; CNCov=0; DischargeWidth=5; CatchmentArea=10; PSIDul=-100
                Organic: FOMCNRatio=40; CarbonUnits=Total
                  Thickness  Carbon  SoilCNRatio  FBiom  FInert  FOM
                  150        0.182   8            0.04   0.602   133.417
                  150        0.152   8            0.031  0.718   106.535
                  150        0.16    8            0.014  0.68    85.07
                  150        0.129   8            0.01   0.839   67.93
                  200        0.098   8            0.01   0.99    50.324
                  200        0.068   8            0.01   0.99    37.281
                  200        0.052   8            0.01   0.99    27.618
                  200        0.049   8            0.01   0.99    20.46
                  300        0.045   8            0.01   0.99    13.046
                  300        0.041   8            0.01   0.99    8.318
                Chemical: Thickness=[150, 150, 150, 150, 200, 200, 200, 200, 300, 300]; PH=[8.1, 8.1, 8.12, 8.18, 8.2, 8.2, 8.2, 8.2, 8.2, 8.2]; PHUnits=Water
                Nutrient
                Solute NO3: Thickness=[150, 150, 150, 150, 200, 200, 200, 200, 300, 300]; InitialValues=[5, 5, 5, 5, 5, 1, 1, 1, 1, 1]; InitialValuesUnits=kg/ha; WaterTableConcentration=0; D0=0; DepthConstant=0; MaxDepthSoluteAccessible=0; RunoffEffectivenessAtMovingSolute=0; MaxEffectiveRunoff=0
                Solute NH4: same as Validation.Iran.Mashad.Mashad.MashadBase.paddock.Synthetic Soil Derived from ISRIC SoilGrids.NH4
                Solute Urea: same as Validation.Australia.Katherine.Katherine.KatherineBase.paddock.Soil.Urea
                SoilTemperature CERESSoilTemperature
              Manager Sowing: same as Validation.India.Bikaner.Bikaner2017.Factors.Sowing.July10
              Manager AutoIrrigate
                Crop = [Sesame]
                AutoIrrigationOn = True
                FASWThreshold = 0.5
                FASWDepth = 600
                weeks = 2
                afterSowing = 1
                script: same as in Validation.Iran.Mashad.Mashad.MashadBase.paddock.AutoIrrigate
              Manager Reset on sowing
                ResetWater = Yes
                ResetNutrients = Yes
                ResetSOM = Yes
```csharp
using Models.Soils.Nutrients;
using APSIM.Shared.Utilities;
using Models.Surface;
using Models.Utilities;
using Models.Soils.Nutrients;
using Models.Soils;
using Models.PMF;
using Models.Core;
using System;
using System.Linq;
using Models.Interfaces;

namespace Models
{
    [Serializable]
    public class Script : Model
    {
        [Link] private Plant Wheat;
        [Link] private ISoilWater SoilWater;
        [Link] private Nutrient nutrient;
        [Link] private SurfaceOrganicMatter SOM;
        [Link] private Summary Summary;

        [Description("Reset Water? (Yes or No)")]
        public string ResetWater {get;set;}

        [Description("Reset Soil Nutrients? (Yes or No)")]
        public string ResetNutrients {get;set;}

        [Description("Reset Surface Organic Matter? (Yes or No)")]
        public string ResetSOM {get;set;}

        [EventSubscribe("Sowing")]
        private void OnSowing(object sender, EventArgs e)
        {
            if (ResetWater == "Yes")
            {
                Summary.WriteMessage(this, "Reset Water", MessageType.Diagnostic);
                SoilWater.Reset();
            }
            if (ResetNutrients == "Yes")
            {
                Summary.WriteMessage(this, "Reset Nutrients", MessageType.Diagnostic);
                nutrient.Reset();
            }
            if (ResetSOM == "Yes")
            {
                Summary.WriteMessage(this, "Reset Surface OM", MessageType.Diagnostic);
                SOM.Reset();
            }
        }
    }
}
```
              Operations Harvesting
              Report DailyReport: EventNames=[Clock].DoReport
              Report HarvestReport: EventNames=[Sesame].Harvesting
    Folder Sensitivity
      Folder Fertliser
        Experiment EmeraldFertiliser
          Factors
            CompositeFactor 2011-0
              Specifications:
                [Clock]
                [Management]
                [AutoIrrigation].Script.AutoIrrigationOn = true
              Clock: Start=2010-12-01; End=2011-09-30
              Operations Management
                2011-01-01  [Fertiliser].Apply(amount: 0, type: "UreaN");
                2011-01-01  [Sesame].Sow(population:40, cultivar:"S57B", depth:30, rowSpacing:250);
                2011-07-18  [Sesame].Harvest();
                2011-07-18  [Sesame].EndCrop()
            CompositeFactor 2011-40
              Specifications:
                [Clock]
                [Management]
                [AutoIrrigation].Script.AutoIrrigationOn = true
              Clock: Start=2010-12-01; End=2011-09-30
              Operations Management
                2011-01-01  [Fertiliser].Apply(amount: 40, type: "UreaN");
                2011-01-01  [Sesame].Sow(population:40, cultivar:"S57B", depth:30, rowSpacing:250);
                2011-07-18  [Sesame].Harvest();
                2011-07-18  [Sesame].EndCrop()
            CompositeFactor 2011-80
              Specifications:
                [Clock]
                [Management]
                [AutoIrrigation].Script.AutoIrrigationOn = true
              Clock: Start=2010-12-01; End=2011-09-30
              Operations Management
                2011-01-01  [Fertiliser].Apply(amount: 80, type: "UreaN");
                2011-01-01  [Sesame].Sow(population:40, cultivar:"S57B", depth:30, rowSpacing:250);
                2011-07-18  [Sesame].Harvest();
                2011-07-18  [Sesame].EndCrop()
            CompositeFactor 2011-100
              Specifications:
                [Clock]
                [Management]
                [AutoIrrigation].Script.AutoIrrigationOn = true
              Clock: Start=2010-12-01; End=2011-09-30
              Operations Management
                2011-01-01  [Fertiliser].Apply(amount: 100, type: "UreaN");
                2011-01-01  [Sesame].Sow(population:40, cultivar:"S57B", depth:30, rowSpacing:250);
                2011-07-18  [Sesame].Harvest();
                2011-07-18  [Sesame].EndCrop()
            CompositeFactor 2012-0
              Specifications:
                [Clock]
                [Management]
                [AutoIrrigation].Script.AutoIrrigationOn = true
              Clock: Start=2011-12-01; End=2012-09-30
              Operations Management
                2012-01-01  [Fertiliser].Apply(amount: 0, type: "UreaN");
                2012-01-01  [Sesame].Sow(population:40, cultivar:"S57B", depth:30, rowSpacing:250);
                2012-07-18  [Sesame].Harvest();
                2012-07-18  [Sesame].EndCrop()
            CompositeFactor 2012-40
              Specifications:
                [Clock]
                [Management]
                [AutoIrrigation].Script.AutoIrrigationOn = true
              Clock: Start=2011-12-01; End=2012-09-30
              Operations Management
                2012-01-01  [Fertiliser].Apply(amount: 40, type: "UreaN");
                2012-01-01  [Sesame].Sow(population:40, cultivar:"S57B", depth:30, rowSpacing:250);
                2012-07-18  [Sesame].Harvest();
                2012-07-18  [Sesame].EndCrop()
            CompositeFactor 2012-80
              Specifications:
                [Clock]
                [Management]
                [AutoIrrigation].Script.AutoIrrigationOn = true
              Clock: Start=2011-12-01; End=2012-09-30
              Operations Management
                2012-01-01  [Fertiliser].Apply(amount: 80, type: "UreaN");
                2012-01-01  [Sesame].Sow(population:40, cultivar:"S57B", depth:30, rowSpacing:250);
                2012-07-18  [Sesame].Harvest();
                2012-07-18  [Sesame].EndCrop()
            CompositeFactor 2012-100
              Specifications:
                [Clock]
                [Management]
                [AutoIrrigation].Script.AutoIrrigationOn = true
              Clock: Start=2011-12-01; End=2012-09-30
              Operations Management
                2012-01-01  [Fertiliser].Apply(amount: 100, type: "UreaN");
                2012-01-01  [Sesame].Sow(population:40, cultivar:"S57B", depth:30, rowSpacing:250);
                2012-07-18  [Sesame].Harvest();
                2012-07-18  [Sesame].EndCrop()
            CompositeFactor 2013-0
              Specifications:
                [Clock]
                [Management]
                [AutoIrrigation].Script.AutoIrrigationOn = true
              Clock: Start=2012-12-01; End=2013-09-30
              Operations Management
                2013-01-01  [Fertiliser].Apply(amount: 0, type: "UreaN");
                2013-01-01  [Sesame].Sow(population:40, cultivar:"S57B", depth:30, rowSpacing:250);
                2013-07-18  [Sesame].Harvest();
                2013-07-18  [Sesame].EndCrop()
            CompositeFactor 2013-40
              Specifications:
                [Clock]
                [Management]
                [AutoIrrigation].Script.AutoIrrigationOn = true
              Clock: Start=2012-12-01; End=2013-09-30
              Operations Management
                2013-01-01  [Fertiliser].Apply(amount: 40, type: "UreaN");
                2013-01-01  [Sesame].Sow(population:40, cultivar:"S57B", depth:30, rowSpacing:250);
                2013-07-18  [Sesame].Harvest();
                2013-07-18  [Sesame].EndCrop()
            CompositeFactor 2013-80
              Specifications:
                [Clock]
                [Management]
                [AutoIrrigation].Script.AutoIrrigationOn = true
              Clock: Start=2012-12-01; End=2013-09-30
              Operations Management
                2013-01-01  [Fertiliser].Apply(amount: 80, type: "UreaN");
                2013-01-01  [Sesame].Sow(population:40, cultivar:"S57B", depth:30, rowSpacing:250);
                2013-07-18  [Sesame].Harvest();
                2013-07-18  [Sesame].EndCrop()
            CompositeFactor 2013-100
              Specifications:
                [Clock]
                [Management]
                [AutoIrrigation].Script.AutoIrrigationOn = true
              Clock: Start=2012-12-01; End=2013-09-30
              Operations Management
                2013-01-01  [Fertiliser].Apply(amount: 100, type: "UreaN");
                2013-01-01  [Sesame].Sow(population:40, cultivar:"S57B", depth:30, rowSpacing:250);
                2013-07-18  [Sesame].Harvest();
                2013-07-18  [Sesame].EndCrop()
            CompositeFactor 2014-0
              Specifications:
                [Clock]
                [Management]
                [AutoIrrigation].Script.AutoIrrigationOn = true
              Clock: Start=2013-12-01; End=2014-09-30
              Operations Management
                2014-01-01  [Fertiliser].Apply(amount: 0, type: "UreaN");
                2014-01-01  [Sesame].Sow(population:40, cultivar:"S57B", depth:30, rowSpacing:250);
                2014-07-18  [Sesame].Harvest();
                2014-07-18  [Sesame].EndCrop()
            CompositeFactor 2014-40
              Specifications:
                [Clock]
                [Management]
                [AutoIrrigation].Script.AutoIrrigationOn = true
              Clock: Start=2013-12-01; End=2014-09-30
              Operations Management
                2014-01-01  [Fertiliser].Apply(amount: 40, type: "UreaN");
                2014-01-01  [Sesame].Sow(population:40, cultivar:"S57B", depth:30, rowSpacing:250);
                2014-07-18  [Sesame].Harvest();
                2014-07-18  [Sesame].EndCrop()
            CompositeFactor 2014-80
              Specifications:
                [Clock]
                [Management]
                [AutoIrrigation].Script.AutoIrrigationOn = true
              Clock: Start=2013-12-01; End=2014-09-30
              Operations Management
                2014-01-01  [Fertiliser].Apply(amount: 80, type: "UreaN");
                2014-01-01  [Sesame].Sow(population:40, cultivar:"S57B", depth:30, rowSpacing:250);
                2014-07-18  [Sesame].Harvest();
                2014-07-18  [Sesame].EndCrop()
            CompositeFactor 2014-100
              Specifications:
                [Clock]
                [Management]
                [AutoIrrigation].Script.AutoIrrigationOn = true
              Clock: Start=2013-12-01; End=2014-09-30
              Operations Management
                2014-01-01  [Fertiliser].Apply(amount: 100, type: "UreaN");
                2014-01-01  [Sesame].Sow(population:40, cultivar:"S57B", depth:30, rowSpacing:250);
                2014-07-18  [Sesame].Harvest();
                2014-07-18  [Sesame].EndCrop()
            CompositeFactor 2015-0
              Specifications:
                [Clock]
                [Management]
                [AutoIrrigation].Script.AutoIrrigationOn = true
              Clock: Start=2014-12-01; End=2015-09-30
              Operations Management
                2015-01-01  [Fertiliser].Apply(amount: 0, type: "UreaN");
                2015-01-01  [Sesame].Sow(population:40, cultivar:"S57B", depth:30, rowSpacing:250);
                2015-07-18  [Sesame].Harvest();
                2015-07-18  [Sesame].EndCrop()
            CompositeFactor 2015-40
              Specifications:
                [Clock]
                [Management]
                [AutoIrrigation].Script.AutoIrrigationOn = true
              Clock: Start=2014-12-01; End=2015-09-30
              Operations Management
                2015-01-01  [Fertiliser].Apply(amount: 40, type: "UreaN");
                2015-01-01  [Sesame].Sow(population:40, cultivar:"S57B", depth:30, rowSpacing:250);
                2015-07-18  [Sesame].Harvest();
                2015-07-18  [Sesame].EndCrop()
            CompositeFactor 2015-80
              Specifications:
                [Clock]
                [Management]
                [AutoIrrigation].Script.AutoIrrigationOn = true
              Clock: Start=2014-12-01; End=2015-09-30
              Operations Management
                2015-01-01  [Fertiliser].Apply(amount: 80, type: "UreaN");
                2015-01-01  [Sesame].Sow(population:40, cultivar:"S57B", depth:30, rowSpacing:250);
                2015-07-18  [Sesame].Harvest();
                2015-07-18  [Sesame].EndCrop()
            CompositeFactor 2015-100
              Specifications:
                [Clock]
                [Management]
                [AutoIrrigation].Script.AutoIrrigationOn = true
              Clock: Start=2014-12-01; End=2015-09-30
              Operations Management
                2015-01-01  [Fertiliser].Apply(amount: 100, type: "UreaN");
                2015-01-01  [Sesame].Sow(population:40, cultivar:"S57B", depth:30, rowSpacing:250);
                2015-07-18  [Sesame].Harvest();
                2015-07-18  [Sesame].EndCrop()
            CompositeFactor 2016-0
              Specifications:
                [Clock]
                [Management]
                [AutoIrrigation].Script.AutoIrrigationOn = true
              Clock: Start=2015-12-01; End=2016-09-30
              Operations Management
                2016-01-01  [Fertiliser].Apply(amount: 0, type: "UreaN");
                2016-01-01  [Sesame].Sow(population:40, cultivar:"S57B", depth:30, rowSpacing:250);
                2016-07-18  [Sesame].Harvest();
                2016-07-18  [Sesame].EndCrop()
            CompositeFactor 2016-40
              Specifications:
                [Clock]
                [Management]
                [AutoIrrigation].Script.AutoIrrigationOn = true
              Clock: Start=2015-12-01; End=2016-09-30
              Operations Management
                2016-01-01  [Fertiliser].Apply(amount: 40, type: "UreaN");
                2016-01-01  [Sesame].Sow(population:40, cultivar:"S57B", depth:30, rowSpacing:250);
                2016-07-18  [Sesame].Harvest();
                2016-07-18  [Sesame].EndCrop()
            CompositeFactor 2016-80
              Specifications:
                [Clock]
                [Management]
                [AutoIrrigation].Script.AutoIrrigationOn = true
              Clock: Start=2015-12-01; End=2016-09-30
              Operations Management
                2016-01-01  [Fertiliser].Apply(amount: 80, type: "UreaN");
                2016-01-01  [Sesame].Sow(population:40, cultivar:"S57B", depth:30, rowSpacing:250);
                2016-07-18  [Sesame].Harvest();
                2016-07-18  [Sesame].EndCrop()
            CompositeFactor 2016-100
              Specifications:
                [Clock]
                [Management]
                [AutoIrrigation].Script.AutoIrrigationOn = true
              Clock: Start=2015-12-01; End=2016-09-30
              Operations Management
                2016-01-01  [Fertiliser].Apply(amount: 100, type: "UreaN");
                2016-01-01  [Sesame].Sow(population:40, cultivar:"S57B", depth:30, rowSpacing:250);
                2016-07-18  [Sesame].Harvest();
                2016-07-18  [Sesame].EndCrop()
            CompositeFactor 2017-0
              Specifications:
                [Clock]
                [Management]
                [AutoIrrigation].Script.AutoIrrigationOn = true
              Clock: Start=2016-12-01; End=2017-09-30
              Operations Management
                2017-01-01  [Fertiliser].Apply(amount: 0, type: "UreaN");
                2017-01-01  [Sesame].Sow(population:40, cultivar:"S57B", depth:30, rowSpacing:250);
                2017-07-18  [Sesame].Harvest();
                2017-07-18  [Sesame].EndCrop()
            CompositeFactor 2017-40
              Specifications:
                [Clock]
                [Management]
                [AutoIrrigation].Script.AutoIrrigationOn = true
              Clock: Start=2016-12-01; End=2017-09-30
              Operations Management
                2017-01-01  [Fertiliser].Apply(amount: 40, type: "UreaN");
                2017-01-01  [Sesame].Sow(population:40, cultivar:"S57B", depth:30, rowSpacing:250);
                2017-07-18  [Sesame].Harvest();
                2017-07-18  [Sesame].EndCrop()
            CompositeFactor 2017-80
              Specifications:
                [Clock]
                [Management]
                [AutoIrrigation].Script.AutoIrrigationOn = true
              Clock: Start=2016-12-01; End=2017-09-30
              Operations Management
                2017-01-01  [Fertiliser].Apply(amount: 80, type: "UreaN");
                2017-01-01  [Sesame].Sow(population:40, cultivar:"S57B", depth:30, rowSpacing:250);
                2017-07-18  [Sesame].Harvest();
                2017-07-18  [Sesame].EndCrop()
            CompositeFactor 2017-100
              Specifications:
                [Clock]
                [Management]
                [AutoIrrigation].Script.AutoIrrigationOn = true
              Clock: Start=2016-12-01; End=2017-09-30
              Operations Management
                2017-01-01  [Fertiliser].Apply(amount: 100, type: "UreaN");
                2017-01-01  [Sesame].Sow(population:40, cultivar:"S57B", depth:30, rowSpacing:250);
                2017-07-18  [Sesame].Harvest();
                2017-07-18  [Sesame].EndCrop()
            CompositeFactor 2018-0
              Specifications:
                [Clock]
                [Management]
                [AutoIrrigation].Script.AutoIrrigationOn = true
              Clock: Start=2017-12-01; End=2018-09-30
              Operations Management
                2018-01-01  [Fertiliser].Apply(amount: 0, type: "UreaN");
                2018-01-01  [Sesame].Sow(population:40, cultivar:"S57B", depth:30, rowSpacing:250);
                2018-07-18  [Sesame].Harvest();
                2018-07-18  [Sesame].EndCrop()
            CompositeFactor 2018-40
              Specifications:
                [Clock]
                [Management]
                [AutoIrrigation].Script.AutoIrrigationOn = true
              Clock: Start=2017-12-01; End=2018-09-30
              Operations Management
                2018-01-01  [Fertiliser].Apply(amount: 40, type: "UreaN");
                2018-01-01  [Sesame].Sow(population:40, cultivar:"S57B", depth:30, rowSpacing:250);
                2018-07-18  [Sesame].Harvest();
                2018-07-18  [Sesame].EndCrop()
            CompositeFactor 2018-80
              Specifications:
                [Clock]
                [Management]
                [AutoIrrigation].Script.AutoIrrigationOn = true
              Clock: Start=2017-12-01; End=2018-09-30
              Operations Management
                2018-01-01  [Fertiliser].Apply(amount: 80, type: "UreaN");
                2018-01-01  [Sesame].Sow(population:40, cultivar:"S57B", depth:30, rowSpacing:250);
                2018-07-18  [Sesame].Harvest();
                2018-07-18  [Sesame].EndCrop()
            CompositeFactor 2018-100
              Specifications:
                [Clock]
                [Management]
                [AutoIrrigation].Script.AutoIrrigationOn = true
              Clock: Start=2017-12-01; End=2018-09-30
              Operations Management
                2018-01-01  [Fertiliser].Apply(amount: 100, type: "UreaN");
                2018-01-01  [Sesame].Sow(population:40, cultivar:"S57B", depth:30, rowSpacing:250);
                2018-07-18  [Sesame].Harvest();
                2018-07-18  [Sesame].EndCrop()
            CompositeFactor 2019-0
              Specifications:
                [Clock]
                [Management]
                [AutoIrrigation].Script.AutoIrrigationOn = true
              Clock: Start=2018-12-01; End=2019-09-30
              Operations Management
                2019-01-01  [Fertiliser].Apply(amount: 0, type: "UreaN");
                2019-01-01  [Sesame].Sow(population:40, cultivar:"S57B", depth:30, rowSpacing:250);
                2019-07-18  [Sesame].Harvest();
                2019-07-18  [Sesame].EndCrop()
            CompositeFactor 2019-40
              Specifications:
                [Clock]
                [Management]
                [AutoIrrigation].Script.AutoIrrigationOn = true
              Clock: Start=2018-12-01; End=2019-09-30
              Operations Management
                2019-01-01  [Fertiliser].Apply(amount: 40, type: "UreaN");
                2019-01-01  [Sesame].Sow(population:40, cultivar:"S57B", depth:30, rowSpacing:250);
                2019-07-18  [Sesame].Harvest();
                2019-07-18  [Sesame].EndCrop()
            CompositeFactor 2019-80
              Specifications:
                [Clock]
                [Management]
                [AutoIrrigation].Script.AutoIrrigationOn = true
              Clock: Start=2018-12-01; End=2019-09-30
              Operations Management
                2019-01-01  [Fertiliser].Apply(amount: 80, type: "UreaN");
                2019-01-01  [Sesame].Sow(population:40, cultivar:"S57B", depth:30, rowSpacing:250);
                2019-07-18  [Sesame].Harvest();
                2019-07-18  [Sesame].EndCrop()
            CompositeFactor 2019-100
              Specifications:
                [Clock]
                [Management]
                [AutoIrrigation].Script.AutoIrrigationOn = true
              Clock: Start=2018-12-01; End=2019-09-30
              Operations Management
                2019-01-01  [Fertiliser].Apply(amount: 100, type: "UreaN");
                2019-01-01  [Sesame].Sow(population:40, cultivar:"S57B", depth:30, rowSpacing:250);
                2019-07-18  [Sesame].Harvest();
                2019-07-18  [Sesame].EndCrop()
            CompositeFactor 2020-0
              Specifications:
                [Clock]
                [Management]
                [AutoIrrigation].Script.AutoIrrigationOn = true
              Clock: Start=2019-12-01; End=2020-09-30
              Operations Management
                2020-01-01  [Fertiliser].Apply(amount: 0, type: "UreaN");
                2020-01-01  [Sesame].Sow(population:40, cultivar:"S57B", depth:30, rowSpacing:250);
                2020-07-18  [Sesame].Harvest();
                2020-07-18  [Sesame].EndCrop()
            CompositeFactor 2020-40
              Specifications:
                [Clock]
                [Management]
                [AutoIrrigation].Script.AutoIrrigationOn = true
              Clock: Start=2019-12-01; End=2020-09-30
              Operations Management
                2020-01-01  [Fertiliser].Apply(amount: 40, type: "UreaN");
                2020-01-01  [Sesame].Sow(population:40, cultivar:"S57B", depth:30, rowSpacing:250);
                2020-07-18  [Sesame].Harvest();
                2020-07-18  [Sesame].EndCrop()
            CompositeFactor 2020-80
              Specifications:
                [Clock]
                [Management]
                [AutoIrrigation].Script.AutoIrrigationOn = true
              Clock: Start=2019-12-01; End=2020-09-30
              Operations Management
                2020-01-01  [Fertiliser].Apply(amount: 80, type: "UreaN");
                2020-01-01  [Sesame].Sow(population:40, cultivar:"S57B", depth:30, rowSpacing:250);
                2020-07-18  [Sesame].Harvest();
                2020-07-18  [Sesame].EndCrop()
            CompositeFactor 2020-100
              Specifications:
                [Clock]
                [Management]
                [AutoIrrigation].Script.AutoIrrigationOn = true
              Clock: Start=2019-12-01; End=2020-09-30
              Operations Management
                2020-01-01  [Fertiliser].Apply(amount: 100, type: "UreaN");
                2020-01-01  [Sesame].Sow(population:40, cultivar:"S57B", depth:30, rowSpacing:250);
                2020-07-18  [Sesame].Harvest();
                2020-07-18  [Sesame].EndCrop()
          Simulation EmeraldFertiliserBase
            Clock: Start=2022-12-01; End=2024-06-30
            Summary summaryfile
            Weather: FileName=Emerald.met
            SoilArbitrator Soil Arbitrator
            Zone paddock: Area=1; Slope=0; AspectAngle=0; Altitude=50
              Manager Initials
                ResetDateSM =
                ResetDateCN =
                InitDepth = 150, 300, 600, 900, 1200
                InitWater =
                InitNO3N =
                InitNH4N =
                InitOC =
              MicroClimate: a_interception=0; b_interception=1; c_interception=0; d_interception=0; SoilHeatFluxFraction=0.4; MinimumHeightDiffForNewLayer=0; NightInterceptionFraction=0.5; ReferenceHeight=2
              Manager CO2Trend
                C3 = 1.5264E-08
                C2 = 7.93268e-05
                C1 = 0.0578807
                C0 = 314.79058
                Target = -1
                RCP = RCP85
                KeepAt = -1
                KeepAtYear = -1
              Irrigation
              Fertiliser
              SurfaceOrganicMatter: InitialResidueName=fallow; InitialResidueType=Sesame; InitialResidueMass=100; InitialStandingFraction=0.5; InitialCPR=0; InitialCNR=55
              Plant Sesame
              Manager SesameManagement (disabled)
                RowSpacing = 150
                SowingDepth = 20
                SowingRate = 50
                CultivarName = S57B
                SowingDate = 01/01/0001 00:00:00
                FertType = UreaN
                SowingFert = 60
                SowingIrrigationAmount = 0
                IrrigateDates = 01-mar, 01-may, 01-jul, 01-sep, 01-nov
                IrrigationAmount = 20
                Depth = 0
                Efficiency = 1
                WillRunoff = False
                FertiliseDates = 01-mar, 01-may, 01-jul, 01-sep, 01-nov
                FertiliseAmount = 50
                HarvestDate = 06/10/2023 00:00:00
                EndCropDate = 06/10/2023 00:00:00
```csharp
using Models.Soils;
using System;
using Models.Core;
using Models.PMF;
using APSIM.Shared.Utilities;
using Models;

        
    namespace Models
    {
        [Serializable] 
        [System.Xml.Serialization.XmlInclude(typeof(Model))]
        public class Script : Model
        {      
           [Link] Plant Sesame;
           [Link] Clock Clock;
           [Link] Fertiliser Fert;
           [Link] Irrigation Irrig;
           [Link] private Summary summary;
           
           [Separator("Set sowing parameters")]
           [Description("Spacing (mm) between rows")]
           public double RowSpacing { get; set; }
           [Description("Depth (mm) seeds are planted")]
           public double SowingDepth { get; set; }
           [Description("Seed sowing density (/m2)")]
           public double SowingRate { get; set; }
           [Description("Cultivar")]
           [Display(Type=DisplayType.CultivarName)]
           public string CultivarName { get; set; }
           [Description("Sowing Date")]
           public String SowingDate { get; set; }
           [Description("Type of fertiliser to apply")]
           [Display(Type = DisplayType.FertiliserType)]
           public string FertType { get; set; }
           [Description("Sowing Fertiliser amount (kg)")]
           public double SowingFert { get; set; }            
           [Description("Irrigation sowing amount (mm)")]
           public double SowingIrrigationAmount { get; set; }
           
           [Separator("Set irrigation on one or more dates dd-mmm on every year of the simulation, e.g., 01-jan, 20-feb")]
           [Description("Enter the irrigation dates as dd-mmm with comma separation (any year information entered will be ignored)")] 
           public string[] IrrigateDates { get; set; }       
           [Description("Amount of irrigation to be applied (mm)")] 
           public double IrrigationAmount { get; set; }        
           [Description("Depth in the soil to apply the  irrigation (mm)")] 
           public double Depth { get; set; }      
           [Description("Efficiency of irrigation (0-1)")] 
           public double Efficiency { get; set; }       
           [Description("Will the irrigation runoff?")] 
           public bool WillRunoff { get; set; }
               
             
           [Separator("Apply fertiliser on one or more dates dd-mmm on every year of the simulation")]
           [Description("Enter the fertiliser dates as dd-mmm with comma separation (any year information entered will be ignored)")] 
           public string[] FertiliseDates { get; set; }       
           [Description("Amount of fertiliser to be applied (kg)")] 
           public double FertiliseAmount { get; set; }
           
           [Separator("Harvest and end simulation dates")]
           [Description("Set the harvest date")]
           public String HarvestDate { get; set; }
           [Description("Set the end simulation date")]
           public String EndCropDate { get; set; }
            
           [EventSubscribe("DoManagement")]
           private void OnDoManagement(object sender, EventArgs e)
           {            
               //if (Clock.Today.Date == SowingDate)
               if (DateUtilities.WithinDates(SowingDate, Clock.Today, SowingDate))
               {
                   Sesame.Sow(population:SowingRate, cultivar:CultivarName, depth:SowingDepth, rowSpacing:RowSpacing);
                   Fert.Apply(SowingFert, FertType,0);
                   Irrig.Apply(SowingIrrigationAmount, 0);
               }
           
               foreach (string ddMMM in IrrigateDates)
               {
                   if (DateUtilities.DatesEqual(ddMMM, Clock.Today))
                       Irrig.Apply(amount: IrrigationAmount, depth: Depth, efficiency: Efficiency, willRunoff: WillRunoff);
               }
                          
               foreach (string ddMMM in FertiliseDates)
               {
                   if (DateUtilities.DatesEqual(ddMMM, Clock.Today))
                       Fert.Apply(FertiliseAmount, FertType, 0);
               }
               
               if (DateUtilities.WithinDates(HarvestDate, Clock.Today, HarvestDate))
               {
                   Sesame.Harvest();
               }   
               
               if (DateUtilities.WithinDates(EndCropDate, Clock.Today, EndCropDate))
               {
                   Sesame.EndCrop();
               }           
           }
       }
   }
```
              Report: EventNames=[Clock].EndOfDay
                VariableNames:
                  [Clock].Today as Date
                  [Sesame].Population
                  [Sesame].AboveGround.Wt as totalBiomass
                  [Grain].Wt
                  [Leaf].Fw
                  [Leaf].Fn
                  sum([Soil].Water.MM) as TotalSWC
                  sum([Soil].Physical.DULmm) as TotalDUL
                  sum([Soil].Physical.LL15mm) as TotalLL15
                  [Sesame].Phenology.Stage
                  [Sesame].Phenology.CurrentStageName as CurrentStageName
                  [Sesame].Phenology.AccumulatedTT
                  [Sesame].DaysAfterSowing
              Soil Synthetic Soil Derived from ISRIC SoilGrids: ASCOrder=NA; ASCSubOrder=NA; SoilType=Haplic Lixisols; Site=NA; NearestTown=NA; Region=NA; State=NA; Country=Australia; NaturalVegetation=NA; ApsoilNumber=9999; Latitude=-18.125; Longitude=143.375; LocationAccuracy=+- 250 m; YearOfSampling=2019; DataSource=ISRIC SoilGrids
                Water: Thickness=[150, 150, 150, 150, 200, 200, 200, 150]; InitialValues=[0.153, 0.17, 0.182, 0.188, 0.188, 0.182, 0.18, 0.18]; FilledFromTop=true
                Physical
                  Thickness  ParticleSizeSand  ParticleSizeSilt  ParticleSizeClay  Rocks  BD     AirDry  LL15   DUL    SAT    KS
                  150        66.3              11                23                0      1.377  0.051   0.153  0.244  0.432  24.373
                  150        62                11                28                0      1.413  0.057   0.17   0.257  0.425  13.646
                  150        58.5              11                31.2              0      1.435  0.061   0.182  0.266  0.42   9.36
                  150        57.5              11                31.8              0      1.435  0.062   0.188  0.271  0.42   8.833
                  200        57.2              10.8              32                0      1.438  0.062   0.188  0.271  0.42   8.58
                  200        57.8              10.2              32                0      1.446  0.061   0.182  0.266  0.42   8.58
                  200        57.9              10.1              32                0      1.453  0.06    0.18   0.263  0.419  8.58
                  150        57.7              10.3              32                0      1.462  0.06    0.18   0.262  0.417  8.58
                  Rocks source: Calculated
                  SoilCrop SesameSoil
                    LL=[0.11, 0.12, 0.14, 0.176206, 0.197108, 0.262873, 0.18, 0.18]
                    KL=[0.06, 0.06, 0.06, 0.0568968, 0.0414462, 0.0235635, 0.06, 0.06]
                    XF=[1, 1, 1, 0.925, 0.835, 0.795, 1, 1]
                    LL, KL, XF source: Calculated (layer 7, 8)
                WaterBalance SoilWater: SummerDate=1-nov; SummerU=6; SummerCona=6; WinterDate=1-apr; WinterU=6; WinterCona=6; DiffusConst=14549.83; DiffusSlope=-5.01; Salb=0.13; CN2Bare=73; CNRed=20; CNCov=0; DischargeWidth=5; CatchmentArea=10; PSIDul=-100; Thickness=[150, 150, 150, 150, 200, 200, 200, 150]; SWCON=[0.355, 0.287, 0.246, 0.243, 0.197, 0.192, 0.19, 0.233]
                Organic: FOMCNRatio=40; CarbonUnits=Total
                  Thickness  Carbon  SoilCNRatio  FBiom  FInert  FOM
                  150        1.164   12.6         0.04   0.558   174.526
                  150        0.87    12.6         0.031  0.726   125.053
                  150        0.707   12.6         0.014  0.88    89.6044
                  150        0.672   12.6         0.01   0.925   64.2044
                  200        0.587   12.6         0.01   0.99    41.1666
                  200        0.453   12.6         0.01   0.99    26.3952
                  200        0.381   12.6         0.01   0.99    16.9241
                  150        0.369   12.6         0.01   0.99    12.1266
                Chemical: PHUnits=Water
                  Thickness  PH    CEC
                  150        6.63  13.2021
                  150        6.7   13.5875
                  150        6.75  13.84065
                  150        6.85  13.8551
                  200        6.93  13.69715
                  200        6.97  13.43585
                  200        7.01  13.2806
                  150        7.03  13.24015
                  CEC source: Calculated
                Nutrient
                Solute NO3: Thickness=[150, 150, 150, 150, 200, 200, 200, 150]; InitialValues=[0, 0, 0, 0, 0, 0, 0, 0]; InitialValuesUnits=ppm; WaterTableConcentration=0; D0=0; DepthConstant=0; MaxDepthSoluteAccessible=0; RunoffEffectivenessAtMovingSolute=0; MaxEffectiveRunoff=0
                Solute NH4: same as Validation.Sensitivity.Fertliser.EmeraldFertiliser.EmeraldFertiliserBase.paddock.Synthetic Soil Derived from ISRIC SoilGrids.NO3
                Solute Urea: Thickness=[150, 150, 150, 150, 200, 200, 200, 150]; InitialValues=[0, 0, 0, 0, 0, 0, 0, 0]; InitialValuesUnits=kg/ha; WaterTableConcentration=0; D0=0; DepthConstant=0; MaxDepthSoluteAccessible=0; RunoffEffectivenessAtMovingSolute=0; MaxEffectiveRunoff=0
                SoilTemperature Temperature
              Operations Management
              Manager AutoIrrigation: same as Validation.Australia.Emerald.Emerald.EmeraldBase.paddock.AutoIrrigation
        Experiment KatherineFertiliser
          Factors: same as Validation.Sensitivity.Fertliser.EmeraldFertiliser.Factors
          Simulation KatherineFertiliserBase
            Clock: Start=2022-12-01; End=2024-06-30
            Summary summaryfile
            SoilArbitrator Soil Arbitrator
            Zone paddock: Area=1; Slope=0; AspectAngle=0; Altitude=50
              Manager Initials
                ResetDateSM =
                ResetDateCN =
                InitDepth = 150, 300, 600, 900, 1200
                InitWater =
                InitNO3N =
                InitNH4N =
                InitOC =
              MicroClimate: a_interception=0; b_interception=1; c_interception=0; d_interception=0; SoilHeatFluxFraction=0.4; MinimumHeightDiffForNewLayer=0; NightInterceptionFraction=0.5; ReferenceHeight=2
              Manager CO2Trend
                C3 = 1.5264E-08
                C2 = 7.93268e-05
                C1 = 0.0578807
                C0 = 314.79058
                Target = -1
                RCP = RCP85
                KeepAt = -1
                KeepAtYear = -1
              Irrigation
              Fertiliser
              SurfaceOrganicMatter: InitialResidueName=fallow; InitialResidueType=Sesame; InitialResidueMass=100; InitialStandingFraction=0.5; InitialCPR=0; InitialCNR=55
              Plant Sesame
              Manager SesameManagement (disabled): same as Validation.Sensitivity.Fertliser.EmeraldFertiliser.EmeraldFertiliserBase.paddock.SesameManagement
              Report: same as Validation.Sensitivity.Fertliser.EmeraldFertiliser.EmeraldFertiliserBase.paddock.Report
              Operations Management
              Manager AutoIrrigation: same as Validation.Australia.Emerald.Emerald.EmeraldBase.paddock.AutoIrrigation
              Soil Katherine_23_Win: SoilType=SoilType=loam; Country=Australia; ApsoilNumber=0; Latitude=-14.46851; Longitude=132.2073
                DataSource=Original source is Soil and Landscape Grid of Australia. See: https://esoil.io/TERNLandscapes/Public/Pages/SLGA/index.html 2025-06-25 21:33:18.435493
                Comments=resolution=90 m - taxonomic classification name = loam - drainage class = NA - elevation = NA - slope = NA - geomdesc = NA
                Water: Thickness=[50, 100, 150, 300, 400, 440]; InitialValues=[0.13, 0.13, 0.12, 0.15, 0.16, 0.15]; FilledFromTop=true
                Physical
                  Thickness  ParticleSizeSand  ParticleSizeSilt  ParticleSizeClay  Rocks  BD    AirDry  LL15  DUL   SAT       KS
                  50         69                12                18                0      1.48  0.065   0.13  0.26  0.391509  634.502
                  100        69                12                18                0      1.49  0.104   0.13  0.27  0.387736  474.462
                  150        66                12                22                0      1.57  0.096   0.12  0.25  0.357547  368.622
                  300        60                12                28                0      1.58  0.15    0.15  0.27  0.353774  166.235
                  400        58                12                30                0      1.6   0.16    0.16  0.27  0.346226  121.655
                  440        51                12                38                0      1.6   0.15    0.15  0.26  0.366226  319.587
                  Rocks source: Calculated
                  SoilCrop SesameSoil: LL=[0.13, 0.13, 0.12, 0.158182, 0.198269, 0.228203]; KL=[0.06, 0.06, 0.06, 0.0559091, 0.0391259, 0.0173437]; XF=[1, 1, 0.905, 0.85, 0.79, 0.755]
                  SoilCrop SoybeanSoil: LL=[0.13, 0.13, 0.12, 0.15472, 0.182078, 0.195117]; KL=[0.06, 0.06, 0.06, 0.0576399, 0.0479573, 0.0353906]; XF=[1, 1, 0.905, 0.85, 0.79, 0.755]
                  SoilCrop WheatSoil: same as Validation.Sensitivity.Fertliser.KatherineFertiliser.KatherineFertiliserBase.paddock.Katherine_23_Win.Physical.SoybeanSoil
                  SoilCrop MaizeSoil: same as Validation.Sensitivity.Fertliser.KatherineFertiliser.KatherineFertiliserBase.paddock.Katherine_23_Win.Physical.SesameSoil
                WaterBalance SoilWater: same as Validation.Australia.Tully.Tully.Factors.22.Sum_W103_RF.Tully_22_Sum.SoilWater
                Solute NO3: Thickness=[50, 100, 150, 300, 400, 440]; InitialValues=[0.5, 0.495025, 0.490099, 0.485223, 0.480395, 0.475615]; InitialValuesUnits=ppm; WaterTableConcentration=0; D0=0; DepthConstant=0; MaxDepthSoluteAccessible=0; RunoffEffectivenessAtMovingSolute=0; MaxEffectiveRunoff=0
                Solute NH4: Thickness=[50, 100, 150, 300, 400, 440]; InitialValuesUnits=ppm; WaterTableConcentration=0; D0=0; DepthConstant=0; MaxDepthSoluteAccessible=0; RunoffEffectivenessAtMovingSolute=0; MaxEffectiveRunoff=0
                  InitialValues=[0.05, 0.0495025, 0.0490099, 0.0485223, 0.0480395, 0.0475615]
                Solute Urea: Thickness=[50, 100, 150, 300, 400, 440]; InitialValues=[0, 0, 0, 0, 0, 0]; InitialValuesUnits=kg/ha; WaterTableConcentration=0; D0=0; DepthConstant=0; MaxDepthSoluteAccessible=0; RunoffEffectivenessAtMovingSolute=0; MaxEffectiveRunoff=0
                Organic: FOMCNRatio=40; CarbonUnits=Total
                  Thickness  Carbon  SoilCNRatio  FBiom      FInert    FOM
                  50         1.87    12           0.04       0.8       150
                  100        1.4     12           0.0327492  0.80804   122.81
                  150        0.69    12           0.0268128  0.816161  100.548
                  300        0.61    12           0.0219525  0.824364  82.3217
                  400        0.51    12           0.0179732  0.832649  67.3993
                  440        0.4     12           0.0147152  0.841017  55.1819
                Chemical: PHUnits=Water
                  Thickness  PH   CEC
                  50         6.2  13.5035
                  100        6.3  12.579
                  150        6.4  11.8485
                  300        6.5  12.8685
                  400        6.8  13.0435
                  440        6.9  14.463
                  CEC source: Calculated
                Nutrient
                SoilTemperature Temperature
            Weather: FileName=Katherine_23_Win.met
        Experiment KununurraFertiliser
          Factors: same as Validation.Sensitivity.Fertliser.EmeraldFertiliser.Factors
          Simulation KununurraFertiliserBase
            Clock: Start=2022-12-01; End=2024-06-30
            Summary summaryfile
            SoilArbitrator Soil Arbitrator
            Zone paddock: Area=1; Slope=0; AspectAngle=0; Altitude=50
              Manager Initials
                ResetDateSM =
                ResetDateCN =
                InitDepth = 150, 300, 600, 900, 1200
                InitWater =
                InitNO3N =
                InitNH4N =
                InitOC =
              MicroClimate: a_interception=0; b_interception=1; c_interception=0; d_interception=0; SoilHeatFluxFraction=0.4; MinimumHeightDiffForNewLayer=0; NightInterceptionFraction=0.5; ReferenceHeight=2
              Manager CO2Trend
                C3 = 1.5264E-08
                C2 = 7.93268e-05
                C1 = 0.0578807
                C0 = 314.79058
                Target = -1
                RCP = RCP85
                KeepAt = -1
                KeepAtYear = -1
              Irrigation
              Fertiliser
              SurfaceOrganicMatter: InitialResidueName=fallow; InitialResidueType=Sesame; InitialResidueMass=100; InitialStandingFraction=0.5; InitialCPR=0; InitialCNR=55
              Plant Sesame
              Manager SesameManagement (disabled): same as Validation.Sensitivity.Fertliser.EmeraldFertiliser.EmeraldFertiliserBase.paddock.SesameManagement
              Report: same as Validation.Sensitivity.Fertliser.EmeraldFertiliser.EmeraldFertiliserBase.paddock.Report
              Operations Management
              Manager AutoIrrigation: same as Validation.Australia.Emerald.Emerald.EmeraldBase.paddock.AutoIrrigation
              Soil Kununurra_24_Sum: same as Validation.Australia.Kununurra.Kununurra.Factors.24.Sum_W3301_0_IR_Dec.Kununurra_24_Sum
            Weather: FileName=Kununurra_24_Sum.met
        Experiment TullyFertiliser
          Factors: same as Validation.Sensitivity.Fertliser.EmeraldFertiliser.Factors
          Simulation TullyFertiliserBase
            Clock: Start=2022-12-01; End=2024-06-30
            Summary summaryfile
            SoilArbitrator Soil Arbitrator
            Zone paddock: Area=1; Slope=0; AspectAngle=0; Altitude=50
              Manager Initials
                ResetDateSM =
                ResetDateCN =
                InitDepth = 150, 300, 600, 900, 1200
                InitWater =
                InitNO3N =
                InitNH4N =
                InitOC =
              MicroClimate: a_interception=0; b_interception=1; c_interception=0; d_interception=0; SoilHeatFluxFraction=0.4; MinimumHeightDiffForNewLayer=0; NightInterceptionFraction=0.5; ReferenceHeight=2
              Manager CO2Trend
                C3 = 1.5264E-08
                C2 = 7.93268e-05
                C1 = 0.0578807
                C0 = 314.79058
                Target = -1
                RCP = RCP85
                KeepAt = -1
                KeepAtYear = -1
              Irrigation
              Fertiliser
              SurfaceOrganicMatter: InitialResidueName=fallow; InitialResidueType=Sesame; InitialResidueMass=100; InitialStandingFraction=0.5; InitialCPR=0; InitialCNR=55
              Plant Sesame
              Manager SesameManagement (disabled): same as Validation.Sensitivity.Fertliser.EmeraldFertiliser.EmeraldFertiliserBase.paddock.SesameManagement
              Report: same as Validation.Sensitivity.Fertliser.EmeraldFertiliser.EmeraldFertiliserBase.paddock.Report
              Operations Management
              Manager AutoIrrigation: same as Validation.Australia.Emerald.Emerald.EmeraldBase.paddock.AutoIrrigation
              Soil Tully_22_Sum: same as Validation.Australia.Tully.Tully.Factors.22.Sum_W103_RF.Tully_22_Sum
            Weather: FileName=Tully_22_Sum.met
      Folder Irrigation
        Experiment EmeraldIrrigation
          Factors
            CompositeFactor 0
              Specifications:
                [SesameManagement].Script.SowingIrrigationAmount=0
                [SesameManagement].Script.IrrigationAmount=0
            CompositeFactor 20
              Specifications:
                [SesameManagement].Script.SowingIrrigationAmount=20
                [SesameManagement].Script.IrrigationAmount=20
            CompositeFactor 40
              Specifications:
                [SesameManagement].Script.SowingIrrigationAmount=40
                [SesameManagement].Script.IrrigationAmount=40
            CompositeFactor 60
              Specifications:
                [SesameManagement].Script.SowingIrrigationAmount=60
                [SesameManagement].Script.IrrigationAmount=60
          Simulation EmeraldIrrigationBase
            Clock: Start=2012-01-15; End=2012-12-30
            Summary summaryfile
            Weather: FileName=Emerald.met
            SoilArbitrator Soil Arbitrator
            Zone paddock: Area=1; Slope=0; AspectAngle=0; Altitude=50
              Manager Initials
                ResetDateSM =
                ResetDateCN =
                InitDepth = 150, 300, 600, 900, 1200
                InitWater =
                InitNO3N =
                InitNH4N =
                InitOC =
              MicroClimate: a_interception=0; b_interception=1; c_interception=0; d_interception=0; SoilHeatFluxFraction=0.4; MinimumHeightDiffForNewLayer=0; NightInterceptionFraction=0.5; ReferenceHeight=2
              Manager CO2Trend
                C3 = 1.5264E-08
                C2 = 7.93268e-05
                C1 = 0.0578807
                C0 = 314.79058
                Target = -1
                RCP = RCP85
                KeepAt = -1
                KeepAtYear = -1
              Irrigation
              Fertiliser
              SurfaceOrganicMatter: InitialResidueName=fallow; InitialResidueType=Sesame; InitialResidueMass=100; InitialStandingFraction=0.5; InitialCPR=0; InitialCNR=55
              Plant Sesame
              Report: same as Validation.Sensitivity.Fertliser.EmeraldFertiliser.EmeraldFertiliserBase.paddock.Report
              Soil Synthetic Soil Derived from ISRIC SoilGrids: same as Validation.Sensitivity.Fertliser.EmeraldFertiliser.EmeraldFertiliserBase.paddock.Synthetic Soil Derived from ISRIC SoilGrids
              Manager SesameManagement
                RowSpacing = 150
                SowingDepth = 20
                SowingRate = 50
                CultivarName = S57B
                SowingDate = 01/23/2012 00:00:00
                FertType = UreaN
                SowingFert = 100
                SowingIrrigationAmount = 20
                IrrigateDates = 01-apr, 01-may, 01-jun
                IrrigationAmount = 0
                Depth = 30
                Efficiency = 1
                WillRunoff = False
                FertiliseDates = 01-Mar
                FertiliseAmount = 0
                HarvestDate = 07/10/2012 00:00:00
                EndCropDate = 07/10/2012 00:00:00
```csharp
using Models.Soils;
using System;
using Models.Core;
using Models.PMF;
using APSIM.Shared.Utilities;
using Models;

        
    namespace Models
    {
        [Serializable] 
        [System.Xml.Serialization.XmlInclude(typeof(Model))]
        public class Script : Model
        {      
           [Link] Plant Sesame;
           [Link] Clock Clock;
           [Link] Fertiliser Fert;
           [Link] Irrigation Irrig;
           [Link] private Summary summary;
           
           [Separator("Set sowing parameters")]
           [Description("Spacing (mm) between rows")]
           public double RowSpacing { get; set; }
           [Description("Depth (mm) seeds are planted")]
           public double SowingDepth { get; set; }
           [Description("Seed sowing density (/m2)")]
           public double SowingRate { get; set; }
           [Description("Cultivar")]
           [Display(Type=DisplayType.CultivarName)]
           public string CultivarName { get; set; }
           [Description("Sowing Date")]
           public DateTime SowingDate { get; set; }
           [Description("Type of fertiliser to apply")]
           [Display(Type = DisplayType.FertiliserType)]
           public string FertType { get; set; }
           [Description("Sowing Fertiliser amount (kg)")]
           public double SowingFert { get; set; }            
           [Description("Irrigation sowing amount (mm)")]
           public double SowingIrrigationAmount { get; set; }
           
           [Separator("Set irrigation on one or more dates dd-mmm on every year of the simulation, e.g., 01-jan, 20-feb")]
           [Description("Enter the irrigation dates as dd-mmm with comma separation (any year information entered will be ignored)")] 
           public string[] IrrigateDates { get; set; }       
           [Description("Amount of irrigation to be applied (mm)")] 
           public double IrrigationAmount { get; set; }        
           [Description("Depth in the soil to apply the  irrigation (mm)")] 
           public double Depth { get; set; }      
           [Description("Efficiency of irrigation (0-1)")] 
           public double Efficiency { get; set; }       
           [Description("Will the irrigation runoff?")] 
           public bool WillRunoff { get; set; }
               
             
           [Separator("Apply fertiliser on one or more dates dd-mmm on every year of the simulation")]
           [Description("Enter the fertiliser dates as dd-mmm with comma separation (any year information entered will be ignored)")] 
           public string[] FertiliseDates { get; set; }       
           [Description("Amount of fertiliser to be applied (kg)")] 
           public double FertiliseAmount { get; set; }
           
           [Separator("Harvest and end simulation dates")]
           [Description("Set the harvest date")]
           public DateTime HarvestDate { get; set; }
           [Description("Set the end simulation date")]
           public DateTime EndCropDate { get; set; }
            
           [EventSubscribe("DoManagement")]
           private void OnDoManagement(object sender, EventArgs e)
           {            
               if (Clock.Today.Date == SowingDate)
               {
                   Sesame.Sow(population:SowingRate, cultivar:CultivarName, depth:SowingDepth, rowSpacing:RowSpacing);
                   Fert.Apply(SowingFert, FertType,0);
                   Irrig.Apply(SowingIrrigationAmount, 0);
               }
           
               foreach (string ddMMM in IrrigateDates)
               {
                   if (DateUtilities.DatesEqual(ddMMM, Clock.Today))
                       Irrig.Apply(amount: IrrigationAmount, depth: Depth, efficiency: Efficiency, willRunoff: WillRunoff);
               }
                          
               foreach (string ddMMM in FertiliseDates)
               {
                   if (DateUtilities.DatesEqual(ddMMM, Clock.Today))
                       Fert.Apply(FertiliseAmount, FertType, 0);
               }
                
               if (Clock.Today.Date == HarvestDate)
               {
                   Sesame.Harvest();
               } 
                 
               if (Clock.Today.Date == EndCropDate)
               {
                   Sesame.EndCrop();
               }           
           }
       }
   }
```
        Experiment KatherineIrrigation
          Factors: same as Validation.Sensitivity.Irrigation.EmeraldIrrigation.Factors
          Simulation KatherinerrigationBase
            Clock: Start=2012-01-15; End=2012-12-30
            Summary summaryfile
            SoilArbitrator Soil Arbitrator
            Zone paddock: Area=1; Slope=0; AspectAngle=0; Altitude=50
              Manager Initials
                ResetDateSM =
                ResetDateCN =
                InitDepth = 150, 300, 600, 900, 1200
                InitWater =
                InitNO3N =
                InitNH4N =
                InitOC =
              MicroClimate: a_interception=0; b_interception=1; c_interception=0; d_interception=0; SoilHeatFluxFraction=0.4; MinimumHeightDiffForNewLayer=0; NightInterceptionFraction=0.5; ReferenceHeight=2
              Manager CO2Trend
                C3 = 1.5264E-08
                C2 = 7.93268e-05
                C1 = 0.0578807
                C0 = 314.79058
                Target = -1
                RCP = RCP85
                KeepAt = -1
                KeepAtYear = -1
              Irrigation
              Fertiliser
              SurfaceOrganicMatter: InitialResidueName=fallow; InitialResidueType=Sesame; InitialResidueMass=100; InitialStandingFraction=0.5; InitialCPR=0; InitialCNR=55
              Plant Sesame
              Report: same as Validation.Sensitivity.Fertliser.EmeraldFertiliser.EmeraldFertiliserBase.paddock.Report
              Soil Katherine_23_Win: same as Validation.Sensitivity.Fertliser.KatherineFertiliser.KatherineFertiliserBase.paddock.Katherine_23_Win
              Manager SesameManagement: same as Validation.Sensitivity.Irrigation.EmeraldIrrigation.EmeraldIrrigationBase.paddock.SesameManagement
            Weather: FileName=Katherine_23_Win.met
        Experiment KununurraIrrigation
          Factors: same as Validation.Sensitivity.Irrigation.EmeraldIrrigation.Factors
          Simulation KununurraIrrigationBase
            Clock: Start=2012-01-15; End=2012-12-30
            Summary summaryfile
            SoilArbitrator Soil Arbitrator
            Zone paddock: Area=1; Slope=0; AspectAngle=0; Altitude=50
              Manager Initials
                ResetDateSM =
                ResetDateCN =
                InitDepth = 150, 300, 600, 900, 1200
                InitWater =
                InitNO3N =
                InitNH4N =
                InitOC =
              MicroClimate: a_interception=0; b_interception=1; c_interception=0; d_interception=0; SoilHeatFluxFraction=0.4; MinimumHeightDiffForNewLayer=0; NightInterceptionFraction=0.5; ReferenceHeight=2
              Manager CO2Trend
                C3 = 1.5264E-08
                C2 = 7.93268e-05
                C1 = 0.0578807
                C0 = 314.79058
                Target = -1
                RCP = RCP85
                KeepAt = -1
                KeepAtYear = -1
              Irrigation
              Fertiliser
              SurfaceOrganicMatter: InitialResidueName=fallow; InitialResidueType=Sesame; InitialResidueMass=100; InitialStandingFraction=0.5; InitialCPR=0; InitialCNR=55
              Plant Sesame
              Report: same as Validation.Sensitivity.Fertliser.EmeraldFertiliser.EmeraldFertiliserBase.paddock.Report
              Soil Kununurra_24_Sum: same as Validation.Australia.Kununurra.Kununurra.Factors.24.Sum_W3301_0_IR_Dec.Kununurra_24_Sum
              Manager SesameManagement: same as Validation.Sensitivity.Irrigation.EmeraldIrrigation.EmeraldIrrigationBase.paddock.SesameManagement
            Weather: FileName=Kununurra_24_Sum.met
        Experiment TullyIrrigation
          Factors: same as Validation.Sensitivity.Irrigation.EmeraldIrrigation.Factors
          Simulation TullyIrrigationBase
            Clock: Start=2012-01-15; End=2012-12-30
            Summary summaryfile
            SoilArbitrator Soil Arbitrator
            Zone paddock: Area=1; Slope=0; AspectAngle=0; Altitude=50
              Manager Initials
                ResetDateSM =
                ResetDateCN =
                InitDepth = 150, 300, 600, 900, 1200
                InitWater =
                InitNO3N =
                InitNH4N =
                InitOC =
              MicroClimate: a_interception=0; b_interception=1; c_interception=0; d_interception=0; SoilHeatFluxFraction=0.4; MinimumHeightDiffForNewLayer=0; NightInterceptionFraction=0.5; ReferenceHeight=2
              Manager CO2Trend
                C3 = 1.5264E-08
                C2 = 7.93268e-05
                C1 = 0.0578807
                C0 = 314.79058
                Target = -1
                RCP = RCP85
                KeepAt = -1
                KeepAtYear = -1
              Irrigation
              Fertiliser
              SurfaceOrganicMatter: InitialResidueName=fallow; InitialResidueType=Sesame; InitialResidueMass=100; InitialStandingFraction=0.5; InitialCPR=0; InitialCNR=55
              Plant Sesame
              Manager SesameManagement: same as Validation.Sensitivity.Irrigation.EmeraldIrrigation.EmeraldIrrigationBase.paddock.SesameManagement
              Report: same as Validation.Sensitivity.Fertliser.EmeraldFertiliser.EmeraldFertiliserBase.paddock.Report
              Soil Tully_22_Sum: same as Validation.Australia.Tully.Tully.Factors.22.Sum_W103_RF.Tully_22_Sum
            Weather: FileName=Tully_22_Sum.met
      Folder SowingDensity
        Experiment EmeraldSowingDensity
          Factors
            CompositeFactor 5: Specifications=[SesameManagement].Script.SowingRate=5
            CompositeFactor 10: Specifications=[SesameManagement].Script.SowingRate=10
            CompositeFactor 20: Specifications=[SesameManagement].Script.SowingRate=20
            CompositeFactor 40: Specifications=[SesameManagement].Script.SowingRate=40
            CompositeFactor 80: Specifications=[SesameManagement].Script.SowingRate=80
          Simulation EmeraldSowingBase
            Clock: Start=2011-11-15; End=2023-06-30
            Summary summaryfile
            Weather: FileName=Emerald.met
            SoilArbitrator Soil Arbitrator
            Zone paddock: Area=1; Slope=0; AspectAngle=0; Altitude=50
              Manager Initials
                ResetDateSM =
                ResetDateCN =
                InitDepth = 150, 300, 600, 900, 1200
                InitWater =
                InitNO3N =
                InitNH4N =
                InitOC =
              MicroClimate: a_interception=0; b_interception=1; c_interception=0; d_interception=0; SoilHeatFluxFraction=0.4; MinimumHeightDiffForNewLayer=0; NightInterceptionFraction=0.5; ReferenceHeight=2
              Manager CO2Trend
                C3 = 1.5264E-08
                C2 = 7.93268e-05
                C1 = 0.0578807
                C0 = 314.79058
                Target = -1
                RCP = RCP85
                KeepAt = -1
                KeepAtYear = -1
              Irrigation
              Fertiliser
              SurfaceOrganicMatter: InitialResidueName=fallow; InitialResidueType=Sesame; InitialResidueMass=100; InitialStandingFraction=0.5; InitialCPR=0; InitialCNR=55
              Plant Sesame
              Manager SesameManagement
                RowSpacing = 150
                SowingDepth = 20
                SowingRate = 50
                CultivarName = S57B
                SowingDate = 01/23/2012 00:00:00
                FertType = UreaN
                SowingFert = 100
                SowingIrrigationAmount = 0
                IrrigateDates = 01-mar, 01-apr, 01-may, 01-jun
                IrrigationAmount = 20
                Depth = 0
                Efficiency = 1
                WillRunoff = False
                FertiliseDates = 01-Mar
                FertiliseAmount = 50
                HarvestDate = 07/10/2012 00:00:00
                EndCropDate = 07/10/2012 00:00:00
                script: same as in Validation.Sensitivity.Irrigation.EmeraldIrrigation.EmeraldIrrigationBase.paddock.SesameManagement
              Report: same as Validation.Sensitivity.Fertliser.EmeraldFertiliser.EmeraldFertiliserBase.paddock.Report
              Soil Synthetic Soil Derived from ISRIC SoilGrids: same as Validation.Sensitivity.Fertliser.EmeraldFertiliser.EmeraldFertiliserBase.paddock.Synthetic Soil Derived from ISRIC SoilGrids
        Experiment KatherineSowingDensity
          Factors: same as Validation.Sensitivity.SowingDensity.EmeraldSowingDensity.Factors
          Simulation KatherineSowingBase
            Clock: Start=2011-11-15; End=2023-06-30
            Summary summaryfile
            SoilArbitrator Soil Arbitrator
            Zone paddock: Area=1; Slope=0; AspectAngle=0; Altitude=50
              Manager Initials
                ResetDateSM =
                ResetDateCN =
                InitDepth = 150, 300, 600, 900, 1200
                InitWater =
                InitNO3N =
                InitNH4N =
                InitOC =
              MicroClimate: a_interception=0; b_interception=1; c_interception=0; d_interception=0; SoilHeatFluxFraction=0.4; MinimumHeightDiffForNewLayer=0; NightInterceptionFraction=0.5; ReferenceHeight=2
              Manager CO2Trend
                C3 = 1.5264E-08
                C2 = 7.93268e-05
                C1 = 0.0578807
                C0 = 314.79058
                Target = -1
                RCP = RCP85
                KeepAt = -1
                KeepAtYear = -1
              Irrigation
              Fertiliser
              SurfaceOrganicMatter: InitialResidueName=fallow; InitialResidueType=Sesame; InitialResidueMass=100; InitialStandingFraction=0.5; InitialCPR=0; InitialCNR=55
              Plant Sesame
              Manager SesameManagement: same as Validation.Sensitivity.SowingDensity.EmeraldSowingDensity.EmeraldSowingBase.paddock.SesameManagement
              Report: same as Validation.Sensitivity.Fertliser.EmeraldFertiliser.EmeraldFertiliserBase.paddock.Report
              Soil Katherine_23_Win: same as Validation.Sensitivity.Fertliser.KatherineFertiliser.KatherineFertiliserBase.paddock.Katherine_23_Win
            Weather: FileName=Katherine_23_Win.met
        Experiment KununurraSowingDensity
          Factors: same as Validation.Sensitivity.SowingDensity.EmeraldSowingDensity.Factors
          Simulation KununurraSowingBase
            Clock: Start=2011-11-15; End=2023-06-30
            Summary summaryfile
            SoilArbitrator Soil Arbitrator
            Zone paddock: Area=1; Slope=0; AspectAngle=0; Altitude=50
              Manager Initials
                ResetDateSM =
                ResetDateCN =
                InitDepth = 150, 300, 600, 900, 1200
                InitWater =
                InitNO3N =
                InitNH4N =
                InitOC =
              MicroClimate: a_interception=0; b_interception=1; c_interception=0; d_interception=0; SoilHeatFluxFraction=0.4; MinimumHeightDiffForNewLayer=0; NightInterceptionFraction=0.5; ReferenceHeight=2
              Manager CO2Trend
                C3 = 1.5264E-08
                C2 = 7.93268e-05
                C1 = 0.0578807
                C0 = 314.79058
                Target = -1
                RCP = RCP85
                KeepAt = -1
                KeepAtYear = -1
              Irrigation
              Fertiliser
              SurfaceOrganicMatter: InitialResidueName=fallow; InitialResidueType=Sesame; InitialResidueMass=100; InitialStandingFraction=0.5; InitialCPR=0; InitialCNR=55
              Plant Sesame
              Manager SesameManagement: same as Validation.Sensitivity.SowingDensity.EmeraldSowingDensity.EmeraldSowingBase.paddock.SesameManagement
              Report: same as Validation.Sensitivity.Fertliser.EmeraldFertiliser.EmeraldFertiliserBase.paddock.Report
              Soil Kununurra_24_Sum: same as Validation.Australia.Kununurra.Kununurra.Factors.24.Sum_W3301_0_IR_Dec.Kununurra_24_Sum
            Weather: FileName=Kununurra_24_Sum.met
        Experiment TullySowingDensity
          Factors: same as Validation.Sensitivity.SowingDensity.EmeraldSowingDensity.Factors
          Simulation TullySowingBase
            Clock: Start=2011-11-15; End=2023-06-30
            Summary summaryfile
            SoilArbitrator Soil Arbitrator
            Zone paddock: Area=1; Slope=0; AspectAngle=0; Altitude=50
              Manager Initials
                ResetDateSM =
                ResetDateCN =
                InitDepth = 150, 300, 600, 900, 1200
                InitWater =
                InitNO3N =
                InitNH4N =
                InitOC =
              MicroClimate: a_interception=0; b_interception=1; c_interception=0; d_interception=0; SoilHeatFluxFraction=0.4; MinimumHeightDiffForNewLayer=0; NightInterceptionFraction=0.5; ReferenceHeight=2
              Manager CO2Trend
                C3 = 1.5264E-08
                C2 = 7.93268e-05
                C1 = 0.0578807
                C0 = 314.79058
                Target = -1
                RCP = RCP85
                KeepAt = -1
                KeepAtYear = -1
              Irrigation
              Fertiliser
              SurfaceOrganicMatter: InitialResidueName=fallow; InitialResidueType=Sesame; InitialResidueMass=100; InitialStandingFraction=0.5; InitialCPR=0; InitialCNR=55
              Plant Sesame
              Manager SesameManagement: same as Validation.Sensitivity.SowingDensity.EmeraldSowingDensity.EmeraldSowingBase.paddock.SesameManagement
              Report: same as Validation.Sensitivity.Fertliser.EmeraldFertiliser.EmeraldFertiliserBase.paddock.Report
              Soil Tully_22_Sum: same as Validation.Australia.Tully.Tully.Factors.22.Sum_W103_RF.Tully_22_Sum
            Weather: FileName=Tully_22_Sum.met
      Folder SowingDate
        Folder EmeraldSowingDate
          Experiment EmJan
            Factors
              CompositeFactor 2011: same as Validation.Sensitivity.Fertliser.EmeraldFertiliser.Factors.2011-100
              CompositeFactor 2012: same as Validation.Sensitivity.Fertliser.EmeraldFertiliser.Factors.2012-100
              CompositeFactor 2013: same as Validation.Sensitivity.Fertliser.EmeraldFertiliser.Factors.2013-100
              CompositeFactor 2014: same as Validation.Sensitivity.Fertliser.EmeraldFertiliser.Factors.2014-100
              CompositeFactor 2015: same as Validation.Sensitivity.Fertliser.EmeraldFertiliser.Factors.2015-100
              CompositeFactor 2016: same as Validation.Sensitivity.Fertliser.EmeraldFertiliser.Factors.2016-100
              CompositeFactor 2017: same as Validation.Sensitivity.Fertliser.EmeraldFertiliser.Factors.2017-100
              CompositeFactor 2018: same as Validation.Sensitivity.Fertliser.EmeraldFertiliser.Factors.2018-100
              CompositeFactor 2019: same as Validation.Sensitivity.Fertliser.EmeraldFertiliser.Factors.2019-100
              CompositeFactor 2020: same as Validation.Sensitivity.Fertliser.EmeraldFertiliser.Factors.2020-100
            Simulation EmeraldSowingDateBaseJan: same as Validation.Sensitivity.Fertliser.EmeraldFertiliser.EmeraldFertiliserBase
          Experiment EmApr
            Factors
              CompositeFactor 2011
                Specifications:
                  [Clock]
                  [Management]
                  [AutoIrrigation].Script.AutoIrrigationOn = true
                Clock: Start=2011-02-01; End=2011-12-30
                Operations Management
                  2011-04-01  [Fertiliser].Apply(amount: 100, type: "UreaN");
                  2011-04-01  [Sesame].Sow(population:40, cultivar:"S57B", depth:30, rowSpacing:250);
                  2011-10-18  [Sesame].Harvest();
                  2011-10-18  [Sesame].EndCrop()
              CompositeFactor 2012
                Specifications:
                  [Clock]
                  [Management]
                  [AutoIrrigation].Script.AutoIrrigationOn = true
                Clock: Start=2012-02-01; End=2012-12-30
                Operations Management
                  2012-04-01  [Fertiliser].Apply(amount: 100, type: "UreaN");
                  2012-04-01  [Sesame].Sow(population:40, cultivar:"S57B", depth:30, rowSpacing:250);
                  2012-10-18  [Sesame].Harvest();
                  2012-10-18  [Sesame].EndCrop()
              CompositeFactor 2013
                Specifications:
                  [Clock]
                  [Management]
                  [AutoIrrigation].Script.AutoIrrigationOn = true
                Clock: Start=2013-02-01; End=2013-12-30
                Operations Management
                  2013-04-01  [Fertiliser].Apply(amount: 100, type: "UreaN");
                  2013-04-01  [Sesame].Sow(population:40, cultivar:"S57B", depth:30, rowSpacing:250);
                  2013-10-18  [Sesame].Harvest();
                  2013-10-18  [Sesame].EndCrop()
              CompositeFactor 2014
                Specifications:
                  [Clock]
                  [Management]
                  [AutoIrrigation].Script.AutoIrrigationOn = true
                Clock: Start=2014-02-01; End=2014-12-30
                Operations Management
                  2014-04-01  [Fertiliser].Apply(amount: 100, type: "UreaN");
                  2014-04-01  [Sesame].Sow(population:40, cultivar:"S57B", depth:30, rowSpacing:250);
                  2014-10-18  [Sesame].Harvest();
                  2014-10-18  [Sesame].EndCrop()
              CompositeFactor 2015
                Specifications:
                  [Clock]
                  [Management]
                  [AutoIrrigation].Script.AutoIrrigationOn = true
                Clock: Start=2015-02-01; End=2015-12-30
                Operations Management
                  2015-04-01  [Fertiliser].Apply(amount: 100, type: "UreaN");
                  2015-04-01  [Sesame].Sow(population:40, cultivar:"S57B", depth:30, rowSpacing:250);
                  2015-10-18  [Sesame].Harvest();
                  2015-10-18  [Sesame].EndCrop()
              CompositeFactor 2016
                Specifications:
                  [Clock]
                  [Management]
                  [AutoIrrigation].Script.AutoIrrigationOn = true
                Clock: Start=2016-02-01; End=2016-12-30
                Operations Management
                  2016-04-01  [Fertiliser].Apply(amount: 100, type: "UreaN");
                  2016-04-01  [Sesame].Sow(population:40, cultivar:"S57B", depth:30, rowSpacing:250);
                  2016-10-18  [Sesame].Harvest();
                  2016-10-18  [Sesame].EndCrop()
              CompositeFactor 2017
                Specifications:
                  [Clock]
                  [Management]
                  [AutoIrrigation].Script.AutoIrrigationOn = true
                Clock: Start=2017-02-01; End=2017-12-30
                Operations Management
                  2017-04-01  [Fertiliser].Apply(amount: 100, type: "UreaN");
                  2017-04-01  [Sesame].Sow(population:40, cultivar:"S57B", depth:30, rowSpacing:250);
                  2017-10-18  [Sesame].Harvest();
                  2017-10-18  [Sesame].EndCrop()
              CompositeFactor 2018
                Specifications:
                  [Clock]
                  [Management]
                  [AutoIrrigation].Script.AutoIrrigationOn = true
                Clock: Start=2018-02-01; End=2018-12-30
                Operations Management
                  2018-04-01  [Fertiliser].Apply(amount: 100, type: "UreaN");
                  2018-04-01  [Sesame].Sow(population:40, cultivar:"S57B", depth:30, rowSpacing:250);
                  2018-10-18  [Sesame].Harvest();
                  2018-10-18  [Sesame].EndCrop()
              CompositeFactor 2019
                Specifications:
                  [Clock]
                  [Management]
                  [AutoIrrigation].Script.AutoIrrigationOn = true
                Clock: Start=2019-02-01; End=2019-12-30
                Operations Management
                  2019-04-01  [Fertiliser].Apply(amount: 100, type: "UreaN");
                  2019-04-01  [Sesame].Sow(population:40, cultivar:"S57B", depth:30, rowSpacing:250);
                  2019-10-18  [Sesame].Harvest();
                  2019-10-18  [Sesame].EndCrop()
              CompositeFactor 2020
                Specifications:
                  [Clock]
                  [Management]
                  [AutoIrrigation].Script.AutoIrrigationOn = true
                Clock: Start=2020-02-01; End=2020-12-30
                Operations Management
                  2020-04-01  [Fertiliser].Apply(amount: 100, type: "UreaN");
                  2020-04-01  [Sesame].Sow(population:40, cultivar:"S57B", depth:30, rowSpacing:250);
                  2020-10-18  [Sesame].Harvest();
                  2020-10-18  [Sesame].EndCrop()
            Simulation EmeraldSowingDateBaseApr: same as Validation.Sensitivity.Fertliser.EmeraldFertiliser.EmeraldFertiliserBase
          Experiment EmJun
            Factors
              CompositeFactor 2011
                Specifications:
                  [Clock]
                  [Management]
                  [AutoIrrigation].Script.AutoIrrigationOn = true
                Clock: Start=2011-02-01; End=2011-12-30
                Operations Management
                  2011-06-01  [Fertiliser].Apply(amount: 100, type: "UreaN");
                  2011-06-01  [Sesame].Sow(population:40, cultivar:"S57B", depth:30, rowSpacing:250);
                  2011-12-18  [Sesame].Harvest();
                  2011-12-18  [Sesame].EndCrop()
              CompositeFactor 2012
                Specifications:
                  [Clock]
                  [Management]
                  [AutoIrrigation].Script.AutoIrrigationOn = true
                Clock: Start=2012-02-01; End=2012-12-30
                Operations Management
                  2012-06-01  [Fertiliser].Apply(amount: 100, type: "UreaN");
                  2012-06-01  [Sesame].Sow(population:40, cultivar:"S57B", depth:30, rowSpacing:250);
                  2012-12-18  [Sesame].Harvest();
                  2012-12-18  [Sesame].EndCrop()
              CompositeFactor 2013
                Specifications:
                  [Clock]
                  [Management]
                  [AutoIrrigation].Script.AutoIrrigationOn = true
                Clock: Start=2013-02-01; End=2013-12-30
                Operations Management
                  2013-06-01  [Fertiliser].Apply(amount: 100, type: "UreaN");
                  2013-06-01  [Sesame].Sow(population:40, cultivar:"S57B", depth:30, rowSpacing:250);
                  2013-12-18  [Sesame].Harvest();
                  2013-12-18  [Sesame].EndCrop()
              CompositeFactor 2014
                Specifications:
                  [Clock]
                  [Management]
                  [AutoIrrigation].Script.AutoIrrigationOn = true
                Clock: Start=2014-02-01; End=2014-12-30
                Operations Management
                  2014-06-01  [Fertiliser].Apply(amount: 100, type: "UreaN");
                  2014-06-01  [Sesame].Sow(population:40, cultivar:"S57B", depth:30, rowSpacing:250);
                  2014-12-18  [Sesame].Harvest();
                  2014-12-18  [Sesame].EndCrop()
              CompositeFactor 2015
                Specifications:
                  [Clock]
                  [Management]
                  [AutoIrrigation].Script.AutoIrrigationOn = true
                Clock: Start=2015-02-01; End=2015-12-30
                Operations Management
                  2015-06-01  [Fertiliser].Apply(amount: 100, type: "UreaN");
                  2015-06-01  [Sesame].Sow(population:40, cultivar:"S57B", depth:30, rowSpacing:250);
                  2015-12-18  [Sesame].Harvest();
                  2015-12-18  [Sesame].EndCrop()
              CompositeFactor 2016
                Specifications:
                  [Clock]
                  [Management]
                  [AutoIrrigation].Script.AutoIrrigationOn = true
                Clock: Start=2016-02-01; End=2016-12-30
                Operations Management
                  2016-06-01  [Fertiliser].Apply(amount: 100, type: "UreaN");
                  2016-06-01  [Sesame].Sow(population:40, cultivar:"S57B", depth:30, rowSpacing:250);
                  2016-12-18  [Sesame].Harvest();
                  2016-12-18  [Sesame].EndCrop()
              CompositeFactor 2017
                Specifications:
                  [Clock]
                  [Management]
                  [AutoIrrigation].Script.AutoIrrigationOn = true
                Clock: Start=2017-02-01; End=2017-12-30
                Operations Management
                  2017-06-01  [Fertiliser].Apply(amount: 100, type: "UreaN");
                  2017-06-01  [Sesame].Sow(population:40, cultivar:"S57B", depth:30, rowSpacing:250);
                  2017-12-18  [Sesame].Harvest();
                  2017-12-18  [Sesame].EndCrop()
              CompositeFactor 2018
                Specifications:
                  [Clock]
                  [Management]
                  [AutoIrrigation].Script.AutoIrrigationOn = true
                Clock: Start=2018-02-01; End=2018-12-30
                Operations Management
                  2018-06-01  [Fertiliser].Apply(amount: 100, type: "UreaN");
                  2018-06-01  [Sesame].Sow(population:40, cultivar:"S57B", depth:30, rowSpacing:250);
                  2018-12-18  [Sesame].Harvest();
                  2018-12-18  [Sesame].EndCrop()
              CompositeFactor 2019
                Specifications:
                  [Clock]
                  [Management]
                  [AutoIrrigation].Script.AutoIrrigationOn = true
                Clock: Start=2019-02-01; End=2019-12-30
                Operations Management
                  2019-06-01  [Fertiliser].Apply(amount: 100, type: "UreaN");
                  2019-06-01  [Sesame].Sow(population:40, cultivar:"S57B", depth:30, rowSpacing:250);
                  2019-12-18  [Sesame].Harvest();
                  2019-12-18  [Sesame].EndCrop()
              CompositeFactor 2020
                Specifications:
                  [Clock]
                  [Management]
                  [AutoIrrigation].Script.AutoIrrigationOn = true
                Clock: Start=2020-02-01; End=2020-12-30
                Operations Management
                  2020-06-01  [Fertiliser].Apply(amount: 100, type: "UreaN");
                  2020-06-01  [Sesame].Sow(population:40, cultivar:"S57B", depth:30, rowSpacing:250);
                  2020-12-18  [Sesame].Harvest();
                  2020-12-18  [Sesame].EndCrop()
            Simulation EmeraldSowingDateBaseJun: same as Validation.Sensitivity.Fertliser.EmeraldFertiliser.EmeraldFertiliserBase
          Experiment EmNov
            Factors
              CompositeFactor 2011
                Specifications:
                  [Clock]
                  [Management]
                  [AutoIrrigation].Script.AutoIrrigationOn = true
                Clock: Start=2011-10-01; End=2012-09-30
                Operations Management
                  2011-11-01  [Fertiliser].Apply(amount: 100, type: "UreaN");
                  2011-11-01  [Sesame].Sow(population:40, cultivar:"S57B", depth:30, rowSpacing:250);
                  2012-05-18  [Sesame].Harvest();
                  2012-05-18  [Sesame].EndCrop()
              CompositeFactor 2012
                Specifications:
                  [Clock]
                  [Management]
                  [AutoIrrigation].Script.AutoIrrigationOn = true
                Clock: Start=2012-10-01; End=2013-09-30
                Operations Management
                  2012-11-01  [Fertiliser].Apply(amount: 100, type: "UreaN");
                  2012-11-01  [Sesame].Sow(population:40, cultivar:"S57B", depth:30, rowSpacing:250);
                  2013-05-18  [Sesame].Harvest();
                  2013-05-18  [Sesame].EndCrop()
              CompositeFactor 2013
                Specifications:
                  [Clock]
                  [Management]
                  [AutoIrrigation].Script.AutoIrrigationOn = true
                Clock: Start=2013-10-01; End=2014-09-30
                Operations Management
                  2013-11-01  [Fertiliser].Apply(amount: 100, type: "UreaN");
                  2013-11-01  [Sesame].Sow(population:40, cultivar:"S57B", depth:30, rowSpacing:250);
                  2014-05-18  [Sesame].Harvest();
                  2014-05-18  [Sesame].EndCrop()
              CompositeFactor 2014
                Specifications:
                  [Clock]
                  [Management]
                  [AutoIrrigation].Script.AutoIrrigationOn = true
                Clock: Start=2014-10-01; End=2015-09-30
                Operations Management
                  2014-11-01  [Fertiliser].Apply(amount: 100, type: "UreaN");
                  2014-11-01  [Sesame].Sow(population:40, cultivar:"S57B", depth:30, rowSpacing:250);
                  2015-05-18  [Sesame].Harvest();
                  2015-05-18  [Sesame].EndCrop()
              CompositeFactor 2015
                Specifications:
                  [Clock]
                  [Management]
                  [AutoIrrigation].Script.AutoIrrigationOn = true
                Clock: Start=2015-10-01; End=2016-09-30
                Operations Management
                  2015-11-01  [Fertiliser].Apply(amount: 100, type: "UreaN");
                  2015-11-01  [Sesame].Sow(population:40, cultivar:"S57B", depth:30, rowSpacing:250);
                  2016-05-18  [Sesame].Harvest();
                  2016-05-18  [Sesame].EndCrop()
              CompositeFactor 2016
                Specifications:
                  [Clock]
                  [Management]
                  [AutoIrrigation].Script.AutoIrrigationOn = true
                Clock: Start=2016-10-01; End=2017-09-30
                Operations Management
                  2016-11-01  [Fertiliser].Apply(amount: 100, type: "UreaN");
                  2016-11-01  [Sesame].Sow(population:40, cultivar:"S57B", depth:30, rowSpacing:250);
                  2017-05-18  [Sesame].Harvest();
                  2017-05-18  [Sesame].EndCrop()
              CompositeFactor 2017
                Specifications:
                  [Clock]
                  [Management]
                  [AutoIrrigation].Script.AutoIrrigationOn = true
                Clock: Start=2017-10-01; End=2018-09-30
                Operations Management
                  2017-11-01  [Fertiliser].Apply(amount: 100, type: "UreaN");
                  2017-11-01  [Sesame].Sow(population:40, cultivar:"S57B", depth:30, rowSpacing:250);
                  2018-05-18  [Sesame].Harvest();
                  2018-05-18  [Sesame].EndCrop()
              CompositeFactor 2018
                Specifications:
                  [Clock]
                  [Management]
                  [AutoIrrigation].Script.AutoIrrigationOn = true
                Clock: Start=2018-10-01; End=2019-09-30
                Operations Management
                  2018-11-01  [Fertiliser].Apply(amount: 100, type: "UreaN");
                  2018-11-01  [Sesame].Sow(population:40, cultivar:"S57B", depth:30, rowSpacing:250);
                  2019-05-18  [Sesame].Harvest();
                  2019-05-18  [Sesame].EndCrop()
              CompositeFactor 2019
                Specifications:
                  [Clock]
                  [Management]
                  [AutoIrrigation].Script.AutoIrrigationOn = true
                Clock: Start=2019-10-01; End=2020-09-30
                Operations Management
                  2019-11-01  [Fertiliser].Apply(amount: 100, type: "UreaN");
                  2019-11-01  [Sesame].Sow(population:40, cultivar:"S57B", depth:30, rowSpacing:250);
                  2020-05-18  [Sesame].Harvest();
                  2020-05-18  [Sesame].EndCrop()
              CompositeFactor 2020
                Specifications:
                  [Clock]
                  [Management]
                  [AutoIrrigation].Script.AutoIrrigationOn = true
                Clock: Start=2020-10-01; End=2021-09-30
                Operations Management
                  2020-11-01  [Fertiliser].Apply(amount: 100, type: "UreaN");
                  2020-11-01  [Sesame].Sow(population:40, cultivar:"S57B", depth:30, rowSpacing:250);
                  2021-05-18  [Sesame].Harvest();
                  2021-05-18  [Sesame].EndCrop()
            Simulation EmeraldSowingDateBase: same as Validation.Sensitivity.Fertliser.EmeraldFertiliser.EmeraldFertiliserBase
        Folder KatherineSowingDate
          Experiment KtJan
            Factors: same as Validation.Sensitivity.SowingDate.EmeraldSowingDate.EmJan.Factors
            Simulation KatherineSowingDateBaseJan: same as Validation.Sensitivity.Fertliser.KatherineFertiliser.KatherineFertiliserBase
          Experiment KtApr
            Factors: same as Validation.Sensitivity.SowingDate.EmeraldSowingDate.EmApr.Factors
            Simulation KatherineSowingDateBaseApr: same as Validation.Sensitivity.Fertliser.KatherineFertiliser.KatherineFertiliserBase
          Experiment KtJun
            Factors: same as Validation.Sensitivity.SowingDate.EmeraldSowingDate.EmJun.Factors
            Simulation KatherineSowingDateBaseJun: same as Validation.Sensitivity.Fertliser.KatherineFertiliser.KatherineFertiliserBase
          Experiment KtNov
            Factors: same as Validation.Sensitivity.SowingDate.EmeraldSowingDate.EmNov.Factors
            Simulation KatherineSowingDateBaseNov: same as Validation.Sensitivity.Fertliser.KatherineFertiliser.KatherineFertiliserBase
        Folder KununurraSowingDate
          Experiment KnJan
            Factors: same as Validation.Sensitivity.SowingDate.EmeraldSowingDate.EmJan.Factors
            Simulation KununurraSowingDateBaseJan: same as Validation.Sensitivity.Fertliser.KununurraFertiliser.KununurraFertiliserBase
          Experiment KnApr
            Factors: same as Validation.Sensitivity.SowingDate.EmeraldSowingDate.EmApr.Factors
            Simulation KununurraSowingDateBaseApr: same as Validation.Sensitivity.Fertliser.KununurraFertiliser.KununurraFertiliserBase
          Experiment KnJun
            Factors: same as Validation.Sensitivity.SowingDate.EmeraldSowingDate.EmJun.Factors
            Simulation KununurraSowingDateBaseJun: same as Validation.Sensitivity.Fertliser.KununurraFertiliser.KununurraFertiliserBase
          Experiment KnNov
            Factors: same as Validation.Sensitivity.SowingDate.EmeraldSowingDate.EmNov.Factors
            Simulation KununurraSowingDateBaseNov: same as Validation.Sensitivity.Fertliser.KununurraFertiliser.KununurraFertiliserBase
        Folder TullySowingDate
          Experiment TlJan
            Factors: same as Validation.Sensitivity.SowingDate.EmeraldSowingDate.EmJan.Factors
            Simulation TullySowingDateBaseJan: same as Validation.Sensitivity.Fertliser.TullyFertiliser.TullyFertiliserBase
          Experiment TlApr
            Factors: same as Validation.Sensitivity.SowingDate.EmeraldSowingDate.EmApr.Factors
            Simulation TullySowingDateBaseApr: same as Validation.Sensitivity.Fertliser.TullyFertiliser.TullyFertiliserBase
          Experiment TlJun
            Factors: same as Validation.Sensitivity.SowingDate.EmeraldSowingDate.EmJun.Factors
            Simulation TullySowingDateBaseJun: same as Validation.Sensitivity.Fertliser.TullyFertiliser.TullyFertiliserBase
          Experiment TlNov
            Factors: same as Validation.Sensitivity.SowingDate.EmeraldSowingDate.EmNov.Factors
            Simulation TullySowingDateBaseNov: same as Validation.Sensitivity.Fertliser.TullyFertiliser.TullyFertiliserBase
      Folder Location
        Experiment _
          Factors
            Factor Tully
              CompositeFactor Dec
                Specifications:
                  [Clock]
                  [Weather]
                  [Management]
                  [Soil]
                Clock: Start=2010-10-01; End=2023-09-30
                Weather: FileName=Tully_23_WinSilo.met
                Operations Management
                  2011-11-01  [Fertiliser].Apply(amount: 100, type: "UreaN");
                  2011-11-01  [Sesame].Sow(population:40, cultivar:"S57B", depth:30, rowSpacing:250);
                  2012-05-18  [Sesame].Harvest();
                  2012-05-18  [Sesame].EndCrop()
                Soil Tully_23_Win: same as Validation.Australia.Tully.Tully.Factors.23.Win_B_0_RF.Tully_23_Win
              CompositeFactor May
                Specifications:
                  [Clock]
                  [Weather]
                  [Management]
                  [Soil]
                Clock: Start=2010-10-01; End=2023-09-30
                Weather: FileName=ChartersTowers.met
                Operations Management
                  2012-05-01  [Fertiliser].Apply(amount: 100, type: "UreaN");
                  2012-05-01  [Sesame].Sow(population:40, cultivar:"S57B", depth:30, rowSpacing:250);
                  2012-11-18  [Sesame].Harvest();
                  2012-11-18  [Sesame].EndCrop()
                Soil Synthetic Soil Derived from ISRIC SoilGrids: ASCOrder=NA; ASCSubOrder=NA; SoilType=Haplic Lixisols; Site=NA; NearestTown=NA; Region=NA; State=NA; Country=Australia; NaturalVegetation=NA; ApsoilNumber=9999; Latitude=-20.125; Longitude=146.375; LocationAccuracy=+- 250 m; YearOfSampling=2019; DataSource=ISRIC SoilGrids
                  Water: Thickness=[150, 150, 150, 150, 140]; InitialValues=[0.143, 0.165, 0.18, 0.18, 0.178]; FilledFromTop=true
                  Physical
                    Thickness  ParticleSizeSand  ParticleSizeSilt  ParticleSizeClay  Rocks  BD     AirDry  LL15   DUL    SAT    KS
                    150        69                8.2               23.3              0      1.437  0.048   0.143  0.223  0.417  23.448
                    150        63                8                 29.5              0      1.457  0.055   0.165  0.242  0.415  11.467
                    150        59                7.8               33.2              0      1.474  0.06    0.18   0.253  0.417  7.422
                    150        59                7.3               33.8              0      1.494  0.06    0.18   0.253  0.413  7.004
                    140        59.2              7                 33.8              0      1.505  0.059   0.178  0.251  0.41   7.004
                    Rocks source: Calculated
                    SoilCrop SesameSoil: LL=[0.07, 0.08, 0.1, 0.125631, 0.183577]; KL=[0.06, 0.06, 0.06, 0.0569284, 0.041685]; XF=[1, 1, 1, 0.93, 0.85]
                  WaterBalance SoilWater: SummerDate=1-nov; SummerU=6; SummerCona=6; WinterDate=1-apr; WinterU=6; WinterCona=6; DiffusConst=29142.35; DiffusSlope=-12.8; Salb=0.13; CN2Bare=73; CNRed=20; CNCov=0; DischargeWidth=5; CatchmentArea=10; PSIDul=-100; Thickness=[150, 150, 150, 150, 140]; SWCON=[0.347, 0.259, 0.206, 0.202, 0.213]
                  Organic: FOMCNRatio=40; CarbonUnits=Total
                    Thickness  Carbon  SoilCNRatio  FBiom  FInert  FOM
                    150        0.936   8.2          0.04   0.643   214.95
                    150        0.779   8.2          0.031  0.762   117.014
                    150        0.699   8.2          0.014  0.839   63.7002
                    150        0.636   8.2          0.01   0.91    34.6771
                    140        0.52    8.2          0.01   0.99    19.6586
                  Chemical: PHUnits=Water
                    Thickness  PH    CEC
                    150        6.75  12.9501
                    150        6.95  13.85025
                    150        7.3   14.3902
                    150        7.7   14.4086
                    140        7.95  14.161
                    CEC source: Calculated
                  Nutrient
                  Solute NO3: Thickness=[150, 150, 150, 150, 140]; InitialValues=[0, 0, 0, 0, 0]; InitialValuesUnits=ppm; WaterTableConcentration=0; D0=0; DepthConstant=0; MaxDepthSoluteAccessible=0; RunoffEffectivenessAtMovingSolute=0; MaxEffectiveRunoff=0
                  Solute NH4: same as Validation.Sensitivity.Location._.Factors.Tully.May.Synthetic Soil Derived from ISRIC SoilGrids.NO3
                  Solute Urea: Thickness=[150, 150, 150, 150, 140]; InitialValues=[0, 0, 0, 0, 0]; InitialValuesUnits=kg/ha; WaterTableConcentration=0; D0=0; DepthConstant=0; MaxDepthSoluteAccessible=0; RunoffEffectivenessAtMovingSolute=0; MaxEffectiveRunoff=0
                  SoilTemperature Temperature
            Factor ChartersTwr
              CompositeFactor Dec
                Specifications:
                  [Clock]
                  [Weather]
                  [Management]
                  [Soil]
                Clock: Start=2010-10-01; End=2023-09-30
                Weather: FileName=ChartersTowers.met
                Operations Management: same as Validation.Sensitivity.Location._.Factors.Tully.Dec.Management
                Soil Synthetic Soil Derived from ISRIC SoilGrids: same as Validation.Sensitivity.Location._.Factors.Tully.May.Synthetic Soil Derived from ISRIC SoilGrids
              CompositeFactor May: same as Validation.Sensitivity.Location._.Factors.Tully.May
            Factor Emerald
              CompositeFactor Dec
                Specifications:
                  [Clock]
                  [Weather]
                  [Management]
                  [Soil]
                Clock: Start=2010-10-01; End=2023-09-30
                Weather: FileName=Emerald.met
                Operations Management: same as Validation.Sensitivity.Location._.Factors.Tully.Dec.Management
                Soil EmeraldSoil: SoilType=SoilType=sandy loam; Country=Australia; ApsoilNumber=0; Latitude=-23.57185; Longitude=148.2111
                  DataSource=Original source is Soil and Landscape Grid of Australia. See: https://esoil.io/TERNLandscapes/Public/Pages/SLGA/index.html 2025-06-25 21:32:37.107768
                  Comments=resolution=90 m - taxonomic classification name = sandy loam - drainage class = NA - elevation = NA - slope = NA - geomdesc = NA
                  Water: Thickness=[50, 100, 150, 300, 400, 510]; InitialValues=[0.2, 0.2, 0.22, 0.23, 0.26, 0.24]; FilledFromTop=true
                  Physical
                    Thickness  ParticleSizeSand  ParticleSizeSilt  ParticleSizeClay  Rocks  BD    AirDry  LL15  DUL   SAT       KS
                    50         73                9                 18                0      1.44  0.035   0.07  0.2   0.406604  2626.33
                    100        71                9                 20                0      1.46  0.064   0.08  0.2   0.399057  2242.77
                    150        64                10                26                0      1.52  0.08    0.1   0.22  0.376415  1083.53
                    300        56                10                34                0      1.54  0.12    0.12  0.23  0.388868  1058.9
                    400        50                10                39                0      1.56  0.15    0.15  0.26  0.381321  467.069
                    510        51                10                38                0      1.57  0.13    0.13  0.24  0.377547  690.731
                    Rocks source: Calculated
                    SoilCrop SesameSoil: LL=[0.07, 0.08, 0.1, 0.125631, 0.183577, 0.203363]; KL=[0.06, 0.06, 0.06, 0.0569284, 0.041685, 0.0199841]; XF=[1, 1, 1, 0.93, 0.85, 0.83]
                    SoilCrop SoybeanSoil: LL=[0.07, 0.08, 0.1, 0.123249, 0.169372, 0.172325]; KL=[0.06, 0.06, 0.06, 0.0582279, 0.0494337, 0.0369139]; XF=[1, 1, 1, 0.93, 0.85, 0.83]
                    SoilCrop WheatSoil: same as Validation.Sensitivity.Location._.Factors.Emerald.Dec.EmeraldSoil.Physical.SoybeanSoil
                    SoilCrop MaizeSoil: same as Validation.Sensitivity.Location._.Factors.Emerald.Dec.EmeraldSoil.Physical.SesameSoil
                  WaterBalance SoilWater: SummerDate=1-nov; SummerU=6; SummerCona=6; WinterDate=1-apr; WinterU=4; WinterCona=2.5; DiffusConst=27634.79; DiffusSlope=-13.05; Salb=0.13; CN2Bare=68; CNRed=20; CNCov=0; DischargeWidth=5; CatchmentArea=10; PSIDul=-100
                  Solute NO3: Thickness=[50, 100, 150, 300, 400, 510]; InitialValues=[10, 5, 5, 1, 1, 1]; InitialValuesUnits=ppm; WaterTableConcentration=0; D0=0; DepthConstant=0; MaxDepthSoluteAccessible=0; RunoffEffectivenessAtMovingSolute=0; MaxEffectiveRunoff=0
                  Solute NH4: Thickness=[50, 100, 150, 300, 400, 510]; InitialValuesUnits=ppm; WaterTableConcentration=0; D0=0; DepthConstant=0; MaxDepthSoluteAccessible=0; RunoffEffectivenessAtMovingSolute=0; MaxEffectiveRunoff=0
                    InitialValues=[0.05, 0.0495025, 0.0490099, 0.0485223, 0.0480395, 0.0475615]
                  Solute Urea: Thickness=[50, 100, 150, 300, 400, 510]; InitialValues=[0, 0, 0, 0, 0, 0]; InitialValuesUnits=kg/ha; WaterTableConcentration=0; D0=0; DepthConstant=0; MaxDepthSoluteAccessible=0; RunoffEffectivenessAtMovingSolute=0; MaxEffectiveRunoff=0
                  Organic: FOMCNRatio=40; CarbonUnits=Total
                    Thickness  Carbon  SoilCNRatio  FBiom      FInert    FOM
                    50         1.25    12           0.04       0.8       150
                    100        1.11    12           0.0327492  0.80804   122.81
                    150        0.88    12           0.0268128  0.816161  100.548
                    300        0.47    12           0.0219525  0.824364  82.3217
                    400        0.3     12           0.0179732  0.832649  67.3993
                    510        0.17    12           0.0147152  0.841017  55.1819
                  Chemical: PHUnits=Water
                    Thickness  PH   CEC
                    50         7.1  12.5095
                    100        7.1  12.5945
                    150        7.2  13.21
                    300        7.5  13.8875
                    400        7.6  14.438
                    510        7.3  13.9455
                    CEC source: Calculated
                  Nutrient
                  SoilTemperature Temperature
              CompositeFactor May: same as Validation.Sensitivity.Location._.Factors.Tully.May
            Factor Dalby
              CompositeFactor Dec
                Specifications:
                  [Clock]
                  [Weather]
                  [Management]
                  [Soil]
                Clock: Start=2022-10-01; End=2023-09-30
                Weather: FileName=Dalby.met
                Operations Management
                  2022-11-01  [Fertiliser].Apply(amount: 100, type: "UreaN");
                  2022-11-01  [Sesame].Sow(population:40, cultivar:"S57B", depth:30, rowSpacing:250);
                  2022-11-01  [Irrigation].Apply(amount:40);
                  2023-01-01  [Irrigation].Apply(amount:40);
                  2023-02-01  [Irrigation].Apply(amount:40);
                  2023-03-01  [Irrigation].Apply(amount:40);
                  2023-05-18  [Sesame].Harvest();
                  2023-05-18  [Sesame].EndCrop()
                Soil Black Vertosol-Bongeen (Dalby No027): ASCOrder=Vertosol; ASCSubOrder=Black; SoilType=Clay; Site=Dalby; NearestTown=Dalby, Q 4405; Region=Darling Downs and Granite Belt; State=Queensland; Country=Australia; ApsoilNumber=27; Latitude=-27.123; Longitude=151.305; LocationAccuracy=+/- 20m; YearOfSampling=0; DataSource=CSIRO Sustainable Ecosystems, Toowoomba
                  Comments=Clay - Toowoomba - Wheat ll,xf copied from sorghum. Wheat kl is just default apsim kl values for wheat.
                  Physical
                    Thickness  ParticleSizeSand  ParticleSizeSilt  ParticleSizeClay  Rocks  BD    AirDry  LL15  DUL   SAT
                    150        5                 65                30                0      1.25  0.035   0.23  0.45  0.5
                    150        5                 65                30                0      1.31  0.064   0.23  0.43  0.48
                    300        5                 65                30                0      1.23  0.08    0.23  0.46  0.51
                    300        5                 65                30                0      1.24  0.12    0.23  0.45  0.5
                    300        5                 65                30                0      1.25  0.15    0.23  0.45  0.5
                    300        5                 65                30                0      1.26  0.13    0.23  0.44  0.49
                    300        5                 65                30                0      1.29  0.23    0.23  0.43  0.48
                    BD, DUL source: Field measured and checked for sensibility
                    LL15 source: Estimated based on local knowledge
                    SAT source: Calculated from measured, estimated or calculated BD
                    Rocks, ParticleSizeSand, ParticleSizeSilt, ParticleSizeClay source: Calculated
                    SoilCrop SesameSoil: LL=[0.07, 0.08, 0.1, 0.126, 0.184, 0.203, 0.23]; KL=[0.06, 0.06, 0.06, 0.057, 0.042, 0.02, 0.06]; XF=[1, 1, 1, 0.93, 0.85, 0.83, 1]
                      LL, KL, XF source: Calculated (layer 7)
                  WaterBalance SoilWater: SummerDate=1-Nov; SummerU=6; SummerCona=3.5; WinterDate=1-Apr; WinterU=4; WinterCona=2.5; DiffusConst=40; DiffusSlope=16; Salb=0.12; CN2Bare=73; CNRed=20; CNCov=0.8; PSIDul=-100; Thickness=[150, 150, 300, 300, 300, 300, 300]; SWCON=[0.3, 0.3, 0.3, 0.3, 0.3, 0.3, 0.3]
                  Organic: FOMCNRatio=40; CarbonUnits=WalkleyBlack
                    Thickness  Carbon  SoilCNRatio  FBiom  FInert  FOM
                    150        2.5     12           0.04   0.4     347.129
                    150        2.5     12           0.02   0.6     270.344
                    300        2.5     12           0.02   0.8     163.972
                    300        2       12           0.02   1       99.4541
                    300        2       12           0.01   1       60.322
                    300        2       12           0.01   1       36.5871
                    300        2       12           0.01   1       22.1912
                  Chemical: PHUnits=Water
                    Thickness  PH   CEC
                    150        8.2  13.97
                    150        8.5  13.97
                    300        8.6  13.97
                    300        8.6  12.845
                    300        7.4  12.845
                    300        5.3  12.845
                    300        5.3  12.845
                    CEC source: Calculated
                    PH source: Estimated based on local knowledge
                  Nutrient
                  Solute NO3: InitialValuesUnits=ppm; WaterTableConcentration=0; D0=0; DepthConstant=0; MaxDepthSoluteAccessible=0; RunoffEffectivenessAtMovingSolute=0; MaxEffectiveRunoff=0
                  Solute NH4: InitialValuesUnits=ppm; WaterTableConcentration=0; D0=0; DepthConstant=0; MaxDepthSoluteAccessible=0; RunoffEffectivenessAtMovingSolute=0; MaxEffectiveRunoff=0
                  Solute Urea: Thickness=[150, 150, 300, 300, 300, 300, 300]; InitialValues=[0, 0, 0, 0, 0, 0, 0]; InitialValuesUnits=kg/ha; WaterTableConcentration=0; D0=0; DepthConstant=0; MaxDepthSoluteAccessible=0; RunoffEffectivenessAtMovingSolute=0; MaxEffectiveRunoff=0
                  Water: Thickness=[150, 150, 300, 300, 300, 300, 300]; InitialValues=[0.45, 0.43, 0.46, 0.45, 0.45, 0.44, 0.43]; FilledFromTop=false
                  SoilTemperature Temperature
              CompositeFactor May: same as Validation.Sensitivity.Location._.Factors.Tully.May
            Factor Tamworth
              CompositeFactor Dec
                Specifications:
                  [Clock]
                  [Weather]
                  [Management]
                  [Soil]
                Clock: Start=2010-10-01; End=2023-09-30
                Weather: FileName=Dalby.met
                Operations Management: same as Validation.Sensitivity.Location._.Factors.Tully.Dec.Management
                Soil Synthetic Soil Derived from the SLGA: ASCOrder=NA; ASCSubOrder=NA; SoilType=Silty Clay Loam; Site=25307_45516; NearestTown=TAMWORTH; Region=Nandewar; State=New South Wales; NaturalVegetation=Eucalyptus woodlands with a shrubby understorey; ApsoilNumber=9999; Latitude=-31.09; Longitude=150.93; LocationAccuracy=+- 90m; YearOfSampling=2025; Comments=Landuse is Urban residential
                  DataSource=Soil and Landscape Grid of Australia. This soil parameter file was automatically generated from the GSM National Surfaces using pedotransfer functions.
                  Water: Thickness=[150, 150, 150, 150, 200, 200, 200, 200]; FilledFromTop=false
                    InitialValues=[0.371264, 0.367727, 0.372374, 0.370628, 0.367873, 0.364581, 0.361159, 0.35765]
                  Physical
                    Thickness  ParticleSizeSand  ParticleSizeSilt  ParticleSizeClay  Rocks  BD       AirDry  LL15      DUL       SAT       KS
                    150        5                 65                30                0      1.25752  0.035   0.224779  0.371264  0.477771  7.38242
                    150        5                 65                30                0      1.30332  0.064   0.233411  0.367727  0.468533  4.17248
                    150        5                 65                30                0      1.28353  0.08    0.236683  0.372374  0.476956  3.64999
                    150        5                 65                30                0      1.27193  0.12    0.23339   0.370628  0.480116  3.94096
                    200        5                 65                30                0      1.28545  0.15    0.233432  0.367873  0.476197  3.67823
                    200        5                 65                30                0      1.30714  0.13    0.234125  0.364581  0.469722  3.33981
                    200        5                 65                30                0      1.31911  0.078   0.232536  0.361159  0.465475  3.35783
                    200        5                 65                30                0      1.32333  0.076   0.229187  0.35765   0.463068  3.64929
                    Rocks, ParticleSizeSand, ParticleSizeSilt, ParticleSizeClay source: Calculated
                    SoilCrop SesameSoil: LL=[0.07, 0.08, 0.1, 0.126, 0.184, 0.203, 0.23, 0.229187]; KL=[0.06, 0.06, 0.06, 0.057, 0.042, 0.02, 0.06, 0.06]; XF=[1, 1, 1, 0.93, 0.85, 0.83, 1, 1]
                      LL, KL, XF source: Calculated (layer 7, 8)
                  WaterBalance SoilWater: SummerDate=1-nov; SummerU=6; SummerCona=6; WinterDate=1-apr; WinterU=2; WinterCona=2; DiffusConst=66.3301; DiffusSlope=31.5025; Salb=0.12; CN2Bare=78; CNRed=20; CNCov=0; DischargeWidth=10; CatchmentArea=88993.6; PSIDul=-100; Thickness=[150, 150, 150, 150, 200, 200, 200, 200]
                    SWCON=[0.265001, 0.195436, 0.173715, 0.177156, 0.135626, 0.129032, 0.130412, 0.137818]
                  Organic: FOMCNRatio=40; CarbonUnits=Total
                    Thickness  Carbon  SoilCNRatio  FBiom    FInert    FOM
                    150        2.5     14           0.04     0.411255  373.091
                    150        2.5     14           0.03106  0.693029  270.533
                    150        2.5     14           0.01404  0.833318  196.167
                    150        2       14           0.01     0.889653  142.243
                    200        2       14           0.01     0.992774  92.6626
                    200        2       14           0.01     1         60.364
                    200        2       14           0.01     1         39.3235
                    200        2       14           0.01     1         25.6168
                  Chemical: PHUnits=Water
                    Thickness  PH       CEC
                    150        7.96711  13.97
                    150        8.11789  13.97
                    150        8.26555  13.97
                    150        8.37493  12.845
                    200        8.4808   12.845
                    200        8.56814  12.845
                    200        8.619    12.845
                    200        8.64481  12.845
                    CEC source: Calculated
                  Solute NO3: Thickness=[150, 150, 150, 150, 200, 200, 200, 200]; InitialValues=[0, 0, 0, 0, 0, 0, 0, 0]; InitialValuesUnits=ppm; WaterTableConcentration=0; D0=0; DepthConstant=0; MaxDepthSoluteAccessible=0; RunoffEffectivenessAtMovingSolute=0; MaxEffectiveRunoff=0
                  Solute NH4: same as Validation.Sensitivity.Location._.Factors.Tamworth.Dec.Synthetic Soil Derived from the SLGA.NO3
                  Solute Urea: same as Validation.Sensitivity.Location._.Factors.Tamworth.Dec.Synthetic Soil Derived from the SLGA.NO3
                  Nutrient
                  SoilTemperature Temperature
              CompositeFactor May: same as Validation.Sensitivity.Location._.Factors.Tully.May
          Simulation LocationBase
            Clock: Start=2010-01-01; End=2025-12-30
            Summary summaryfile
            Weather: FileName=EMERALD DPI FIELD STATION.met
            SoilArbitrator Soil Arbitrator
            Zone paddock: Area=1; Slope=0; AspectAngle=0; Altitude=50
              Soil: same as Validation.Australia.Emerald.Emerald.EmeraldBase.paddock.Soil
              MicroClimate: a_interception=0; b_interception=1; c_interception=0; d_interception=0; SoilHeatFluxFraction=0.4; MinimumHeightDiffForNewLayer=0; NightInterceptionFraction=0.5; ReferenceHeight=2
              Manager CO2Trend
                C3 = 1.5264E-08
                C2 = 7.93268e-05
                C1 = 0.0578807
                C0 = 314.79058
                Target = -1
                RCP = RCP85
                KeepAt = -1
                KeepAtYear = -1
              Irrigation
              Manager AutoIrrigation: same as Validation.Australia.Emerald.Emerald.EmeraldBase.paddock.AutoIrrigation
              Fertiliser
              SurfaceOrganicMatter: InitialResidueName=fallow; InitialResidueType=Sesame; InitialResidueMass=100; InitialStandingFraction=0.5; InitialCPR=0; InitialCNR=55
              Plant Sesame
              Operations Management
              Report: same as Validation.Sensitivity.Fertliser.EmeraldFertiliser.EmeraldFertiliserBase.paddock.Report
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