Simulations: Version=195
  Memo TitlePage
    # The APSIM Sesame Model

    The APSIM Sesame model has been developed using the Plant Modelling Framework (PMF) of ([brown_plant_2014]). This new framework provides a library of plant organ and process submodels that can be coupled, at runtime, to construct a model in much the same way that models can be coupled to construct a simulation. This means that dynamic composition of lower level process and organ classes (e.g. photosynthesis, leaf) into larger constructions (e.g. maize, wheat, sorghum) can be achieved by the model developer without additional coding.

    The model consists of:

    * A phenology model to simulate development between growth phases
    * A collection of organs to simulate the various plant parts
    * An arbitrator to allocate resources (N, biomass) to the various plant organs
  DataStore
    ExcelInput: FileNames=[SesameObserved.xlsx]; SheetNames=[Observed]
    PredictedObserved PredictedObservedStageName: PredictedTableName=DailyReport; ObservedTableName=Observed; FieldNameUsedForMatch=SimulationName; FieldName2UsedForMatch=Sesame.Phenology.CurrentStageName; AllColumns=false
      Tests: POName=PredictedObservedStageName
        AcceptedStats:
          Name                    n   Slope      Intercept  SEslope    SEintercept  R2         RMSE     NSE       ME        MAE      RSR       RMR
          Sesame.AboveGround.Wt   4   0.0557694  125.978    0.0442545  6.08375      0.442601   37.9692  0.102468  1.81201   35.8506  0.820457  0.288739
          Sesame.DaysAfterSowing  37  0.938348   2.00618    0.0383456  2.91112      0.944779   10.0525  0.942704  -1.89294  6.36381  0.236109  0.158947
          Sesame.Grain.Wt         4   0.0094558  8.68053    0.0515352  1.63337      0.0165543  23.493   -3.38049  -20.6792  20.6792  1.81256   0.792612
        AcceptedStatsName=Name n Slope Intercept SEslope SEintercept R2 RMSE NSE ME MAE RSR RMR
    PredictedObserved PredictedObservedDate: PredictedTableName=DailyReport; ObservedTableName=Observed; FieldNameUsedForMatch=SimulationName; FieldName2UsedForMatch=Clock.Today; AllColumns=false
      Tests: POName=PredictedObservedDate
        AcceptedStats:
          Name                      n   Slope      Intercept  SEslope    SEintercept  R2         RMSE       NSE        ME          MAE        RSR       RMR
          Sesame.AboveGround.Wt     18  0.331071   106.367    0.400084   142.456      0.0410414  224.129    -3.22837   -120.382    160.974    1.99836   0.661199
          Sesame.DaysAfterSowing    19  0.203035   56.5614    0.358102   50.7358      0.0185585  91.7193    -3.02713   -50.3158    50.3158    1.95325   0.683935
          Sesame.Grain.Wt           18  0.439045   7.9884     0.348619   23.9585      0.0901878  46.644     -2.52578   -27.9562    34.2283    1.8248    0.72793
          Sesame.Leaf.CoverGreen    10  0.990107   0.0138439  0.0758064  0.0584239    0.955205   0.0568061  0.953284   0.00667632  0.0498094  0.205047  0.0784073
          Sesame.Leaf.Height        19  8.60867    158.59     9.06535    782.796      0.050374   1004.22    -4062.05   804.573     854.907    62.042    11.8282
          Sesame.Stem.BranchNumber  19  -0.197938  4.7454     0.123462   0.506344     0.131339   1.05295    -0.702038  -0.0715266  0.904939   1.26983   0.261862
        AcceptedStatsName=Name n Slope Intercept SEslope SEintercept R2 RMSE NSE ME MAE RSR RMR
    PredictedObserved PredictedObservedHarvest: PredictedTableName=HarvestReport; ObservedTableName=Observed; FieldNameUsedForMatch=SimulationName; AllColumns=false
      Tests: POName=PredictedObservedHarvest
        AcceptedStats:
          Name                      n   Slope      Intercept  SEslope   SEintercept  R2         RMSE     NSE        ME          MAE       RSR       RMR
          Sesame.AboveGround.Wt     18  0.814908   58.784     0.120893  43.0459      0.739573   56.5751  0.730581   -3.95718    47.5856   0.504432  0.166902
          Sesame.DaysAfterSowing    38  0.293698   123.163    0.102595  12.4181      0.185427   66.6442  -0.666066  45.8411     46.999    1.27366   0.608763
          Sesame.Grain.Wt           18  0.696119   19.484     0.158634  10.902       0.54618    17.4768  0.505018   0.0120006   14.3812   0.683727  0.272745
          Sesame.Stem.BranchNumber  19  -0.131184  4.52185    0.13633   0.559119     0.0516529  1.01983  -0.596628  -0.0266638  0.860076  1.22988   0.253624
        AcceptedStatsName=Name n Slope Intercept SEslope SEintercept R2 RMSE NSE ME MAE RSR RMR
  Folder Validation
    Folder Australia
      Folder Emerald
        Experiment Emerald
          Factors
            Factor 22
              CompositeFactor Sum_W_IR
                Specifications:
                  [Clock]
                  [Weather]
                  [Management]
                Clock: Start=2023-01-01; End=2023-09-30
                Weather: FileName=EMERALD DPI FIELD STATION.met
                Operations Management
                  2023-01-20  [Fertiliser].Apply(amount: 100, type: "UreaN");
                  2023-02-23  [Sesame].Sow(population:13, cultivar:"ES103", depth:30, rowSpacing:250);
                  2023-03-04  [Irrigation].Apply(amount:40);
                  2023-04-26  [Irrigation].Apply(amount:40);
                  2023-09-19  [Sesame].Harvest();
                  2023-09-19  [Sesame].EndCrop()
              CompositeFactor Sum_B_IR
                Specifications:
                  [Clock]
                  [Weather]
                  [Management]
                Clock: Start=2023-01-01; End=2023-09-30
                Weather: FileName=EMERALD DPI FIELD STATION.met
                Operations Management
                  2023-01-20  [Fertiliser].Apply(amount: 100, type: "UreaN");
                  2023-02-23  [Sesame].Sow(population:11, cultivar:"S57B", depth:30, rowSpacing:250);
                  2023-03-04  [Irrigation].Apply(amount:40);
                  2023-04-26  [Irrigation].Apply(amount:40);
                  2023-09-19  [Sesame].Harvest();
                  2023-09-19  [Sesame].EndCrop()
            Factor 23
              CompositeFactor Sum_W_IR_Jan
                Specifications:
                  [Clock]
                  [Weather]
                  [Management]
                Clock: Start=2024-01-01; End=2024-04-30
                Weather: FileName=EMERALD DPI FIELD STATION.met
                Operations Management
                  2024-01-07  [Fertiliser].Apply(amount: 120, type: "UreaN");
                  2024-01-08  [Sesame].Sow(population:3.17, cultivar:"ES103", depth:30, rowSpacing:250);
                  2024-04-24  [Sesame].Harvest();
                  2024-04-24  [Sesame].EndCrop()
              CompositeFactor Sum_B_IR_Jan
                Specifications:
                  [Clock]
                  [Weather]
                  [Management]
                Clock: Start=2024-01-01; End=2024-04-30
                Weather: FileName=EMERALD DPI FIELD STATION.met
                Operations Management
                  2024-01-07  [Fertiliser].Apply(amount: 120, type: "UreaN");
                  2024-01-08  [Sesame].Sow(population:3.42, cultivar:"S57B", depth:30, rowSpacing:250);
                  2024-04-24  [Sesame].Harvest();
                  2024-04-24  [Sesame].EndCrop()
              CompositeFactor Sum_W_IR_Feb
                Specifications:
                  [Clock]
                  [Weather]
                  [Management]
                Clock: Start=2024-02-01; End=2024-06-30
                Weather: FileName=EMERALD DPI FIELD STATION.met
                Operations Management
                  2024-02-07  [Fertiliser].Apply(amount: 120, type: "UreaN");
                  2024-02-08  [Sesame].Sow(population:12.80, cultivar:"ES103", depth:30, rowSpacing:250);
                  2024-06-07  [Sesame].Harvest();
                  2024-06-07  [Sesame].EndCrop()
              CompositeFactor Sum_B_IR_Feb
                Specifications:
                  [Clock]
                  [Weather]
                  [Management]
                Clock: Start=2024-02-01; End=2024-06-30
                Weather: FileName=EMERALD DPI FIELD STATION.met
                Operations Management
                  2024-02-07  [Fertiliser].Apply(amount: 120, type: "UreaN");
                  2024-02-08  [Sesame].Sow(population:10.3, cultivar:"S57B", depth:30, rowSpacing:250);
                  2024-06-07  [Sesame].Harvest();
                  2024-06-07  [Sesame].EndCrop()
              CompositeFactor Sum_W_RF_Jan
                Specifications:
                  [Clock]
                  [Weather]
                  [Management]
                Clock: Start=2024-01-01; End=2024-04-30
                Weather: FileName=EMERALD DPI FIELD STATION.met
                Operations Management
                  2024-01-07  [Fertiliser].Apply(amount: 120, type: "UreaN");
                  2024-01-08  [Sesame].Sow(population:2, cultivar:"ES103", depth:30, rowSpacing:250);
                  2024-04-24  [Sesame].Harvest();
                  2024-04-24  [Sesame].EndCrop()
              CompositeFactor Sum_B_RF_Jan
                Specifications:
                  [Clock]
                  [Weather]
                  [Management]
                Clock: Start=2024-01-01; End=2024-04-30
                Weather: FileName=EMERALD DPI FIELD STATION.met
                Operations Management
                  2024-01-07  [Fertiliser].Apply(amount: 120, type: "UreaN");
                  2024-01-08  [Sesame].Sow(population:1, cultivar:"S57B", depth:30, rowSpacing:250);
                  2024-04-24  [Sesame].Harvest();
                  2024-04-24  [Sesame].EndCrop()
              CompositeFactor Sum_W_RF_Feb
                Specifications:
                  [Clock]
                  [Weather]
                  [Management]
                Clock: Start=2024-02-01; End=2024-06-30
                Weather: FileName=EMERALD DPI FIELD STATION.met
                Operations Management
                  2024-02-07  [Fertiliser].Apply(amount: 120, type: "UreaN");
                  2024-02-08  [Sesame].Sow(population:10, cultivar:"ES103", depth:30, rowSpacing:250);
                  2024-06-07  [Sesame].Harvest();
                  2024-06-07  [Sesame].EndCrop()
              CompositeFactor Sum_B_RF_Feb
                Specifications:
                  [Clock]
                  [Weather]
                  [Management]
                Clock: Start=2024-02-01; End=2024-06-30
                Weather: FileName=EMERALD DPI FIELD STATION.met
                Operations Management
                  2024-02-07  [Fertiliser].Apply(amount: 120, type: "UreaN");
                  2024-02-08  [Sesame].Sow(population:10, cultivar:"S57B", depth:30, rowSpacing:250);
                  2024-06-07  [Sesame].Harvest();
                  2024-06-07  [Sesame].EndCrop()
          Simulation EmeraldBase
            Clock: Start=2023-01-01; End=2025-12-30
            Summary summaryfile
            Weather: FileName=EMERALD DPI FIELD STATION.met
            SoilArbitrator Soil Arbitrator
            Zone paddock: Area=1; Slope=0; AspectAngle=0; Altitude=50
              MicroClimate: a_interception=0; b_interception=1; c_interception=0; d_interception=0; SoilHeatFluxFraction=0.4; MinimumHeightDiffForNewLayer=0; NightInterceptionFraction=0.5; ReferenceHeight=2
              Manager CO2Trend
                C3 = 1.5264E-08
                C2 = 7.93268e-05
                C1 = 0.0578807
                C0 = 314.79058
                Target = -1
                RCP = RCP85
                KeepAt = -1
                KeepAtYear = -1
              Irrigation
              Fertiliser
              SurfaceOrganicMatter: InitialResidueName=fallow; InitialResidueType=Sesame; InitialResidueMass=0; InitialStandingFraction=0; InitialCPR=0; InitialCNR=55
              Soil Emerald: SoilType=SoilType= clay loam; State=Queensland; Country=Australia; ApsoilNumber=0; Latitude=-23.4669; Longitude=148.1519
                DataSource=Original source is Soil and Landscape Grid of Australia. See: https://esoil.io/TERNLandscapes/Public/Pages/SLGA/index.html 2025-05-31 14:11:28.993667
                Comments=resolution=90 m - taxonomic classification name = clay loam - drainage class = NA - elevation = NA - slope = NA - geomdesc = NA
                Water: Thickness=[50, 100, 150, 300, 400, 330]; InitialValues=[0.26, 0.26, 0.27, 0.29, 0.28, 0.31]; InitialPAWmm=164.6; RelativeTo=LL15; FilledFromTop=true
                Physical
                  Thickness  ParticleSizeSand  ParticleSizeSilt  ParticleSizeClay  Rocks  BD    AirDry  LL15  DUL   SAT       KS
                  50         68                10                23                0      1.44  0.055   0.11  0.26  0.406604  937.4
                  100        64                10                26                0      1.45  0.096   0.12  0.26  0.40283   834.13
                  150        58                11                32                0      1.5   0.112   0.14  0.27  0.383962  415.1
                  300        50                11                39                0      1.53  0.17    0.17  0.29  0.392642  286.995
                  400        47                11                42                0      1.56  0.16    0.16  0.28  0.381321  280.827
                  330        44                11                44                0      1.57  0.19    0.19  0.31  0.377547  84.0424
                  Rocks source: Calculated
                  SoilCrop SesameSoil: LL=[0.11, 0.12, 0.14, 0.176206, 0.197108, 0.262873]; KL=[0.06, 0.06, 0.06, 0.0568968, 0.0414462, 0.0235635]; XF=[1, 1, 1, 0.925, 0.835, 0.795]
                  SoilCrop SoybeanSoil: LL=[0.11, 0.12, 0.14, 0.173581, 0.181408, 0.232042]; KL=[0.06, 0.06, 0.06, 0.0582097, 0.0492959, 0.0389789]; XF=[1, 1, 1, 0.925, 0.835, 0.795]
                  SoilCrop WheatSoil: same as Validation.Australia.Emerald.Emerald.EmeraldBase.paddock.Emerald.Physical.SoybeanSoil
                  SoilCrop MaizeSoil: same as Validation.Australia.Emerald.Emerald.EmeraldBase.paddock.Emerald.Physical.SesameSoil
                WaterBalance SoilWater: SummerDate=1-nov; SummerU=6; SummerCona=6; WinterDate=1-apr; WinterU=4; WinterCona=2.5; DiffusConst=27634.79; DiffusSlope=-13.05; Salb=0.13; CN2Bare=73; CNRed=20; CNCov=0; DischargeWidth=5; CatchmentArea=10; PSIDul=-100; Thickness=[50, 100, 150, 300, 400, 330]; SWCON=[0.4, 0.4, 0.4, 0.25, 0.25, 0.25]
                Solute NO3: Thickness=[50, 100, 150, 300, 400, 330]; InitialValues=[10, 10, 5, 5, 1, 1]; InitialValuesUnits=kg/ha; WaterTableConcentration=0; D0=0; DepthConstant=0; MaxDepthSoluteAccessible=0; RunoffEffectivenessAtMovingSolute=0; MaxEffectiveRunoff=0
                Solute NH4: Thickness=[50, 100, 150, 300, 400, 330]; InitialValues=[2, 2, 2, 1, 1, 1]; InitialValuesUnits=kg/ha; WaterTableConcentration=0; D0=0; DepthConstant=0; MaxDepthSoluteAccessible=0; RunoffEffectivenessAtMovingSolute=0; MaxEffectiveRunoff=0
                Solute Urea: Thickness=[50, 100, 150, 300, 400, 330]; InitialValues=[0, 0, 0, 0, 0, 0]; InitialValuesUnits=kg/ha; WaterTableConcentration=0; D0=0; DepthConstant=0; MaxDepthSoluteAccessible=0; RunoffEffectivenessAtMovingSolute=0; MaxEffectiveRunoff=0
                Organic: FOMCNRatio=40; CarbonUnits=Total
                  Thickness  Carbon  SoilCNRatio  FBiom      FInert    FOM
                  50         1.23    12           0.04       0.8       150
                  100        1.07    12           0.0327492  0.80804   122.81
                  150        0.8     12           0.0268128  0.816161  100.548
                  300        0.42    12           0.0219525  0.824364  82.3217
                  400        0.21    12           0.0179732  0.832649  67.3993
                  330        0.13    12           0.0147152  0.841017  55.1819
                Chemical: PHUnits=Water
                  Thickness  PH   CEC
                  50         6.9  13.4645
                  100        7    13.6375
                  150        7.2  14.23
                  300        7.4  14.708
                  400        7.7  14.8355
                  330        7.5  14.9885
                  CEC source: Calculated
                Nutrient
                SoilTemperature Temperature
              Plant Sesame
              Operations Management
              Operations Harvesting
              Report DailyReport: EventNames=[Clock].DoReport
              Report HarvestReport: EventNames=[Sesame].Harvesting
      Folder Tully
        Experiment Tully
          Factors
            Factor 22
              CompositeFactor Sum_W_RF
                Specifications:
                  [Clock]
                  [Management]
                Clock: Start=2023-02-01; End=2023-06-30
                Operations Management
                  2023-02-12  [Fertiliser].Apply(amount: 200, type: "DAP");
                  2023-02-23  [Sesame].Sow(population:31, cultivar:"ES103", depth:25, rowSpacing:300);
                  2023-02-14  [Irrigation].Apply(amount:20);
                  2023-06-29  [Sesame].Harvest();
                  2023-06-29  [Sesame].EndCrop()
              CompositeFactor Sum_B_RF
                Specifications:
                  [Clock]
                  [Management]
                Clock: Start=2023-02-01; End=2023-06-30
                Operations Management
                  2023-02-12  [Fertiliser].Apply(amount: 200, type: "DAP");
                  2023-02-23  [Sesame].Sow(population:15, cultivar:"S57B", depth:25, rowSpacing:300);
                  2023-02-14  [Irrigation].Apply(amount:20);
                  2023-06-29  [Sesame].Harvest();
                  2023-06-29  [Sesame].EndCrop()
            Factor 23
              CompositeFactor Win_W_0_RF
                Specifications:
                  [Clock]
                  [Management]
                Clock: Start=2023-06-25; End=2023-12-30
                Operations Management
                  2023-06-28  [Fertiliser].Apply(amount: 0, type: "NH4SO4N");
                  2023-06-29  [Sesame].Sow(population:23, cultivar:"ES103", depth:30, rowSpacing:300);
                  2023-12-26  [Sesame].Harvest();
                  2023-12-26  [Sesame].EndCrop()
              CompositeFactor Win_B_0_RF (disabled)
                Specifications:
                  [Clock]
                  [Management]
                Clock: Start=2023-06-25; End=2024-01-30
                Operations Management
                  2023-06-28  [Fertiliser].Apply(amount: 0, type: "NH4SO4N");
                  2023-06-29  [Sesame].Sow(population:14, cultivar:"S57B", depth:30, rowSpacing:300);
              CompositeFactor Win_W_40_RF
                Specifications:
                  [Clock]
                  [Management]
                Clock: Start=2023-06-25; End=2023-12-30
                Operations Management
                  2023-06-28  [Fertiliser].Apply(amount: 40, type: "NH4SO4N");
                  2023-06-29  [Sesame].Sow(population:26, cultivar:"ES103", depth:30, rowSpacing:300);
                  2023-12-26  [Sesame].Harvest();
                  2023-12-26  [Sesame].EndCrop()
              CompositeFactor Win_B_40_RF
                Specifications:
                  [Clock]
                  [Management]
                Clock: Start=2023-06-25; End=2024-01-06
                Operations Management
                  2023-06-28  [Fertiliser].Apply(amount: 40, type: "NH4SO4N");
                  2023-06-29  [Sesame].Sow(population:9, cultivar:"S57B", depth:30, rowSpacing:300);
              CompositeFactor Win_W_80_RF (disabled)
                Specifications:
                  [Clock]
                  [Management]
                Clock: Start=2023-06-25; End=2023-12-30
                Operations Management
                  2023-06-28  [Fertiliser].Apply(amount: 80, type: "NH4SO4N");
                  2023-06-29  [Sesame].Sow(population:13, cultivar:"ES103", depth:30, rowSpacing:300);
                  2023-12-26  [Sesame].Harvest();
                  2023-12-26  [Sesame].EndCrop()
              CompositeFactor Win_B_80_RF
                Specifications:
                  [Clock]
                  [Management]
                Clock: Start=2023-06-25; End=2024-01-06
                Operations Management
                  2023-06-28  [Fertiliser].Apply(amount: 80, type: "NH4SO4N");
                  2023-06-29  [Sesame].Sow(population:17, cultivar:"S57B", depth:30, rowSpacing:300);
              CompositeFactor Win_W_120_RF
                Specifications:
                  [Clock]
                  [Management]
                Clock: Start=2023-06-25; End=2023-12-30
                Operations Management
                  2023-06-28  [Fertiliser].Apply(amount: 120, type: "NH4SO4N");
                  2023-06-29  [Sesame].Sow(population:18, cultivar:"ES103", depth:30, rowSpacing:300);
                  2023-12-26  [Sesame].Harvest();
                  2023-12-26  [Sesame].EndCrop()
              CompositeFactor Win_B_120_RF (disabled)
                Specifications:
                  [Clock]
                  [Management]
                Clock: Start=2023-06-25; End=2024-01-06
                Operations Management
                  2023-06-28  [Fertiliser].Apply(amount: 120, type: "NH4SO4N");
                  2023-06-29  [Sesame].Sow(population:14, cultivar:"S57B", depth:30, rowSpacing:300);
          Simulation TullyBase
            Clock: Start=2015-05-01; End=2016-11-03
            Summary summaryfile
            Weather: FileName=Tully Experiment.met
            SoilArbitrator Soil Arbitrator
            Zone paddock: Area=1; Slope=0; AspectAngle=0; Altitude=50
              Soil Tully: SoilType=SoilType= loam; Country=Australia; ApsoilNumber=0; Latitude=-18.05; Longitude=145.85
                DataSource=Original source is Soil and Landscape Grid of Australia. See: https://esoil.io/TERNLandscapes/Public/Pages/SLGA/index.html 2025-05-31 14:11:44.928669
                Comments=resolution=90 m - taxonomic classification name = loam - drainage class = NA - elevation = NA - slope = NA - geomdesc = NA
                Water: Thickness=[50, 100, 150, 300, 400, 1000]; InitialValues=[0.25, 0.31, 0.28, 0.26, 0.24, 0.23]; InitialPAWmm=250.5; RelativeTo=LL15; FilledFromTop=true
                Physical
                  Thickness  ParticleSizeSand  ParticleSizeSilt  ParticleSizeClay  Rocks  BD    AirDry  LL15  DUL   SAT       KS
                  50         68                12                20                0      1.13  0.05    0.1   0.25  0.523585  5394.77
                  100        61                13                26                0      1.16  0.128   0.16  0.31  0.512264  2106.65
                  150        63                12                25                0      1.32  0.112   0.14  0.28  0.451887  1349.49
                  300        60                12                29                0      1.45  0.13    0.13  0.26  0.40283   800.772
                  400        65                10                25                0      1.49  0.12    0.12  0.24  0.387736  880.731
                  1000       65                10                25                0      1.51  0.11    0.11  0.23  0.380189  943.165
                  Rocks source: Calculated
                  SoilCrop SesameSoil: LL=[0.1, 0.16, 0.14, 0.135778, 0.152, 0.1976]; KL=[0.06, 0.06, 0.06, 0.0573333, 0.044, 0.0162]; XF=[1, 1, 1, 1, 1, 1]
                  SoilCrop SoybeanSoil: LL=[0.1, 0.16, 0.14, 0.133333, 0.138462, 0.160769]; KL=[0.06, 0.06, 0.06, 0.0584615, 0.0507692, 0.0346154]; XF=[1, 1, 1, 1, 1, 1]
                  SoilCrop WheatSoil: same as Validation.Australia.Tully.Tully.TullyBase.paddock.Tully.Physical.SoybeanSoil
                  SoilCrop MaizeSoil: LL=[0.1, 0.16, 0.14, 0.135778, 0.152, 0.1976]; KL=[0.06, 0.06, 0.06, 0.0573333, 0.044, 0.0162]; XF=[1, 1, 1, 1, 1, 1]
                WaterBalance SoilWater: SummerDate=1-nov; SummerU=6; SummerCona=6; WinterDate=1-apr; WinterU=4; WinterCona=2.5; DiffusConst=27634.79; DiffusSlope=-13.05; Salb=0.13; CN2Bare=73; CNRed=20; CNCov=0; DischargeWidth=5; CatchmentArea=10; PSIDul=-100; Thickness=[50, 100, 150, 300, 400, 1000]; SWCON=[0.5, 0.4, 0.4, 0.4, 0.4, 0.4]
                Solute NO3: Thickness=[50, 100, 150, 300, 400, 1000]; InitialValues=[20, 10, 10, 5, 5, 5]; InitialValuesUnits=kg/ha; WaterTableConcentration=0; D0=0; DepthConstant=0; MaxDepthSoluteAccessible=0; RunoffEffectivenessAtMovingSolute=0; MaxEffectiveRunoff=0
                Solute NH4: Thickness=[50, 100, 150, 300, 400, 1000]; InitialValues=[10, 5, 5, 1, 1, 1]; InitialValuesUnits=kg/ha; WaterTableConcentration=0; D0=0; DepthConstant=0; MaxDepthSoluteAccessible=0; RunoffEffectivenessAtMovingSolute=0; MaxEffectiveRunoff=0
                Solute Urea: Thickness=[50, 100, 150, 300, 400, 1000]; InitialValues=[0, 0, 0, 0, 0, 0]; InitialValuesUnits=kg/ha; WaterTableConcentration=0; D0=0; DepthConstant=0; MaxDepthSoluteAccessible=0; RunoffEffectivenessAtMovingSolute=0; MaxEffectiveRunoff=0
                Organic: FOMCNRatio=40; CarbonUnits=Total
                  Thickness  Carbon  SoilCNRatio  FBiom      FInert    FOM
                  50         2.88    12           0.04       0.8       150
                  100        2.46    12           0.0327492  0.80804   122.81
                  150        1.52    12           0.0268128  0.816161  100.548
                  300        0.81    12           0.0219525  0.824364  82.3217
                  400        0.35    12           0.0179732  0.832649  67.3993
                  1000       0.27    12           0.0147152  0.841017  55.1819
                Chemical: PHUnits=Water
                  Thickness  PH   CEC
                  50         5.3  16.376
                  100        5.3  16.564
                  150        5.3  14.316
                  300        5.5  13.5855
                  400        5.7  11.8175
                  1000       5.6  11.6375
                  CEC source: Calculated
                Nutrient
                SoilTemperature Temperature
              MicroClimate: a_interception=0; b_interception=1; c_interception=0; d_interception=0; SoilHeatFluxFraction=0.4; MinimumHeightDiffForNewLayer=0; NightInterceptionFraction=0.5; ReferenceHeight=2
              Manager CO2Trend
                C3 = 1.5264E-08
                C2 = 7.93268e-05
                C1 = 0.0578807
                C0 = 314.79058
                Target = -1
                RCP = RCP85
                KeepAt = -1
                KeepAtYear = -1
              Irrigation
              Fertiliser
              SurfaceOrganicMatter: InitialResidueName=fallow; InitialResidueType=Sesame; InitialResidueMass=0; InitialStandingFraction=0; InitialCPR=0; InitialCNR=55
              Plant Sesame
              Operations Management
              Operations Harvesting
                2024-01-05  [Sesame].Harvest();
                2024-01-05  [Sesame].EndCrop()
              Report DailyReport: EventNames=[Clock].DoReport
              Report HarvestReport: EventNames=[Sesame].Harvesting
  Folder Replacements
    MultiplyFunction KNO3
      Constant: FixedValue=0.4
      VariableReference KL: VariableName=[Soil].Physical.SesameSoil.KL
    MultiplyFunction KNH4
      Constant: FixedValue=0.4
      VariableReference KL: VariableName=[Soil].Physical.SesameSoil.KL
    Plant Sesame: PlantType=Sesame
      Folder Cultivars
        Folder Australia
          Cultivar ES103
            Command:
              [Phenology].Emerging.Target.ShootLag.FixedValue = 12
              [Phenology].Emerging.Target.DepthxRate.ShootRate.FixedValue = 1
              [Phenology].EarlyVegetative.Target.FixedValue = 150
              [Phenology].LateVegetative.Target.FixedValue = 250
              [Phenology].EarlyFlowering.Target.FixedValue = 40
              [Phenology].EarlyPodDevelopment.Target.FixedValue = 40
              [Phenology].EarlyGrainFilling.Target.FixedValue = 40
              [Phenology].MidGrainFilling.Target.FixedValue = 100
              [Phenology].LateGrainFilling.Target.FixedValue = 100
              [Phenology].Maturing.Target.FixedValue = 50
              [Leaf].Photosynthesis.RUE.FixedValue = 1.50
              [Grain].MaximumHI.FixedValue = 0.22
          Cultivar ES313
            Command:
              [Phenology].Emerging.Target.ShootLag.FixedValue = 12
              [Phenology].Emerging.Target.DepthxRate.ShootRate.FixedValue = 1
              [Phenology].EarlyVegetative.Target.FixedValue = 150
              [Phenology].LateVegetative.Target.FixedValue = 250
              [Phenology].EarlyFlowering.Target.FixedValue = 40
              [Phenology].EarlyPodDevelopment.Target.FixedValue = 40
              [Phenology].EarlyGrainFilling.Target.FixedValue = 40
              [Phenology].MidGrainFilling.Target.FixedValue = 100
              [Phenology].LateGrainFilling.Target.FixedValue = 100
              [Phenology].Maturing.Target.FixedValue = 50
              [Leaf].Photosynthesis.RUE.FixedValue = 1.5
              [Grain].MaximumHI.FixedValue = 0.23
          Cultivar S57B
            Command:
              [Phenology].Emerging.Target.ShootLag.FixedValue = 12
              [Phenology].Emerging.Target.DepthxRate.ShootRate.FixedValue = 1
              [Phenology].EarlyVegetative.Target.FixedValue = 150
              [Phenology].LateVegetative.Target.FixedValue = 250
              [Phenology].EarlyFlowering.Target.FixedValue = 50
              [Phenology].EarlyPodDevelopment.Target.FixedValue = 90
              [Phenology].EarlyGrainFilling.Target.FixedValue = 90
              [Phenology].MidGrainFilling.Target.FixedValue = 90
              [Phenology].LateGrainFilling.Target.FixedValue = 90
              [Phenology].Maturing.Target.FixedValue = 50
              [Leaf].Photosynthesis.RUE.FixedValue = 1.5
              [Grain].MaximumHI.FixedValue = 0.2
          Cultivar Test1
            Command:
              [Phenology].Emerging.Target.ShootLag.FixedValue = 12
              [Phenology].Emerging.Target.DepthxRate.ShootRate.FixedValue = 1
              [Phenology].EarlyVegetative.Target.FixedValue = 150
              [Phenology].LateVegetative.Target.FixedValue = 200
              [Phenology].EarlyFlowering.Target.FixedValue = 80
              [Phenology].EarlyPodDevelopment.Target.FixedValue = 80
              [Phenology].EarlyGrainFilling.Target.FixedValue = 80
              [Phenology].MidGrainFilling.Target.FixedValue = 170
              [Phenology].LateGrainFilling.Target.FixedValue = 130
              [Phenology].Maturing.Target.FixedValue = 60
              [Stem].MaxBranchNumber.Base.FixedValue = 4
              [Leaf].Photosynthesis.RUE.FixedValue = 1.15
              [Grain].MaximumHI.FixedValue = 0.35
          Cultivar Test2
            Command:
              [Phenology].Emerging.Target.ShootLag.FixedValue = 12
              [Phenology].Emerging.Target.DepthxRate.ShootRate.FixedValue = 1
              [Phenology].EarlyVegetative.Target.FixedValue = 100
              [Phenology].LateVegetative.Target.FixedValue = 150
              [Phenology].EarlyFlowering.Target.FixedValue = 80
              [Phenology].EarlyPodDevelopment.Target.FixedValue = 80
              [Phenology].EarlyGrainFilling.Target.FixedValue = 80
              [Phenology].MidGrainFilling.Target.FixedValue = 150
              [Phenology].LateGrainFilling.Target.FixedValue = 120
              [Phenology].Maturing.Target.FixedValue = 60
              [Stem].MaxBranchNumber.Base.FixedValue = 4
              [Leaf].Photosynthesis.RUE.FixedValue = 1.15
              [Grain].MaximumHI.FixedValue = 0.35
          Cultivar 6821
            Command:
              [Phenology].Emerging.Target.ShootLag.FixedValue = 15
              [Phenology].Emerging.Target.DepthxRate.ShootRate.FixedValue = 2
              [Phenology].EarlyVegetative.Target.FixedValue = 100
              [Phenology].LateVegetative.Target.FixedValue = 150
              [Phenology].EarlyFlowering.Target.FixedValue = 50
              [Phenology].EarlyPodDevelopment.Target.FixedValue = 150
              [Phenology].EarlyGrainFilling.Target.FixedValue = 150
              [Phenology].MidGrainFilling.Target.FixedValue = 200
              [Phenology].LateGrainFilling.Target.FixedValue = 150
              [Phenology].Maturing.Target.FixedValue = 30
          Cultivar 6824: same as Replacements.Sesame.Cultivars.Australia.6821
          Cultivar BlackPatch
          Cultivar MoriaBlack
            Command:
              [Phenology].Emerging.Target.ShootLag.FixedValue = 12
              [Phenology].Emerging.Target.DepthxRate.ShootRate.FixedValue = 1
              [Phenology].EarlyVegetative.Target.FixedValue = 300
              [Phenology].LateVegetative.Target.FixedValue = 250
        Folder Iran
          Cultivar Jahan2015
            Command:
              [Phenology].Emerging.Target.ShootLag.FixedValue = 12
              [Phenology].Emerging.Target.DepthxRate.ShootRate.FixedValue = 1
              [Phenology].EarlyVegetative.Target.FixedValue = 150
              [Phenology].LateVegetative.Target.FixedValue = 200
              [Phenology].EarlyFlowering.Target.FixedValue = 80
              [Phenology].EarlyPodDevelopment.Target.FixedValue = 80
              [Phenology].EarlyGrainFilling.Target.FixedValue = 80
              [Phenology].MidGrainFilling.Target.FixedValue = 170
              [Phenology].LateGrainFilling.Target.FixedValue = 130
              [Phenology].Maturing.Target.FixedValue = 60
              [Phenology].Drydown.Target.FixedValue = 280
              [Stem].MaxBranchNumber.Base.FixedValue = 4
              [Leaf].Photosynthesis.RUE.FixedValue = 1.15
              [Grain].MaximumHI.FixedValue = 0.35
        Folder India
          Cultivar RT125
            Command:
              [Phenology].Emerging.Target.ShootLag.FixedValue = 10
              [Phenology].Emerging.Target.DepthxRate.ShootRate.FixedValue = 1
              [Phenology].EarlyVegetative.Target.FixedValue = 170
              [Phenology].LateVegetative.Target.FixedValue = 130
              [Phenology].EarlyFlowering.Target.FixedValue = 80
              [Phenology].EarlyPodDevelopment.Target.FixedValue = 50
              [Phenology].EarlyGrainFilling.Target.FixedValue = 30
              [Phenology].MidGrainFilling.Target.FixedValue = 80
              [Phenology].LateGrainFilling.Target.FixedValue = 80
              [Phenology].Maturing.Target.FixedValue = 30
              [Leaf].Photosynthesis.RUE.FixedValue = 1.4
              [Grain].MaximumHI.FixedValue = 0.35
      OrganArbitrator Arbitrator
        BiomassTypeArbitrator DMArbitration
          Folder PotentialPartitioningMethods
            ReallocationMethod
            AllocateFixationMethod
            RetranslocationMethod
            SendPotentialDMAllocationsMethod
          Folder AllocationMethods
            NutrientConstrainedAllocationMethod
            DryMatterAllocationsMethod
          RelativeAllocation ArbitrationMethod
        BiomassTypeArbitrator NArbitration
          Folder PotentialPartitioningMethods
            ReallocationMethod
          Folder ActualPartitioningMethods
            AllocateFixationMethod
            RetranslocationMethod
          Folder AllocationMethods
            NitrogenAllocationsMethod
          RelativeAllocation ArbitrationMethod
          AllocateUptakesMethod
        WaterUptakeMethod
        NitrogenUptakeMethod
      Phenology
        SubDailyInterpolation BaseThermalTime: agregationMethod=0
          Memo
            - Baath, G. S., Kakani, V. G., Northup, B. K., Gowda, P. H., Rocateli, A. C., & Singh, H. (2022). Quantifying and Modeling the Influence of Temperature on Growth and Reproductive Development of Sesame. Journal of Plant Growth Regulation, 41(1), 143–152. https://doi.org/10.1007/S00344-020-10278-Y/FIGURES/5.

            - Angus, J. F., Cunningham, R. B., Moncur, M. W., & Mackenzie, D. H. (1980). Phasic development in field crops I. Thermal response in the seedling phase. Field Crops Research, 3(C), 365–378. https://doi.org/10.1016/0378-4290(80)90042-8
          XYPairs Response: X=[15, 29, 45]; Y=[0, 14, 0]
          ThreeHourAirTemperature InterpolationMethod
        PhaseLookup ThermalTime
          PhaseLookupValue PreEmergence: Start=Sowing; End=Emergence
            VariableReference Base: VariableName=[Phenology].BaseThermalTime
          PhaseLookupValue PreFlowering: Start=Emergence; End=StartFlowering
            MultiplyFunction TT
              VariableReference Base: VariableName=[Phenology].BaseThermalTime
              LinearInterpolationFunction PhotoperiodModifier
                Memo
                  The short-day treatment (10h-14h) shortened the duration to the ﬁrst ﬂower and lowered the ﬁrst ﬂowering-node.

                  - Kumazaki, T., Yamada, Y., Karaya, S., Tokumitsu, T., Hirano, T., Yasumoto, S., Katsuta, K., & Michiyama, H. (2008). Effects of Day Length and Air Temperature on Stem Growth and Flowering in Sesame. Plant Production Science, 11(2), 178–183. https://doi.org/10.1626/pps.11.178
                XYPairs: X=[10, 14]; Y=[1, 0.8]
                VariableReference XValue: VariableName=[Phenology].Photoperiod
          PhaseLookupValue PostFlowering: Start=StartFlowering; End=Maturity
            MultiplyFunction TT
              VariableReference Base: VariableName=[Phenology].BaseThermalTime
              LinearInterpolationFunction PhotoperiodModifier
                Memo
                  The short-day treatment (10h-14h) prolonged the ﬂowering period, but decreased the ﬂowering-node number on the main stem resulting from the slower rate of increase in nodes with ﬂowers.

                  - Kumazaki, T., Yamada, Y., Karaya, S., Tokumitsu, T., Hirano, T., Yasumoto, S., Katsuta, K., & Michiyama, H. (2008). Effects of Day Length and Air Temperature on Stem Growth and Flowering in Sesame. Plant Production Science, 11(2), 178–183. https://doi.org/10.1626/pps.11.178
                XYPairs: X=[10, 14]; Y=[0.7, 1]
                VariableReference XValue: VariableName=[Phenology].Photoperiod
          PhaseLookupValue Drydown: Start=Maturity; End=EndDrydown
            VariableReference Base: VariableName=[Phenology].BaseThermalTime
        PhotoperiodFunction Photoperiod: Twilight=0; DayLength=0
        GerminatingPhase Germinating: Start=Sowing; End=Germination; IsEmerged=false
          Constant MinSoilTemperature: FixedValue=21
        EmergingPhase Emerging: Start=Germination; End=Emergence; IsEmerged=true; TTForTimeStep=0
          VariableReference ThermalTime: VariableName=[Phenology].VegetativeThermalTime
          AddFunction Target
            Constant ShootLag: FixedValue=10
            MultiplyFunction DepthxRate
              VariableReference SowingDepth: VariableName=[Plant].SowingData.Depth
              Constant ShootRate: FixedValue=1
        GenericPhase EarlyVegetative: Start=Emergence; End=Branching; IsEmerged=true
          Constant Target: FixedValue=150
          VariableReference Progression: VariableName=[Phenology].ThermalTime
        GenericPhase LateVegetative: Start=Branching; End=StartFlowering; IsEmerged=true
          Constant Target: FixedValue=200
          VariableReference Progression: VariableName=[Phenology].ThermalTime
        GenericPhase EarlyFlowering: Start=StartFlowering; End=StartPodDevelopment; IsEmerged=true
          Constant Target: FixedValue=100
          VariableReference Progression: VariableName=[Phenology].ThermalTime
        GenericPhase EarlyPodDevelopment: Start=StartPodDevelopment; End=StartGrainFilling; IsEmerged=true
          Constant Target: FixedValue=50
          VariableReference Progression: VariableName=[Phenology].ThermalTime
        GenericPhase EarlyGrainFilling: Start=StartGrainFilling; End=EndCanopyDevelopment; IsEmerged=true
          Constant Target: FixedValue=50
          VariableReference Progression: VariableName=[Phenology].ThermalTime
        GenericPhase MidGrainFilling: Start=EndCanopyDevelopment; End=EndPodDevelopment; IsEmerged=true
          Constant Target: FixedValue=120
          VariableReference Progression: VariableName=[Phenology].ThermalTime
        GenericPhase LateGrainFilling: Start=EndPodDevelopment; End=EndGrainFilling; IsEmerged=true
          Constant Target: FixedValue=120
          VariableReference Progression: VariableName=[Phenology].ThermalTime
        GenericPhase Maturing: Start=EndGrainFilling; End=Maturity; IsEmerged=true
          Constant Target: FixedValue=50
          VariableReference Progression: VariableName=[Phenology].ThermalTime
        GenericPhase Drydown: Start=Maturity; End=EndDrydown; IsEmerged=true
          Constant Target: FixedValue=200
          MultiplyFunction Progression
            VariableReference ThermalTime: VariableName=[Phenology].ThermalTime
            LinearInterpolationFunction FrostImpact
              Memo
                Sesame will dry down 120-150 days without a frost. It will dry down sooner with a frost or freeze. Although sesame is indeterminate, it will terminate and self-defoliate without a frost. A frost will cause the plants to drydown more rapidly than normal. Just like cotton and sorghum, a frost will terminate the crop and prepare the crop for harvest earlier than when compared to temperatures remaining just above freezing. Rule of thumb is that you need 130 days from the time that the soil temperature is 70ºF (21ºC) and the first frost date. From planting, sesame needs about 110 days of night temperatures above 40ºF (4.5ºC). Sesame needs to reach physiological maturity prior to frost to make optimum yield.

                - SESAME GROWER GUIDE. D. Ray Langham, Jerry Riney, Glenn Smith, and Terry Wiemers. March 2008. www.sesaco.net.
              XYPairs: X=[-4, 0, 4.5, 10]; Y=[1.5, 1.2, 1, 1]
              VariableReference XValue: VariableName=[Weather].MinT
        EndPhase: Start=EndDrydown; End=Unused; IsEmerged=true
          VariableReference ThermalTime: VariableName=[Phenology].ThermalTime
        OnEventFunction EmergenceDAS: SetEvent=Emergence; ReSetEvent=never
          Memo
            A function is used to provide emergence date as days after sowing(DAS).
          Constant PreEventValue: FixedValue=0
          VariableReference PostEventValue: VariableName=[Plant].DaysAfterSowing
        OnEventFunction BranchingDAS: SetEvent=Branching; ReSetEvent=never
          Constant PreEventValue: FixedValue=0
          VariableReference PostEventValue: VariableName=[Plant].DaysAfterSowing
        OnEventFunction StartFloweringDAS: SetEvent=StartFlowering; ReSetEvent=never
          Constant PreEventValue: FixedValue=0
          VariableReference PostEventValue: VariableName=[Plant].DaysAfterSowing
        OnEventFunction StartPodDevelopmentDAS: SetEvent=StartPodDevelopment; ReSetEvent=never
          Constant PreEventValue: FixedValue=0
          VariableReference PostEventValue: VariableName=[Plant].DaysAfterSowing
        OnEventFunction StartGrainFillingDAS: SetEvent=StartGrainFilling; ReSetEvent=never
          Constant PreEventValue: FixedValue=0
          VariableReference PostEventValue: VariableName=[Plant].DaysAfterSowing
        OnEventFunction EndCanopyDevelopmentDAS: SetEvent=EndCanopyDevelopment; ReSetEvent=never
          Constant PreEventValue: FixedValue=0
          VariableReference PostEventValue: VariableName=[Plant].DaysAfterSowing
        OnEventFunction EndPodDevelopmentDAS: SetEvent=EndPodDevelopment; ReSetEvent=never
          Constant PreEventValue: FixedValue=0
          VariableReference PostEventValue: VariableName=[Plant].DaysAfterSowing
        OnEventFunction EndGrainFillingDAS: SetEvent=EndGrainFilling; ReSetEvent=never
          Constant PreEventValue: FixedValue=0
          VariableReference PostEventValue: VariableName=[Plant].DaysAfterSowing
        OnEventFunction MaturityDAS: SetEvent=Maturity; ReSetEvent=never
          Constant PreEventValue: FixedValue=0; Units=DAS
          VariableReference PostEventValue: VariableName=[Plant].DaysAfterSowing
        OnEventFunction EndDrydownDAS: SetEvent=EndDrydown; ReSetEvent=never
          Constant PreEventValue: FixedValue=0
          VariableReference PostEventValue: VariableName=[Plant].DaysAfterSowing
        AddFunction FillingDuration
          VariableReference EarlyGrainFillingDuration: VariableName=[Phenology].EarlyGrainFilling.Target
          VariableReference MidGrainFillingDuration: VariableName=[Phenology].MidGrainFilling.Target
          VariableReference LateGrainFillingDuration: VariableName=[Phenology].LateGrainFilling.Target
        AddFunction DrydownDuration
          VariableReference Drydown: VariableName=[Phenology].Drydown.Target
      SimpleLeaf Leaf: Albedo=0.25; Gsmax350=0.015; R50=150; LeafInitialisationStage=Emergence; Height=0; BaseHeight=0; Width=0; FRGR=0; PotentialEP=0; WaterDemand=0; KDead=0.2; LAIDead=0
        Constant InitialWt: FixedValue=0.5
        MultiplyFunction Phyllochron
          Memo Rational
            Taken from wheat model.
          Constant BasePhyllochron: FixedValue=65; Units=oC.d
          LinearInterpolationFunction LeafStageFactor
            XYPairs: X=[0, 3, 4, 7, 8, 12]; Y=[0.8, 0.8, 1, 1, 1.2, 1.2]
            VariableReference XValue: VariableName=[Stem].NodeNumber
        RUEModel Photosynthesis
          Constant RUE: FixedValue=1.4
            Memo
              In contrast to Classic, the RUE value in NG refers to the whole plant (above and below ground).

              Koocheki et al. (2016) estimated the aboveground RUE of Sesame to be 1.14 g/MJ. This value was adjusted to include root dry mass. Hamedani et al. (2020) estimate the root-to-shoot ratio of six sesame genotypes to be 0.17 - 0.36, averaged over two seasons and under rainfed and irrigated regimes. Therefore, the RUE of 1.14 g/MJ was multiplied by 1.2 (assuming a root-to-shoot ratio of 0.25), resulting in ~1.4 g/MJ.

              - Koocheki, A., Nassiri Mahallati, M., Solouki, H., & Karbor, S. (2016). Evaluation of Radiation Absorption and use Efficiency in Substitution Intercropping of Sesame (Sesamum Indicum L.) and Mung Bean (Vigna Radiata L.). Advances in Plants & Agriculture Research, 3(5). https://doi.org/10.15406/apar.2016.03.00109.

              - Hamedani, N. G., Gholamhoseini, M., Bazrafshan, F., Amiri, B., & Habibzadeh, F. (2020). Variability of root traits in sesame genotypes under different irrigation regimes. Rhizosphere, 13, 100190. https://doi.org/10.1016/j.rhisph.2020.100190.
          MultiplyFunction FW
            LinearInterpolationFunction LeafFW
              XYPairs: X=[0, 1]; Y=[0, 1]
              VariableReference XValue: VariableName=[Leaf].Fw
            VariableReference WetRootFractionFactor: VariableName=[Root].WetRootFractionFactor
          MultiplyFunction FT
            WeightedTemperatureFunction MeanT: MaximumTemperatureWeighting=0.5
              Memo
                The cardinal temperature limits of 15.7 °C (Tmin), 27.3 °C (Topt), and 44.6 °C (Tmax) were observed for rate of biomass accumulation.

                - Baath, G. S., Kakani, V. G., Northup, B. K., Gowda, P. H., Rocateli, A. C., & Singh, H. (2022). Quantifying and Modeling the Influence of Temperature on Growth and Reproductive Development of Sesame. Journal of Plant Growth Regulation, 41(1), 143–152. https://doi.org/10.1007/s00344-020-10278-y.
              XYPairs: X=[15.7, 27.3, 44.6]; Y=[0, 1, 0]
            LinearInterpolationFunction MinT
              Memo: same as Replacements.Sesame.Phenology.Drydown.Progression.FrostImpact.Memo
              XYPairs: X=[-4, 0, 4.5, 10]; Y=[0, 0, 1, 1]
              VariableReference XValue: VariableName=[Weather].MinT
          PhaseLookup FN
            PhaseLookupValue Pre-Emergence: Start=Sowing; End=Emergence
              Constant One: FixedValue=1
            PhaseLookupValue Post-Emergence: Start=Emergence; End=EndDrydown
              LinearInterpolationFunction FN
                XYPairs: X=[0, 1, 1.5]; Y=[0, 1, 1]
                VariableReference XValue: VariableName=[Leaf].Fn
          LinearInterpolationFunction FVPD
            XYPairs: X=[0, 10, 50]; Y=[1, 1, 1]
            VariableReference XValue: VariableName=[Leaf].Photosynthesis.VPD
          RUECO2Function FCO2: PhotosyntheticPathway=C3
          VariableReference RadnInt: VariableName=[Leaf].RadiationIntercepted
        StomatalConductanceCO2Modifier
          VariableReference PhotosynthesisCO2Modifier: VariableName=[Leaf].Photosynthesis.FCO2
        MultiplyFunction AreaLargestLeafPair
          Memo
            In this model, **AreaLargestLeaf** referes to the total area of the largest leaf pair.
          Constant MaximumSize: FixedValue=0.035; Units=m^2
        LinearInterpolationFunction SpecificArea
          XYPairs: X=[0, 7]; Y=[0.05, 0.05]
          VariableReference XValue: VariableName=[Leaf].LAI
        MultiplyFunction Area
          Memo
            Leaf area index (LAI).
          VariableReference LeafLiveWt: VariableName=[Leaf].Live.Wt
          VariableReference SLA: VariableName=[Leaf].SpecificArea
        DivideFunction LAR
          Memo
            Leaf appearance rate.
          VariableReference ThermalTime: VariableName=[Phenology].ThermalTime
          VariableReference Phyllochron: VariableName=[Leaf].Phyllochron
        MinimumFunction FRGR
          VariableReference RUE_FT: VariableName=[Leaf].Photosynthesis.FT
          VariableReference RUE_FN: VariableName=[Leaf].Photosynthesis.FN
          VariableReference RUE_FVPD: VariableName=[Leaf].Photosynthesis.FVPD
        LinearInterpolationFunction ExtinctionCoefficient
          Memo
            Koocheki et al. (2016) estimated the light extinction coefficient of sesame to be 0.681, averaged across six genotypes. The plant densities were 40 plants/m2 and inter-row spacing was 0.5m.

            - Koocheki, A., Nassiri Mahallati, M., Solouki, H., & Karbor, S. (2016). Evaluation of Radiation Absorption and use Efficiency in Substitution Intercropping of Sesame (Sesamum Indicum L.) and Mung Bean (Vigna Radiata L.). Advances in Plants & Agriculture Research, 3(5). https://doi.org/10.15406/apar.2016.03.00109.
          XYPairs: X=[200, 1000]; Y=[0.75, 0.6]
          VariableReference XValue: VariableName=[Sesame].SowingData.RowSpacing
        LinearInterpolationFunction HeightFunction
          XYPairs: X=[1, 2, 3, 4, 6, 7]; Y=[0, 0, 50, 700, 1200, 1300]
          VariableReference XValue: VariableName=[Phenology].Stage
        Constant NReallocationFactor: FixedValue=1
          Memo
            This model assumes that all metabolic and storage N is available for reallocation from senescing leaves.
        Constant NRetranslocationFactor: FixedValue=0.5
        PhaseLookup SenescenceRate
          PhaseLookupValue Vegetative: Start=Emergence; End=EndCanopyDevelopment
            Constant Rate: FixedValue=0
          PhaseLookupValue Reproductive: Start=EndCanopyDevelopment; End=EndDrydown
            Memo
              Leaf senescence rate is calculated to ensure that all leaves are senesced by the end of dry-down phase.

              There is no data on detachment rates and so a simple value was chosen to ensure that leaves were not retained in the canopy. In the future, with more data available a thermal time basis leaf detachment rate will be explored.
            MinimumFunction
              Constant One: FixedValue=1
              DivideFunction Rate
                VariableReference TT: VariableName=[Phenology].ThermalTime
                SubtractFunction TTRemaining
                  ExpressionFunction TTRequired
                    Expression=[Phenology].MidGrainFilling.Target + [Phenology].LateGrainFilling.Target + [Phenology].Maturing.Target + [Phenology].Drydown.Target
                  ExpressionFunction TTComplete
                    Expression=[Phenology].MidGrainFilling.ProgressThroughPhase + [Phenology].LateGrainFilling.ProgressThroughPhase + [Phenology].Maturing.ProgressThroughPhase + [Phenology].Drydown.ProgressThroughPhase
        Constant DetachmentRate: FixedValue=0.05; Units=/d
        LinearInterpolationFunction CriticalNConc
          XYPairs: X=[3, 4, 9]; Y=[0.06, 0.05, 0.03]
          VariableReference XValue: VariableName=[Phenology].Stage
        Constant MinimumNConc: FixedValue=0.02
        Constant MaximumNConc: FixedValue=0.05
        Constant MaintenanceRespiration: FixedValue=0; Units=0-1
        Constant DMConversionEfficiency: FixedValue=1; Units=0-1
        BiomassRemoval BiomassRemovalDefaults: HarvestFractionLiveToRemove=0; HarvestFractionDeadToRemove=0; HarvestFractionLiveToResidue=1; HarvestFractionDeadToResidue=1
        Constant DMReallocationFactor: FixedValue=0
        Constant DMRetranslocationFactor: FixedValue=0
        Constant RemobilisationCost: FixedValue=0
        Constant CarbonConcentration: FixedValue=0.4
        NutrientDemandFunctions DMDemands
          DivideFunction Structural
            Memo
              Growth in leaf area is used to calculate the leaf dry matter demand. Further model development can be taken once new experimental data for metabolic, structural and storage forms are provided.
            PhaseLookup DeltaLAIPotential
              PhaseLookupValue Vegetative: Start=Emergence; End=EndCanopyDevelopment
                LAIncrementWithBranching
                  VariableReference PlantNumber: VariableName=[Plant].SowingData.Population
                  VariableReference NodeNumber: VariableName=[Stem].NodeNumber
                  VariableReference BranchNumber: VariableName=[Stem].BranchNumber
                  VariableReference AreaLargestLeaf: VariableName=[Leaf].AreaLargestLeafPair
                  VariableReference LAR: VariableName=[Leaf].LAR
                  XYPairs RelativeArea: X=[0, 5, 6, 7, 15]; Y=[0, 0.5, 1, 0.5, 0.01]
              PhaseLookupValue Reproductive: Start=EndCanopyDevelopment; End=Maturity
                Constant Zero: FixedValue=0
            VariableReference SLA: VariableName=[Leaf].SpecificArea
          Constant Storage: FixedValue=0
          Constant Metabolic: FixedValue=0
          Constant QStructuralPriority: FixedValue=1
          Constant QMetabolicPriority: FixedValue=1
          Constant QStoragePriority: FixedValue=1
        NutrientDemandFunctions NDemands
          MultiplyFunction Structural
            VariableReference MinNconc: VariableName=[Leaf].minimumNconc
            VariableReference PotentialDMAllocation: VariableName=[Leaf].potentialDMAllocation.Structural
          MultiplyFunction Metabolic
            SubtractFunction MetabolicNconc
              VariableReference CritNconc: VariableName=[Leaf].criticalNConc
              VariableReference MinNconc: VariableName=[Leaf].minimumNconc
            VariableReference PotentialDMAllocation: VariableName=[Leaf].potentialDMAllocation.Structural
          StorageNDemandFunction Storage
            Constant NitrogenDemandSwitch: FixedValue=1
            VariableReference MaxNconc: VariableName=[Leaf].maximumNconc
          Constant QStructuralPriority: FixedValue=1
          Constant QMetabolicPriority: FixedValue=1
          Constant QStoragePriority: FixedValue=1
        LinearInterpolationFunction FrostFraction
          XYPairs: X=[-4, 4]; Y=[1, 0]
          VariableReference XValue: VariableName=[Weather].MinT
        MultiplyFunction LAIDead
          VariableReference LeafDeadWt: VariableName=[Leaf].Dead.Wt
          VariableReference SLA: VariableName=[Leaf].SpecificArea
      GenericOrgan Stem: IsAboveGround=true
        MultiplyFunction PlantPerLinearMeter
          VariableReference Population: VariableName=[Plant].SowingData.Population
          VariableReference RowSpacing: VariableName=[Plant].SowingData.RowSpacing
          Constant mm2m: FixedValue=0.001
        MultiplyFunction MaxBranchNumber
          Constant Base: FixedValue=10
          LinearInterpolationFunction PopulationEffect
            Memo
              - SMARTER SESAME AGRONOMY GUIDE. Equicon. 2021.
            XYPairs: X=[6, 25]; Y=[1, 0.125]
            VariableReference XValue: VariableName=[Stem].PlantPerLinearMeter
        DivideFunction BAR
          Memo
            Branch appearance rate.
          VariableReference ThermalTime: VariableName=[Phenology].ThermalTime
          LinearInterpolationFunction Target
            XYPairs: X=[1, 7]; Y=[60, 120]
            VariableReference XValue: VariableName=[Stem].NodeNumber
        MinimumFunction BranchNumber
          VariableReference MaxBranchNumber: VariableName=[Stem].MaxBranchNumber
          AccumulateFunction BranchNumberFunction: StartStageName=Branching; EndStageName=EndCanopyDevelopment; ResetStageName=Sowing; FractionRemovedOnCut=1; FractionRemovedOnHarvest=1; FractionRemovedOnGraze=1; FractionRemovedOnPrune=0
            VariableReference BAR: VariableName=[Stem].BAR
        AddFunction NodeNumber
          Memo
            In this model, **NodeNumber** referes to the number of node pairs. Two leaves grow from each node pairs.
          AccumulateFunction Change: StartStageName=Emergence; EndStageName=EndCanopyDevelopment; FractionRemovedOnCut=1; FractionRemovedOnHarvest=1; FractionRemovedOnGraze=1; FractionRemovedOnPrune=0
            VariableReference LAR: VariableName=[Leaf].LAR
        Constant NReallocationFactor: FixedValue=1
        Constant NRetranslocationFactor: FixedValue=0.5
        PhaseLookup DMRetranslocationFactor
          PhaseLookupValue GrainFilling: Start=EndCanopyDevelopment; End=EndGrainFilling
            Constant RetranslocationFactor: FixedValue=0.2
        LinearInterpolationFunction MaximumNConc
          XYPairs: X=[3, 4, 5]; Y=[0.025, 0.02, 0.015]
          VariableReference XValue: VariableName=[Phenology].Stage
        Constant MinimumNConc: FixedValue=0.006
        PhaseLookupValue NitrogenDemandSwitch: Start=Emergence; End=StartGrainFilling
          Memo
            There is no evidence of stem N storage during grain filling. Also, there is no stem structural growth during this time.
          Constant: FixedValue=1
        BiomassRemoval BiomassRemovalDefaults: HarvestFractionLiveToRemove=0; HarvestFractionDeadToRemove=0; HarvestFractionLiveToResidue=1; HarvestFractionDeadToResidue=1
        PhaseLookup SenescenceRate
          PhaseLookupValue PostCanopyPhase: Start=EndCanopyDevelopment; End=Maturity
            MinimumFunction Rate
              DivideFunction Fraction
                VariableReference TT: VariableName=[Phenology].ThermalTime
                SubtractFunction TTRemaining
                  ExpressionFunction PostCanopyTT
                    Expression=[Phenology].EarlyPodDevelopment.Target+[Phenology].EarlyGrainFilling.Target+[Phenology].MidGrainFilling.Target+[Phenology].LateGrainFilling.Target
                  ExpressionFunction PostCanopyTTComplete
                    Expression=[Phenology].MidGrainFilling.ProgressThroughPhase+[Phenology].LateGrainFilling.ProgressThroughPhase
              Constant One: FixedValue=1
        Constant DetachmentRateFunction: FixedValue=0; Units=/d
        Constant MaintenanceRespirationFunction: FixedValue=0; Units=0-1
        Constant DMConversionEfficiency: FixedValue=1; Units=0-1
        Constant DMReallocationFactor: FixedValue=0
        VariableReference CriticalNConc: VariableName=[Stem].MinimumNConc
        Constant RemobilisationCost: FixedValue=0
        Constant CarbonConcentration: FixedValue=0.4
        NutrientDemandFunctions DMDemands
          MultiplyFunction Structural
            PhaseLookup Fraction
              PhaseLookupValue StemGrowthPhase: Start=Emergence; End=StartPodDevelopment
                Constant Fraction: FixedValue=0.7
              PhaseLookupValue PodAndGrainGrowth: Start=StartPodDevelopment; End=EndDrydown
                Constant Fraction: FixedValue=0
            PartitionFractionDemandFunction PotentialGrowth
              PhaseLookup PartitionFraction
                PhaseLookupValue StemGrowthPhase: Start=Emergence; End=EndPodDevelopment
                  Constant StemFraction: FixedValue=0.4
                PhaseLookupValue GrainFilling: Start=EndPodDevelopment; End=EndGrainFilling
                  Constant StemFraction: FixedValue=0
          Constant Metabolic: FixedValue=0
          MultiplyFunction Storage
            VariableReference DMDemand: VariableName=[Stem].DMDemands.Structural.PotentialGrowth
            SubtractFunction StorageFraction
              Constant One: FixedValue=1
              VariableReference StructuralFraction: VariableName=[Stem].DMDemands.Structural.Fraction
          Constant QStructuralPriority: FixedValue=1
          Constant QMetabolicPriority: FixedValue=1
          Constant QStoragePriority: FixedValue=1
        NutrientDemandFunctions NDemands
          MultiplyFunction Structural
            VariableReference MinNconc: VariableName=[Stem].minimumNconc
            VariableReference PotentialDMAllocation: VariableName=[Stem].potentialDMAllocation.Structural
          MultiplyFunction Metabolic
            SubtractFunction MetabolicNconc
              VariableReference CritNconc: VariableName=[Stem].criticalNConc
              VariableReference MinNconc: VariableName=[Stem].minimumNconc
            VariableReference PotentialDMAllocation: VariableName=[Stem].potentialDMAllocation.Structural
          StorageNDemandFunction Storage
            VariableReference NitrogenDemandSwitch: VariableName=[Stem].nitrogenDemandSwitch
            VariableReference MaxNconc: VariableName=[Stem].maximumNconc
          Constant QStructuralPriority: FixedValue=1
          Constant QMetabolicPriority: FixedValue=1
          Constant QStoragePriority: FixedValue=1
        RetranslocateNonStructural RetranslocateNitrogen
        NutrientPoolFunctions InitialWt
          Constant Structural: FixedValue=0; Units=g/m^2
          Constant Metabolic: FixedValue=0
          Constant Storage: FixedValue=0
        Constant Photosynthesis: FixedValue=0
        VariableReference initialNConcFunction: VariableName=[Stem].MinimumNConc
      GenericOrgan Shell: IsAboveGround=true
        Constant PotentialHarvestIndex: FixedValue=0.1
        Constant NReallocationFactor: FixedValue=1
        Constant NRetranslocationFactor: FixedValue=0.5
        Constant MaximumNConc: FixedValue=0.045
        VariableReference CriticalNConc: VariableName=[Shell].MinimumNConc
        Constant MinimumNConc: FixedValue=0.01
        Constant DMRetranslocationFactor: FixedValue=0.1
        PhaseLookupValue NitrogenDemandSwitch: Start=StartPodDevelopment; End=EndPodDevelopment
          Constant: FixedValue=1
        BiomassRemoval BiomassRemovalDefaults: HarvestFractionLiveToRemove=0; HarvestFractionDeadToRemove=0; HarvestFractionLiveToResidue=1; HarvestFractionDeadToResidue=1
        PhaseLookup SenescenceRate
          PhaseLookupValue ReproductivePhase: Start=StartGrainFilling; End=EndDrydown
            MinimumFunction Rate
              DivideFunction Fraction
                VariableReference TT: VariableName=[Phenology].ThermalTime
                SubtractFunction TTRemaining
                  ExpressionFunction TTRequired
                    Expression=[Phenology].EarlyGrainFilling.Target + [Phenology].MidGrainFilling.Target + [Phenology].LateGrainFilling.Target + [Phenology].Drydown.Target
                  ExpressionFunction TTProgress
                    Expression=[Phenology].EarlyGrainFilling.ProgressThroughPhase + [Phenology].MidGrainFilling.ProgressThroughPhase + [Phenology].LateGrainFilling.ProgressThroughPhase + [Phenology].Drydown.ProgressThroughPhase
              Constant One: FixedValue=1
        Constant DetachmentRateFunction: FixedValue=0; Units=/d
        Constant MaintenanceRespirationFunction: FixedValue=0; Units=0-1
        Constant DMConversionEfficiency: FixedValue=1; Units=0-1
        Constant DMReallocationFactor: FixedValue=0
        Constant RemobilisationCost: FixedValue=0
        Constant CarbonConcentration: FixedValue=0.4
        AddFunction FillingDuration
          VariableReference EarlyPodDevelopmentDuration: VariableName=[Phenology].EarlyPodDevelopment.Target
          VariableReference EarlyGrainFillingDuration: VariableName=[Phenology].EarlyGrainFilling.Target
          VariableReference MidGrainFillingDuration: VariableName=[Phenology].MidGrainFilling.Target
        NutrientDemandFunctions DMDemands
          MultiplyFunction Structural
            PhaseLookup DMDemandFunction
              PhaseLookupValue PodDevelopment: Start=StartPodDevelopment; End=EndPodDevelopment
                MultiplyFunction HIPodDemand
                  VariableReference AboveGroundWt: VariableName=[AboveGround].Wt
                  DivideFunction HarvestIndexIncrease
                    VariableReference PotentialHarvestIndex: VariableName=[Shell].PotentialHarvestIndex
                    VariableReference FillingDuration: VariableName=[Shell].FillingDuration
                  VariableReference ThermalTime: VariableName=[Phenology].ThermalTime
            Constant StructuralFraction: FixedValue=1
            Memo
              Shell harvest index is used to calculate shell biomass demand, which follows the same approach than grain harvest index. It represents the fraction of shell biomass in relation to total aboveground biomass.
          Constant Metabolic: FixedValue=0
          StorageDMDemandFunction Storage
            SubtractFunction StorageFraction
              Constant One: FixedValue=1
              VariableReference StructuralFraction: VariableName=[Shell].DMDemands.Structural.StructuralFraction
          Constant QStructuralPriority: FixedValue=1
          Constant QMetabolicPriority: FixedValue=1
          Constant QStoragePriority: FixedValue=1
        NutrientDemandFunctions NDemands
          MultiplyFunction Structural
            VariableReference MinNconc: VariableName=[Shell].minimumNconc
            VariableReference PotentialDMAllocation: VariableName=[Shell].potentialDMAllocation.Structural
          StorageNDemandFunction Storage
            VariableReference NitrogenDemandSwitch: VariableName=[Shell].nitrogenDemandSwitch
            VariableReference MaxNconc: VariableName=[Shell].maximumNconc
          Constant Metabolic: FixedValue=0
          Constant QStructuralPriority: FixedValue=1
          Constant QMetabolicPriority: FixedValue=1
          Constant QStoragePriority: FixedValue=1
        RetranslocateNonStructural RetranslocateNitrogen
        NutrientPoolFunctions InitialWt: same as Replacements.Sesame.Stem.InitialWt
        Constant Photosynthesis: FixedValue=0
        VariableReference initialNConcFunction: VariableName=[Shell].MinimumNConc
      ReproductiveOrgan Grain: GrowthRespiration=0; MaintenanceRespiration=0
        Biomass Live
        Biomass Dead
        Constant MaximumHI: FixedValue=0.2; Units=0-1
          Memo
            HI = grain DW / total aboveground DW.

            - Nassiri-Mahallati, M., & Jahan, M. (2020). Using the AquaCrop model to simulate sesame performance in response to superabsorbent polymer and humic acid application under limited irrigation conditions. International Journal of Biometeorology, 64(12), 2105–2117. https://doi.org/10.1007/S00484-020-02001-Z/FIGURES/4.
        PhaseLookup PotentialHarvestIndex
          PhaseLookupValue GrainFilling: Start=StartGrainFilling; End=Maturity
            VariableReference MaximumHI: VariableName=[Grain].MaximumHI
        DivideFunction HarvestIndex
          VariableReference GrainWt: VariableName=[Grain].Wt
          VariableReference AboveGroundWt: VariableName=[AboveGround].Wt
        PhaseLookup DMDemandFunction
          PhaseLookupValue GrainFilling: Start=StartGrainFilling; End=EndGrainFilling
            MultiplyFunction HIGrainDemand
              VariableReference AboveGroundWt: VariableName=[AboveGround].Wt
              DivideFunction HarvestIndexIncrease
                VariableReference PotentialHarvestIndex: VariableName=[Grain].PotentialHarvestIndex
                VariableReference FillingDuration: VariableName=[Phenology].FillingDuration
              VariableReference ThermalTime: VariableName=[Phenology].ThermalTime
        Constant MinimumNConc: FixedValue=0.03
        Constant MaximumNConc: FixedValue=0.05
        Constant WaterContent: FixedValue=0.06
        MultiplyFunction NFillingRate
          VariableReference NConc: VariableName=[Grain].MaximumNConc
          VariableReference DMDemand: VariableName=[Grain].DMDemandFunction
          VariableReference DMConversionEfficiency: VariableName=[Grain].DMConversionEfficiency
        BiomassRemoval BiomassRemovalDefaults: HarvestFractionLiveToRemove=1; HarvestFractionDeadToRemove=1; HarvestFractionLiveToResidue=0; HarvestFractionDeadToResidue=0
        Constant DMConversionEfficiency: FixedValue=0.89
        Constant RemobilisationCost: FixedValue=0
        Constant CarbonConcentration: FixedValue=0.4
        Constant MaximumPotentialGrainSize: FixedValue=0
          Memo
            This parameter is not used.  Grain growth is calculated from harvest index increase.
        Constant NumberFunction: FixedValue=0
          Memo
            Grain number is not estimated by this model.
        NutrientPoolFunctions DMDemandPriorityFactors
          Constant Structural: FixedValue=1
          Constant Metabolic: FixedValue=1
          Constant Storage: FixedValue=1
        NutrientPoolFunctions NDemandPriorityFactors: same as Replacements.Sesame.Grain.DMDemandPriorityFactors
      Root: GrowthRespiration=0; MaintenanceRespiration=0
        PhaseLookup WetRootFractionFactor
          PhaseLookupValue Pre-Emergence: Start=Sowing; End=Emergence
            Constant One: FixedValue=1
          PhaseLookupValue Post-Emergence: Start=Emergence; End=Unused
            LinearInterpolationFunction WetRootFraction
              XYPairs: X=[0, 1]; Y=[1, 0]
              VariableReference XValue: VariableName=[Root].WetRootFraction
        MultiplyFunction RootFrontVelocity
          PhaseLookup PotentialRootFrontVelocity
            PhaseLookupValue PreEmergence: Start=Germination; End=Emergence
              Constant Function: FixedValue=5
            PhaseLookupValue early: Start=Emergence; End=StartGrainFilling
              Constant Function: FixedValue=30
            PhaseLookupValue late: Start=StartGrainFilling; End=Maturity
              Constant Function: FixedValue=5
          VariableReference WetRootFractionFactor: VariableName=[Root].WetRootFractionFactor
          LinearInterpolationFunction RootFrontWetnessFactor
            XYPairs: X=[0, 1, 2]; Y=[1, 1, 0]
            SoilWaterScale XValue: LLModel=1
        Constant MaximumRootDepth: FixedValue=1000000
          Memo
            There is no intrinsic limit to maximum rooting depth.  Roots will be limited by the depth of the soil profile, or via values of XF in each layer.
        RootShapeCylinder RootShape
        Constant KLModifier: FixedValue=1; Units=0-1
          Memo
            No modification to water extraction rate is assumed in this model.
        MultiplyFunction NUptakeSWFactor
          LinearInterpolationFunction RWCFactor
            XYPairs: X=[0, 1]; Y=[0, 1]
            VariableReference XValue: VariableName=[Root].RWC
          LinearInterpolationFunction PHFactor
            XYPairs: X=[0, 5, 8, 13]; Y=[0, 1, 1, 0]
            VariableReference XValue: VariableName=[Chemical].PH
          Constant OtherFactors: FixedValue=1
        Constant MaxDailyNUptake: FixedValue=6
        Constant SenescenceRate: FixedValue=0.005; Units=/d
          Memo
            Roots are assumed to simply senesce at a small and constant rate during the entire growth period.
        Constant MaximumNConc: FixedValue=0.01
        Constant MinimumNConc: FixedValue=0.005
        PhaseLookupValue NitrogenDemandSwitch: Start=Emergence; End=EndGrainFilling
          Constant: FixedValue=1
        Constant KNO3: FixedValue=0.02
        Constant KNH4: FixedValue=0
          Memo
            The current model version considers only NO3 uptake but NH4 option can be activated by the user . We do not expect activation of NH4 to change total plant N uptake because the nitrification rate (conversion of NH4 to NO3) is very fast in the model. In the future we will re-valuate this.
        BiomassRemoval BiomassRemovalDefaults: HarvestFractionLiveToRemove=0; HarvestFractionDeadToRemove=0; HarvestFractionLiveToResidue=0.2; HarvestFractionDeadToResidue=0
        Constant SpecificRootLength: FixedValue=40; Units=m/g
        Constant DMConversionEfficiency: FixedValue=1
        Constant MaintenanceRespirationFunction: FixedValue=1
        Constant RemobilisationCost: FixedValue=0
        Constant CarbonConcentration: FixedValue=0.4
        NutrientDemandFunctions DMDemands
          MultiplyFunction Structural
            PartitionFractionDemandFunction DMDemandFunction
              MultiplyFunction PartitionFraction
                PhaseLookup PotentialPartitionFraction
                  PhaseLookupValue Early: Start=Emergence; End=StartFlowering
                    Constant Function: FixedValue=0.25
                  PhaseLookupValue Middle: Start=StartFlowering; End=StartGrainFilling
                    Constant Function: FixedValue=0.25
                  PhaseLookupValue Late: Start=StartGrainFilling; End=Maturity
                    Constant Function: FixedValue=0.05
                VariableReference WetRootFractionFactor: VariableName=[Root].WetRootFractionFactor
            Constant StructuralFraction: FixedValue=1
          Constant Metabolic: FixedValue=0
          StorageDMDemandFunction Storage
            SubtractFunction StorageFraction
              Constant One: FixedValue=1
              VariableReference StructuralFraction: VariableName=[Root].DMDemands.Structural.StructuralFraction
          Constant QStructuralPriority: FixedValue=1
          Constant QMetabolicPriority: FixedValue=1
          Constant QStoragePriority: FixedValue=1
        NutrientDemandFunctions NDemands
          MultiplyFunction Structural
            VariableReference MinNconc: VariableName=[Root].minimumNconc
            VariableReference PotentialDMAllocation: VariableName=[Root].potentialDMAllocation.Structural
          MultiplyFunction Metabolic
            SubtractFunction MetabolicNconc
              VariableReference CritNconc: VariableName=[Root].criticalNConc
              VariableReference MinNconc: VariableName=[Root].minimumNconc
            VariableReference PotentialDMAllocation: VariableName=[Root].potentialDMAllocation.Structural
          StorageNDemandFunction Storage
            VariableReference NitrogenDemandSwitch: VariableName=[Root].nitrogenDemandSwitch
            VariableReference MaxNconc: VariableName=[Root].maximumNconc
          Constant QStructuralPriority: FixedValue=1
          Constant QMetabolicPriority: FixedValue=1
          Constant QStoragePriority: FixedValue=1
        VariableReference CriticalNConc: VariableName=[Root].MinimumNConc
        NutrientPoolFunctions InitialWt
          Constant Structural: FixedValue=0.2; Units=g/plant
          Constant Metabolic: FixedValue=0
          Constant Storage: FixedValue=0
      CompositeBiomass AboveGround: OrganNames=[Leaf, Stem, Grain, Shell]; IncludeLive=true; IncludeDead=true
      CompositeBiomass BelowGround: OrganNames=[Root]; IncludeLive=true; IncludeDead=true
      CompositeBiomass AboveGroundLive: OrganNames=[Leaf, Stem, Grain, Shell]; IncludeLive=true; IncludeDead=false
      CompositeBiomass Total: OrganNames=[Leaf, Stem, Grain, Shell, Root]; IncludeLive=true; IncludeDead=true
      CompositeBiomass TotalLive: OrganNames=[Leaf, Stem, Grain, Shell, Root]; IncludeLive=true; IncludeDead=false
      CompositeBiomass TotalDead: OrganNames=[Leaf, Stem, Grain, Shell, Root]; IncludeLive=false; IncludeDead=true
      CompositeBiomass Pod: OrganNames=[Shell, Grain]; IncludeLive=true; IncludeDead=true
      Constant MortalityRate: FixedValue=0
      Constant SeedMortalityRate: FixedValue=0
    Report DailyReport: EventNames=[Clock].EndOfDay
      VariableNames:
        [Clock].Today
        [Clock].Today.DayOfYear
        [Sesame].SowingData.SkipPlant
        [Sesame].IsAlive
        [Sesame].DaysAfterSowing
        [Sesame].Phenology.Stage
        [Sesame].Phenology.CurrentStageName
        [Sesame].Phenology.AccumulatedTT
        [Sesame].Phenology.MaturityDAS
        [SoilTemperature].Value[1] as SurfaceSoilTemp
        [Irrigation].IrrigationApplied
        [Weather].MeanT
        [Weather].Radn
        [Weather].MaxT
        [Weather].MinT
        [Weather].CO2
        [Sesame].LAI
        [Sesame].Leaf.LAI
        [Sesame].Leaf.LAITotal
        [Sesame].Leaf.CoverTotal
        [Sesame].Leaf.CoverGreen
        [Sesame].Leaf.NConc
        [Sesame].Leaf.N
        [Sesame].Leaf.RadiationIntercepted
        [Sesame].Leaf.Height
        [Sesame].Leaf.CoverGreen
        [Sesame].Leaf.Photosynthesis.FT
        [Sesame].Leaf.Photosynthesis.FT.MeanT
        [Sesame].Leaf.Photosynthesis.FT.MinT
        [Sesame].Leaf.Photosynthesis.FN
        [Sesame].Leaf.Photosynthesis.FW
        [Sesame].Leaf.FW
        [Sesame].Leaf.FRGR
        [Sesame].Leaf.Photosynthesis.FCO2
        [Sesame].Leaf.Wt
        [Sesame].Leaf.Live.Wt
        [Sesame].Leaf.Dead.Wt
        [Sesame].Leaf.Detached.Wt
        [Sesame].Leaf.Total.StructuralWt
        [Sesame].Leaf.Height
        [Sesame].Stem.Wt
        [Sesame].Stem.Live.Wt
        [Sesame].Stem.Dead.Wt
        [Sesame].Stem.Total.StructuralWt
        [Sesame].Stem.NodeNumber
        //Sesame].Stem.BranchNumber
        [Sesame].Stem.MaxBranchNumber
        [Sesame].SowingData.Population
        max of [Sesame].Stem.BranchNumber from [Sesame].Sowing to [Clock].Today as [Sesame].Stem.BranchNumber
        [Sesame].Shell.Wt
        [Sesame].Shell.Live.Wt
        [Sesame].Shell.Dead.Wt
        [Sesame].Shell.Total.StructuralWt
        [Sesame].Shell.Wt
        [Sesame].Shell.Live.Wt
        ([Sesame].Shell.Wt + [Sesame].Grain.Wt) as ShellAndGrainWt
        ([Sesame].Shell.Live.Wt + [Sesame].Grain.Live.Wt) as ShellAndGrainLiveWt
        ([Sesame].Shell.Dead.Wt + [Sesame].Grain.Dead.Wt) as ShellAndGrainDeadWt
        [Sesame].Root.Depth
        [Sesame].Root.NSupply.Fixation
        [Sesame].Root.NSupply.Uptake
        [Sesame].Root.NSupply.Total
        [Sesame].Root.WetRootFraction
        [Sesame].Root.WetRootFractionFactor
        [Sesame].Grain.Live.NConc
        [Sesame].Grain.WaterContent
        [Sesame].Grain.HarvestIndex
        [Sesame].Grain.PotentialHarvestIndex
        [Sesame].Grain.Wt
        [Sesame].AboveGround.Wt
        [Sesame].AboveGroundLive.Wt
    Report HarvestReport: EventNames=[Sesame].Harvesting
      VariableNames:
        [Clock].Today
        [Clock].Today.DayOfYear
        [Clock].Today.Year as HarvestYear
        [Sesame].DaysAfterSowing
        [Sesame].Phenology.Stage
        [Sesame].Phenology.AccumulatedTT
        [Sesame].Phenology.EmergenceDAS
        [Sesame].Phenology.StartFloweringDAS
        [Sesame].Phenology.MaturityDAS
        [Sesame].Stem.BranchNumber
        [Sesame].Stem.NodeNumber
        sum of [Irrigation].IrrigationApplied from [Sesame].Sowing to [Sesame].Harvesting as TotalIrrig
        max of [Sesame].Leaf.LAI from [Sesame].Sowing to [Sesame].Harvesting as MaxLAI
        mean of [Sesame].Leaf.Photosynthesis.FT from [Sesame].Sowing to [Sesame].Harvesting as AvePsFT
        mean of [Sesame].Leaf.Photosynthesis.FT.MeanT from [Sesame].Sowing to [Sesame].Harvesting as AvePsFTMeanT
        mean of [Sesame].Leaf.Photosynthesis.FT.MinT from [Sesame].Sowing to [Sesame].Harvesting as AvePsFTMinT
        mean of [Sesame].Leaf.Photosynthesis.FN from [Sesame].Sowing to [Sesame].Harvesting as AvePsFN
        mean of [Sesame].Leaf.Photosynthesis.FW from [Sesame].Sowing to [Sesame].Harvesting as AvePsFW
        mean of [Sesame].Root.WetRootFractionFactor from [Sesame].Sowing to [Sesame].Harvesting as AveWetRootFracFact
        mean of [Sesame].Leaf.FW from [Sesame].Sowing to [Sesame].Harvesting as AveFW
        mean of [Sesame].Leaf.FRGR from [Sesame].Sowing to [Sesame].Harvesting as AveFRGR
        [Sesame].AboveGround.Wt
        [Sesame].Grain.Wt
    Manager CO2Trend
      C3 = 1.4507E-08
      C2 = 8.01174e-05
      C1 = 0.057666
      C0 = 314.802402
      Target = -1
      RCP = RCP85
      KeepAt = -1
      KeepAtYear = -1
```csharp
using Models.Soils.Nutrients;
using APSIM.Shared.Utilities;
using Models.Surface;
using Models.Utilities;
using Models.Soils.Nutrients;
using Models.Soils;
using Models.PMF;
using Models.Core;
using System;
using System.Linq;
using Models.Interfaces;

namespace Models
{
	[Serializable]
	public class Script : Model
	{
		[Link] private Clock Clock;
		[Link] private IWeather Weather;
		
		[Description("Coefficient of x^3")]
		public double C3 {get; set;}
		
		[Description("Coefficient of x^2")]
		public double C2 {get; set;}
		
		[Description("Coefficient of x)")]
		public double C1 {get; set;}
		
		[Description("Intercept")]
		public double C0 {get; set;}
		
		[Description("Target period (negative to use regression; set 0 to keep at 350 ppm; or 2030-2050)")]
		public double Target {get; set;}
		
		[Description("RCP scenario (only used if Target>0)")]
		public string RCP {get; set;}
		
		[Description("Keep CO2 at this level (only used if Target<0; negative to ignore)")]
		public double KeepAt {get; set;}
		
		[Description("Keep CO2 at this year's level (only used if Target<0; negative to ignore)")]
		public double KeepAtYear {get; set;}
		private double CO2;
		private double MonID;
		
		[EventSubscribe("DoWeather")]
		private void OnDoWeather(object sender, EventArgs e)
		{
			CO2 = -1;
			if (Target == 0)
			{
				CO2 = 350;
			}
			else if (Target > 0)
			{
				if (Target == 2030)
				{
					if (RCP == "RCP45")
					{
						CO2 = 438;
					}
					else
					{
						CO2 = 452;
					}
				}
				else if (Target == 2050)
				{
					if (RCP == "RCP45")
					{
						CO2 = 483;
					}
					else
					{
						CO2 = 546;
					}
				}
			}
			else if (Target < 0)
			{
				if (KeepAt < 0)
				{
					if (KeepAtYear < 0)
					{
						MonID = (Clock.Today.Year - 1) * 12 + (Clock.Today.Month - 1) + (Clock.Today.Day / 30) - 23483.5;
					}
					else
					{
						MonID = (KeepAtYear - 1) * 12 + 1 - 23483.5;
					}
					CO2 = (C3 * Math.Pow(MonID,3)) + (C2 * Math.Pow(MonID,2)) + (C1 * MonID) + C0;
				}
				else
				{
					CO2 = KeepAt;
				}
				if (CO2 < 350)
				{
					CO2 = 350;
				}
			}
			Weather.CO2 = CO2;
		}
	}
}
```
    Manager MyScripts
```csharp
using Models.Soils.Nutrients;
using APSIM.Shared.Utilities;
using Models.Surface;
using Models.Utilities;
using Models.Soils.Nutrients;
using Models.Soils;
using Models.PMF;
using Models.Core;
using System;
using System.Linq;
using Models.Interfaces;

namespace Models
{
	[Serializable]
	public class Script : Model
	{
		[Link] private Clock Clock;
		[Link] private IWeather Weather;
		
		public double LastStagePassed {get; set;}		
		
		[EventSubscribe("OnPhaseChanged")]
		private void OnDoWeather(object sender, EventArgs e)
		{
			
		}
	}
}
```
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